Simulations: Version=184
  Memo Introduction
    # Crop2ML - Testing SoilTemperature Models

    Rogerio Cichota (Plant and Food Research, New Zealand) and Dean Holzworth (CSIRO, Australia)

    This simulation is build to test a variety of soil temperature models under specific environmental conditions.
    Data from this simulation will then be used for sensitivity analisys.
    Most of the inputs are fixed (weather) and apsim will not compute any variation in soil water.

    The factors that will vary include:
     - Seven sites (climates): sub-tropical (Gainesville, FL, USA), continental (Müncheberg, Germany), tropical (Cali, Colombia), oceanic (Lusignan, France), semi-arid (Maricopa, AZ, USA), Mediterranean (Montpellier, France), Boreal (Quebec City, Canada)
     - Three values for LAI: 0 (bare soil) , 2 (open canopy), 7 (closed canopy)  m2 m-2 (no snow, soil cover, or crop residue)
     - Five soil water content levels: 0%, 25%, 50%, 75%, 100% available water content
     - Four standardised soil types: deep silty clay, deep silty loam, deep sandy loam, deep sand
     - Twelve soil temperature models: DSSAT-ST (DS), DSSAT-EPIC (DE), EPIC (EP), STICS (ST), SIMPLACE-APEX (SA), SiriusQuality (SQ), BioMA-SWAT (SW), BioMA-Parton-SWAT* (PS), BioMA-Campbell** (CA), APSIM *** (AP), MONICA*** (MO)

    Simulations will run for 30 years, from 1991 to 2020, using weather data from NASA POWER.
    Full factorial of the studied factors (420 simulations per platform and model).

    - - - - - - - - - - - - - - - - - - - - - - - - - - - - - - - - - - - - - - - - - -
    ### KEY to model setup and output marking
    - - - - - - - - - - - - - - - - - - - - - - - - - - - - - - - - - - - - - - - - - -

    |Platform      |Code   |                  |Model               |Original_Code |Crop2ML_Code |
    |:------------ | -----:|                  |:------------------ | ------------:| -----------:|
    |BioMa         | BI    |                  |APSIM               |    APO       |    APC      |
    |DSSAT         | DS    |                  |BioMA-Campbell      |    CAO       |    CAC      |
    |MONICA        | MO    |                  |BioMA-Parton-SWAT   |    PSO       |    PSC      |
    |OpenAlea      | OA    |                  |BioMA-SWAT          |    SWO       |    SWC      |
    |SIMPLACE      | SI    |                  |DSSAT-EPIC          |    DEO       |    DEC      |
    |SiriusQuality | SQ    |                  |DSSAT-ST            |    DSO       |    DSC      |
    |STICS         | ST    |                  |EPIC                |    EPO       |    EPC      |
    |              |       |                  |MONICA              |    MOO       |    MOC      |
    |              |       |                  |SIMPLACE-APEX       |    SAO       |    SAC      |
    |              |       |                  |SiriusQuality       |    SQO       |    SQC      |
    |              |       |.                .|STICS               |    STO       |    STC      |

    !- - - - - - - - - - - - - - - - - - - - - - - - - - - - - - - - - - - - - - - - - -

    |Location              | Code  |                  |Soil            | Code  |
    |:-------------------- | -----:|                  |:-------------- | -----:|
    |Cali, Colombia        | COCA  |                  |Silty Clay      | SICL  |
    |Gainesville, USA      | USGA  |                  |Silty Loam      | SILO  |
    |Lusignan, France      | FRLU  |                  |Sandy Loam      | SALO  |
    |Maricopa, USA         | USMA  |                  |Sand            | SAND  |
    |Montpellier, France   | FRMO  |                  |                |       |
    |Muncheburg, Germany   | GEMU  |                  |                |       |
    |Quebec City, Canada   | CAQU  |.                .|                |       |

    !- - - - - - - - - - - - - - - - - - - - - - - - - - - - - - - - - - - - - - - - - -

    |AW             |  Code   |                               |LAI       | Code  |
    |:------------- | -------:|                               |:-------- | -----:|
    |0% AWC         | AW0.00  |                               |LAI=0     |  L0   |
    |50% AWC        | AW0.50  |                               |LAI=2     |  L2   |
    |75% AWC        | AW0.75  |                               |LAI=7     |  L7   |
    |100% AWC       | AW1.00  |.                             .|          |       |
  DataStore
  Experiment
    Factors
      Memo
        ### Factors to run:

        Sites to run:
        USGA, DEMU, COCA, FRLU, USMA, FRMO, CAQC

        Values for LAI to run:
        0, 2, 7

        Fraction of PAW to run:
        0.0, 0.25, 0.5, 0.75, 1.0

        Soils to run:
        SICL, SILO, SALO, SAND

        Models to run:
        APC, SWC, DEC, DSC, MOC, SAC, SQC, STC
      Permutation
        Factor Location
          Specification=[TreatmentApply].Script.Site = USGA, DEMU, COCA, FRLU, USMA, FRMO, CAQC
        Factor Soil: Specification=[Soil]
          Soil SICL: LocalName=SICL; Latitude=0; Longitude=0
            Physical
              Thickness  ParticleSizeSand  ParticleSizeSilt  ParticleSizeClay  Rocks  BD    AirDry  LL15   DUL    SAT
              50         15                35                50                0      1.3   0.076   0.228  0.385  0.481
              100        15                35                50                0      1.3   0.076   0.228  0.385  0.481
              150        15                35                50                0      1.3   0.083   0.249  0.406  0.482
              150        15                35                50                0      1.35  0.083   0.249  0.406  0.465
              150        15                35                50                0      1.35  0.083   0.249  0.406  0.465
              300        15                35                50                0      1.35  0.103   0.308  0.456  0.468
              300        15                35                50                0      1.4   0.069   0.207  0.341  0.452
              300        15                35                50                0      1.4   0.081   0.243  0.365  0.455
              300        15                35                50                0      1.4   0.086   0.259  0.361  0.457
              300        15                35                50                0      1.4   0.086   0.259  0.361  0.457
            WaterBalance SoilWater: SummerDate=1-Nov; SummerU=0; SummerCona=0; WinterDate=1-Apr; WinterU=0; WinterCona=0; DiffusConst=0; DiffusSlope=0; Salb=0.11; CN2Bare=0; CNRed=0; CNCov=0.8; PSIDul=-100; Thickness=[50, 100, 150, 150, 150, 300, 300, 300, 300, 300]; SWCON=[0, 0, 0, 0, 0, 0, 0, 0, 0, 0]
            Organic: FOMCNRatio=60; CarbonUnits=Total
              Thickness  Carbon  SoilCNRatio  FBiom  FInert  FOM
              50         1.75    100          0      1       0
              100        1.75    100          0      1       0
              150        1.6     100          0      1       0
              150        1.45    100          0      1       0
              150        1.45    100          0      1       0
              300        1.1     100          0      1       0
              300        0.65    100          0      1       0
              300        0.3     100          0      1       0
              300        0.1     100          0      1       0
              300        0.01    100          0      1       0
            Chemical: Thickness=[50, 100, 100, 150, 200, 200, 400, 300]; PH=[7, 7, 7, 7, 7, 7, 7, 7]; PHUnits=Water
            Nutrient
            SoilTemperature Temperature
            Water: Thickness=[50, 100, 150, 150, 150, 300, 300, 300, 300, 300]; InitialPAWmm=0; RelativeTo=LL15; FilledFromTop=true
              InitialValues=[0.228, 0.228, 0.249, 0.249, 0.249, 0.308, 0.207, 0.243, 0.259, 0.259]
            Solute NO3: InitialValuesUnits=kg/ha; WaterTableConcentration=0; D0=0; DepthConstant=0; MaxDepthSoluteAccessible=0; RunoffEffectivenessAtMovingSolute=0; MaxEffectiveRunoff=0
              Thickness  InitialValues  Exco  FIP
              50         0              0     1
              100        0              0     1
              100        0              0     1
              150        0              0     1
              200        0              0     1
              200        0              0     1
              400        0              0     1
              300        0              0     1
            Solute NH4: same as Experiment.Factors.Permutation.Soil.SICL.NO3
            Solute Urea: same as Experiment.Factors.Permutation.Soil.SICL.NO3
          Soil SILO: LocalName=SILO; Latitude=0; Longitude=0
            Physical
              Thickness  ParticleSizeSand  ParticleSizeSilt  ParticleSizeClay  Rocks  BD    AirDry  LL15   DUL    SAT    KS
              50         30                60                10                0      1.37  0.037   0.11   0.227  0.45   0
              100        30                60                10                0      1.37  0.037   0.11   0.227  0.45   0
              150        30                60                10                0      1.37  0.034   0.103  0.201  0.451  0
              150        30                60                10                0      1.37  0.033   0.099  0.193  0.452  0
              150        30                60                10                0      1.37  0.033   0.099  0.193  0.452  0
              300        30                60                10                0      1.38  0.029   0.088  0.173  0.45   0
              300        30                60                10                0      1.38  0.026   0.079  0.165  0.452  0
              300        30                60                10                0      1.39  0.029   0.086  0.178  0.45   0
              300        30                60                10                0      1.39  0.024   0.072  0.174  0.451  0
              300        30                60                10                0      1.39  0.024   0.072  0.174  0.452  0
            WaterBalance SoilWater: SummerDate=1-Nov; SummerU=0; SummerCona=0; WinterDate=1-Apr; WinterU=0; WinterCona=0; DiffusConst=0; DiffusSlope=0; Salb=0.12; CN2Bare=0; CNRed=0; CNCov=0.8; PSIDul=-100; Thickness=[50, 100, 150, 150, 150, 300, 300, 300, 300, 300]; SWCON=[0, 0, 0, 0, 0, 0, 0, 0, 0, 0]
            Organic: FOMCNRatio=60; CarbonUnits=Total
              Thickness  Carbon  SoilCNRatio  FBiom  FInert  FOM
              50         1.16    100          0      1       0
              100        1.16    100          0      1       0
              150        1.1     100          0      1       0
              150        0.97    100          0      1       0
              150        0.97    100          0      1       0
              300        0.72    100          0      1       0
              300        0.43    100          0      1       0
              300        0.2     100          0      1       0
              300        0.06    100          0      1       0
              300        0.01    100          0      1       0
            Chemical: Thickness=[50, 100, 100, 150, 200, 200, 400, 300]; PH=[7, 7, 7, 7, 7, 7, 7, 7]; PHUnits=Water
            Nutrient
            SoilTemperature Temperature
            Water: Thickness=[50, 100, 150, 150, 150, 300, 300, 300, 300, 300]; InitialPAWmm=0; RelativeTo=LL15; FilledFromTop=true
              InitialValues=[0.11, 0.11, 0.103, 0.099, 0.099, 0.088, 0.079, 0.086, 0.072, 0.072]
            Solute NO3: same as Experiment.Factors.Permutation.Soil.SICL.NO3
            Solute NH4: same as Experiment.Factors.Permutation.Soil.SICL.NO3
            Solute Urea: same as Experiment.Factors.Permutation.Soil.SICL.NO3
          Soil SALO: LocalName=SALO; Latitude=0; Longitude=0
            Physical
              Thickness  ParticleSizeSand  ParticleSizeSilt  ParticleSizeClay  Rocks  BD    AirDry  LL15   DUL    SAT    KS
              50         60                30                10                0      1.61  0.017   0.052  0.176  0.359  0
              100        60                30                10                0      1.61  0.017   0.052  0.176  0.359  0
              150        60                30                10                0      1.61  0.017   0.052  0.176  0.359  0
              150        60                30                10                0      1.61  0.024   0.073  0.192  0.36   0
              150        60                30                10                0      1.61  0.024   0.073  0.192  0.36   0
              300        60                30                10                0      1.61  0.043   0.128  0.232  0.361  0
              300        60                30                10                0      1.62  0.048   0.143  0.243  0.359  0
              300        60                30                10                0      1.62  0.046   0.138  0.243  0.36   0
              300        60                30                10                0      1.62  0.046   0.138  0.244  0.361  0
              300        60                30                10                0      1.62  0.046   0.138  0.244  0.361  0
            WaterBalance SoilWater: SummerDate=1-Nov; SummerU=0; SummerCona=0; WinterDate=1-Apr; WinterU=0; WinterCona=0; DiffusConst=0; DiffusSlope=0; Salb=0.13; CN2Bare=0; CNRed=0; CNCov=0.8; PSIDul=-100; Thickness=[50, 100, 150, 150, 150, 300, 300, 300, 300, 300]; SWCON=[0, 0, 0, 0, 0, 0, 0, 0, 0, 0]
            Organic: FOMCNRatio=60; CarbonUnits=Total
              Thickness  Carbon  SoilCNRatio  FBiom  FInert  FOM
              50         0.7     100          0      1       0
              100        0.7     100          0      1       0
              150        0.66    100          0      1       0
              150        0.58    100          0      1       0
              150        0.58    100          0      1       0
              300        0.43    100          0      1       0
              300        0.26    100          0      1       0
              300        0.12    100          0      1       0
              300        0.04    100          0      1       0
              300        0.01    100          0      1       0
            Chemical: Thickness=[50, 100, 100, 150, 200, 200, 400, 300]; PH=[7, 7, 7, 7, 7, 7, 7, 7]; PHUnits=Water
            Nutrient
            SoilTemperature Temperature
            Water: Thickness=[50, 100, 150, 150, 150, 300, 300, 300, 300, 300]; InitialPAWmm=0; RelativeTo=LL15; FilledFromTop=true
              InitialValues=[0.052, 0.052, 0.052, 0.073, 0.073, 0.128, 0.143, 0.138, 0.138, 0.138]
            Solute NO3: same as Experiment.Factors.Permutation.Soil.SICL.NO3
            Solute NH4: same as Experiment.Factors.Permutation.Soil.SICL.NO3
            Solute Urea: same as Experiment.Factors.Permutation.Soil.SICL.NO3
          Soil SAND: LocalName=SAND; Latitude=0; Longitude=0
            Physical
              Thickness  ParticleSizeSand  ParticleSizeSilt  ParticleSizeClay  Rocks  BD    AirDry  LL15   DUL    SAT    KS
              50         85                10                5                 0      1.66  0.008   0.025  0.096  0.345  0
              100        85                10                5                 0      1.66  0.008   0.025  0.096  0.345  0
              150        85                10                5                 0      1.66  0.008   0.023  0.097  0.345  0
              150        85                10                5                 0      1.66  0.008   0.023  0.097  0.345  0
              150        85                10                5                 0      1.66  0.008   0.023  0.097  0.345  0
              300        85                10                5                 0      1.66  0.006   0.018  0.091  0.346  0
              300        85                10                5                 0      1.66  0.007   0.02   0.095  0.346  0
              300        85                10                5                 0      1.66  0.007   0.021  0.091  0.347  0
              300        85                10                5                 0      1.66  0.007   0.021  0.091  0.347  0
              300        85                10                5                 0      1.66  0.007   0.021  0.091  0.347  0
            WaterBalance SoilWater: SummerDate=1-Nov; SummerU=0; SummerCona=0; WinterDate=1-Apr; WinterU=0; WinterCona=0; DiffusConst=0; DiffusSlope=0; Salb=0.15; CN2Bare=0; CNRed=0; CNCov=0.8; PSIDul=-100; Thickness=[50, 100, 150, 150, 150, 300, 300, 300, 300, 300]; SWCON=[0, 0, 0, 0, 0, 0, 0, 0, 0, 0]
            Organic: FOMCNRatio=60; CarbonUnits=Total
              Thickness  Carbon  SoilCNRatio  FBiom  FInert  FOM
              50         0.29    100          0      1       0
              100        0.29    100          0      1       0
              150        0.28    100          0      1       0
              150        0.24    100          0      1       0
              150        0.24    100          0      1       0
              300        0.18    100          0      1       0
              300        0.11    100          0      1       0
              300        0.05    100          0      1       0
              300        0.01    100          0      1       0
              300        0       100          0      1       0
            Chemical: Thickness=[50, 100, 100, 150, 200, 200, 400, 300]; PH=[7, 7, 7, 7, 7, 7, 7, 7]; PHUnits=Water
            Nutrient
            SoilTemperature Temperature
            Water: Thickness=[50, 100, 150, 150, 150, 300, 300, 300, 300, 300]; InitialPAWmm=0; RelativeTo=LL15; FilledFromTop=true
              InitialValues=[0.025, 0.025, 0.023, 0.023, 0.023, 0.018, 0.02, 0.021, 0.021, 0.021]
            Solute NO3: same as Experiment.Factors.Permutation.Soil.SICL.NO3
            Solute NH4: same as Experiment.Factors.Permutation.Soil.SICL.NO3
            Solute Urea: same as Experiment.Factors.Permutation.Soil.SICL.NO3
        Factor LAI: Specification=[TreatmentApply].Script.LAI = 0, 2, 7
        Factor PAW: Specification=[TreatmentApply].Script.PAW = 0.0, 0.25, 0.5, 0.75, 1.0
        Factor Model: Specification=[ISoilTemperature]
          SoilTemperature APO (disabled)
          Model_SoilTempCampbellWrapper APCpy (disabled)
          SoiltempWrapper APC
          CERESSoilTemperature APE (disabled)
          SurfacePartonSoilSWATCWrapper PSC (disabled)
          SurfaceSWATSoilSWATCWrapper SWC (disabled)
          STEMP_EPIC_Wrapper DEC (disabled)
          STEMP_Wrapper DSC (disabled)
          SoilTemperatureCompWrapper MOC (disabled)
          SoilTemperatureWrapper SAC (disabled): cDampingDepth=6000
          SoilTemperatureWrapper SQC (disabled)
          Soil_tempWrapper STC (disabled)
    Simulation Base
      Clock: Start=1991-01-01; End=2020-12-31
      Weather: FileName=Dummy.met; Latitude=-27; Tav=19.51; Amp=14.62
      Manager TreatmentApply
        Site =
        LAI = 0
        profileDensity = 0
        PAW = 0
        AboveGroundBiomass = 0
```csharp
using Models.Soils;
using System.Diagnostics;
using System.Collections.Generic;
using System.IO;
using System.Data;
using System.Linq;
using System;
using Models.Interfaces;
using Models.Core;
using Models.Climate;
using Models.WaterModel;
using APSIM.Shared.Utilities;
namespace Models
{
    [Serializable]
    [System.Xml.Serialization.XmlInclude(typeof(Model))]
    public class CalcWTHFileName : Model
    {
        [Link] Clock clock;
        [Link] Weather weather;
        [Link] Simulation simulation;
        [Link] Water water;
        [Link] WaterBalance waterBalance;
        [Link] Soil mySoil;
        [Link] IPhysical soilPhysical;
        
        private DataTable data;
        private List<DateTime> dates = new List<DateTime>();
        private DateTime startDate;
        private DateTime endDate;

        [Description("Site name")]
        public string Site { get; set; }
        
        [Description("LAI")]
        public double LAI { get; set; }
        
        [Description("AboveGroundBiomass")]
        public double AboveGroundBiomass { get; set; }
        
        [Description("Profile average bulk density")]
        public double profileDensity { get; set; }
        
        [Description("Plant available water fraction (0 = empty, 1 = full)")]
        public double PAW { get; set; }
        
        public string WTHFileName => $"{Site}L{LAI}AW{PAW:f2}.WTH";
        
        
        [EventSubscribe("StartOfSimulation")]
        private void OnStartOfSimulation(object sender, EventArgs e)
        {
        	// Read in metadata
			string fullFileName = Path.Combine(Path.GetDirectoryName(simulation.FileName),
                                               "WeatherData",
                                               "WeatherMetadata.txt");
        
            // Read in meta data file
            var metadata = DataTableUtilities.ReadDataTable(fullFileName, 
            									    	    '\t',
            										        2,
            										        (i, word) =>
            {
            	if (i <= 2)
            	{
            	    return word;
            	}
            	else
            		return Convert.ToDouble(word);
            });
            
            // Find metadata for site.
            DataView dataView = new(metadata);
            dataView.RowFilter = $"WST_ID='{Site}'";
            if (dataView.Count == 0)
            	throw new Exception($"Cannot find site {Site} in WeatherMetadata.txt");
            	
            // Set weather constants
        	weather.Latitude = Convert.ToDouble(dataView[0]["XLAT"]);
        	weather.Tav = Convert.ToDouble(dataView[0]["TAV"]);
        	weather.Amp = Convert.ToDouble(dataView[0]["TAMP"]);
        	
            if (LAI == 0.0)
           	    AboveGroundBiomass = 0.0;
       	    else if (LAI == 2.0)
           	    AboveGroundBiomass = 1800;
       	    else if (LAI == 7.0)
       	        AboveGroundBiomass = 10500;
       	    else
               	throw new Exception($"Cannot define the AboveGroundBiomass for LAI {LAI}");

        	// Set starting water
        	//System.Diagnostics.Debugger.Break();
        	water.FilledFromTop = false;
        	water.FractionFull = PAW;   //  <-- this sets the moisture too late (after init of first day), still needed (there are two settings...)
        	double[] newSW = new double[soilPhysical.Thickness.Length];
        	for (int z=0; z<soilPhysical.Thickness.Length; z++)
        	    newSW[z] = soilPhysical.LL15[z] + (soilPhysical.DUL[z] - soilPhysical.LL15[z])*PAW;
        	waterBalance.SW = newSW;

        	// Broadcast 'mean' profile density (needed by SimPlace, it is and inpute and different if computing from base values)
       	    if (mySoil.LocalName == "SICL")
           	    profileDensity = 1.36;
       	    else if (mySoil.LocalName == "SILO")
           	    profileDensity = 1.38;
       	    else if (mySoil.LocalName == "SALO")
       	        profileDensity = 1.61;
       	    else if (mySoil.LocalName == "SAND")
           	    profileDensity = 1.66;
       	    else
               	throw new Exception($"Cannot define the bulk density for {mySoil.Name}");
        }

        [EventSubscribe("SoilWaterMoved")]
        private void OnSoilWaterMoved(object sender, EventArgs e)
        {
        	// Water balance has finished moving water for the timestep.
        	// Overwrite what it has done so that we maintain the soil
        	// This should not be needed, especially after the evaporation params were set to zero
        	// but there are small blips that are best being smoothed out with a reset...
        	waterBalance.Reset();
        }
    }
}
```
      Manager ReadWTHFile
        FileName =
        PotEvapotranspiration = 0
        PotEvaporation = 0
        ActualEvaporation = 0
        Rain = 0
        DayLength = 0
```csharp
using Models.Soils;
using System.Diagnostics;
using System.Collections.Generic;
using System.IO;
using System.Data;
using System.Linq;
using System;
using Models.Interfaces;
using Models.Core;
using Models.Climate;
using Models.WaterModel;
using APSIM.Shared.Utilities;
namespace Models
{
    [Serializable]
    [System.Xml.Serialization.XmlInclude(typeof(Model))]
    public class Script : Model
    {
        [Link] Clock clock;
        [Link] Weather weather;
        [Link] Simulation simulation;
        [Link] CalcWTHFileName calcWTHFileName;
        [Link] WaterBalance waterBalance;
        
        private DataTable data;
        private List<DateTime> dates = new List<DateTime>();
        
        
        [Description("Name of .WTH file to read")]
        public string FileName { get; set; }
        
        [Description("Potential Evapotranspiration")]
        public double PotEvapotranspiration { get; set; }
        
        [Description("Potential soil evaporation")]
        public double PotEvaporation { get; set; }

        [Description("Actual soil evaporation")]
        public double ActualEvaporation { get; set; }
        
        [Description("Rainfall")]
        public double Rain { get; set; }
        
        [Description("Length of the day")]
        public double DayLength { get; set; }

        
        [EventSubscribe("StartOfSimulation")]
        private void OnStartOfSimulation(object sender, EventArgs e)
        {
        	// Ensure filename is relative to the directory where the .apsimx file is located.
            string fullFileName = Path.Combine(Path.GetDirectoryName(simulation.FileName),
                                               "WeatherData",
                                               calcWTHFileName.WTHFileName);
        
            // Read in data.
            data = DataTableUtilities.ReadDataTable(fullFileName, 
            										'\t',
            										0,
            										(i, word) =>
            {
            	if (i == 0)
            	{
            	    if (word.Length != 7)
            	    	throw new Exception($"Invalid date string: {word}");
            		int year = Convert.ToInt32(word.Substring(0, 4));
            		int dayOfYear = Convert.ToInt32(word.Substring(4, 3));
            		return new DateTime(year, 1, 1).AddDays(dayOfYear-1);
            	}
            	else
            		return Convert.ToDouble(word);
            });
            
            foreach (DataRow row in data.Rows)
                dates.Add(DateTime.Parse(row["Date"].ToString()));
        }


        [EventSubscribe("PreparingNewWeatherData")]
        private void OnPreparingNewWeatherData(object sender, EventArgs e)
        {
            // check to see if we have a row of data for today.
            int rowIndex = dates.IndexOf(clock.Today);
            if (rowIndex != -1)
            {
               //weather.Rain = Convert.ToDouble(data.Rows[rowIndex]["RAIN"]);  // set to zero as no water balance is needed, also avoid computing SnowCover...
               weather.Rain = 0.0;
               weather.MeanT = Convert.ToDouble(data.Rows[rowIndex]["T2M"]);
               weather.MaxT = Convert.ToDouble(data.Rows[rowIndex]["TMAX"]);
               weather.MinT = Convert.ToDouble(data.Rows[rowIndex]["TMIN"]);
               weather.Radn = Convert.ToDouble(data.Rows[rowIndex]["SRAD"]);
               PotEvapotranspiration = Convert.ToDouble(data.Rows[rowIndex]["EOAD"]);
               PotEvaporation = Convert.ToDouble(data.Rows[rowIndex]["ESP"]);
               //ActualEvaporation = Convert.ToDouble(data.Rows[rowIndex]["G"]) / 2465000.0;
               ActualEvaporation = 0.0;
               Rain = Convert.ToDouble(data.Rows[rowIndex]["RAIN"]);
               DayLength = Convert.ToDouble(data.Rows[rowIndex]["DAYLD"]);

               //PotEvapotranspiration = waterBalance.Eo;
               //PotEvaporation = waterBalance.Eos;
               //ActualEvaporation = waterBalance.Es;
            }
        }
    }
}
```
      Manager ReportHelper
```csharp
using Models.Soils;
using System.Diagnostics;
using System.Collections.Generic;
using System.IO;
using System.Data;
using System.Linq;
using System;
using Models.Interfaces;
using Models.Core;
using Models.Climate;
using Models.Soils.SoilTemp;
using APSIM.Shared.Utilities;
namespace Models
{
    [Serializable]
    [System.Xml.Serialization.XmlInclude(typeof(Model))]
    public class ReportHelperScript : Model
    {
        [Link] Clock clock;
        [Link] Physical physical;
        [Link] Simulation simulation;
        [Link] ISoilTemperature soilTemperature;
        
        private DataTable data;
        private List<DateTime> dates = new List<DateTime>();
        private DateTime startDate;
        private DateTime endDate;
        private string fileNamePattern;
        private StreamWriter writer;
        
        public double[] SLLT { get; set; }
        public double[] SLLB { get; set; }
        public double[] TSLD { get; set; }
        public double[] TSLX { get; set; }
        public double[] TSLN { get; set; }
        
        
        [EventSubscribe("StartOfSimulation")]
        private void OnStartOfSimulation(object sender, EventArgs e)
        {
        	SLLT = new double[physical.Thickness.Length+1];
        	SLLB = new double[physical.Thickness.Length+1];
        	TSLD = new double[physical.Thickness.Length+1];
        	TSLX = new double[physical.Thickness.Length+1];
        	TSLN = new double[physical.Thickness.Length+1];
        	SLLT[0] = 0;
        	SLLB[0] = 0;
        	for (int i = 0; i < physical.Thickness.Length; i++)
        	{
        		SLLT[i+1] = SLLB[i];
        		SLLB[i+1] = SLLT[i+1] + physical.Thickness[i]/10.0;
        	}
        	
        	// Determine the filename to write to.
			string[] words = simulation.Name.Replace("Experiment", "")
											 .Replace("Location", "")
											 .Replace("Soil", "_")
											 .Replace("LAI", "_")
											 .Replace("PAW", "_")
											 .Replace("Model", "_")
											 .Split("_");
			string location = words[0];
			string soil = words[1];
			double lai = Convert.ToDouble(words[2]);
			double paw = Convert.ToDouble(words[3]);
			string model = words[4];
			string fileName = $"SoilTemperature_AP_{model}_{location}_{soil}_L{lai}_AW{paw:0.00}.txt";
			string outputFolder = "Outputs";
			fileName = Path.Combine(Path.GetDirectoryName(simulation.FileName), outputFolder, fileName);
			
			// Open the file for writing.
			writer = new(fileName);
			writer.WriteLine("DATE\tSLLT\tSLLB\tTSLD\tTSLX\tTSLN");
		}
        
        [EventSubscribe("EndOfSimulation")]
        private void OnEndOfSimulation(object sender, EventArgs e)
        {
        	writer.Close();
        }
        
        [EventSubscribe("DoReportCalculations")]
        private void OnDoReportCalculations(object sender, EventArgs e)
        {
        	TSLD[0] = soilTemperature.AverageSoilSurfaceTemperature;
        	Array.Copy(soilTemperature.AverageSoilTemperature, 0, TSLD, 1, soilTemperature.AverageSoilTemperature.Length); 
        	
        	TSLX[0] = soilTemperature.MaximumSoilSurfaceTemperature;
        	Array.Copy(soilTemperature.MaximumSoilTemperature,  0, TSLX, 1, soilTemperature.MaximumSoilTemperature.Length); 
        	
        	TSLN[0] = soilTemperature.MinimumSoilSurfaceTemperature;
        	Array.Copy(soilTemperature.MinimumSoilTemperature,  0, TSLN, 1, soilTemperature.MinimumSoilTemperature.Length); 
        	
        	WriteCSVFile();
        }
        
        private void WriteCSVFile()
        {			
			for (int i = 0; i < SLLT.Length; i++)
			{
				string st = $"{clock.Today.ToString("yyyy-MM-dd")}\t{SLLT[i]}\t{SLLB[i]}\t{TSLD[i]:0.000000}\t{TSLX[i]:0.000000}\t{TSLN[i]:0.000000}";
				st = st.Replace("NaN", "na");
				writer.WriteLine(st);
			}
        }
    }
}
```
      Summary
      SoilArbitrator Soil Arbitrator
      MicroClimate: a_interception=0; b_interception=1; c_interception=0; d_interception=0; SoilHeatFluxFraction=0; MinimumHeightDiffForNewLayer=0; NightInterceptionFraction=0; ReferenceHeight=2
      Zone: Area=1; Slope=0; AspectAngle=0; Altitude=50
        Soil: Latitude=0; Longitude=0
          Physical
            Thickness  ParticleSizeSand  ParticleSizeSilt  ParticleSizeClay  Rocks  BD    AirDry  LL15   DUL    SAT    KS
            50         5                 65                50                0      1.3   0.1     0.228  0.385  0.481  25
            100        5                 65                50                0      1.3   0.1     0.228  0.385  0.481  25
            150        5                 65                50                0      1.3   0.1     0.249  0.406  0.482  25
            150        5                 65                50                0      1.35  0.1     0.249  0.406  0.465  25
            150        5                 65                50                0.213  1.35  0.05    0.249  0.406  0.465  100
            300        5                 65                50                0.213  1.35  0.05    0.308  0.456  0.468  100
            300        5                 65                50                0.213  1.4   0.05    0.207  0.341  0.452  100
            300        5                 65                50                0.213  1.4   0.05    0.243  0.365  0.455  100
            300        5                 65                50                0      1.4   0.05    0.259  0.361  0.457  100
            300        5                 65                50                0      1.4   0.05    0.259  0.361  0.457  100
            Rocks, ParticleSizeSand, ParticleSizeSilt source: Calculated
          WaterBalance SoilWater: SummerDate=1-Nov; SummerU=6; SummerCona=3.5; WinterDate=1-Apr; WinterU=6; WinterCona=2.5; DiffusConst=40; DiffusSlope=16; Salb=0.11; CN2Bare=73; CNRed=20; CNCov=0.8; PSIDul=-100; Thickness=[50, 100, 150, 150, 150, 300, 300, 300, 300, 300]; SWCON=[0.3, 0.3, 0.3, 0.3, 0.3, 0.3, 0.3, 0.3, 0.3, 0.3]
          Water: Thickness=[50, 100, 150, 150, 150, 300, 300, 300, 300, 300]; InitialPAWmm=0; RelativeTo=LL15; FilledFromTop=true
            InitialValues=[0.228, 0.228, 0.249, 0.249, 0.249, 0.308, 0.207, 0.243, 0.259, 0.259]
          Organic: FOMCNRatio=60; CarbonUnits=Total
            Thickness  Carbon  SoilCNRatio  FBiom  FInert  FOM
            50         1.75    14.5         0.04   0.4     0.294
            100        1.75    14.5         0.03   0.5     0.253
            150        1.6     14.5         0.02   0.5     0.188
            150        1.45    14.5         0.01   0.5     0.114
            150        1.45    14.5         0.01   0.9     0.069
            300        1.1     14.5         0.01   0.99    0.042
            300        0.65    14.5         0.01   0.99    0.025
            300        0.3     14.5         0.01   0.99    0.025
            300        0.1     14.5         0.01   0.99    0.025
            300        0.01    14.5         0.01   0.99    0.025
          Chemical: Thickness=[50, 100, 100, 150, 200, 200, 400, 300]; PH=[5.8, 5.7, 5.7, 5.9, 5.7, 5.7, 5.7, 5.7]; PHUnits=Water
          Nutrient
          SoilTemperature
          Solute NO3: InitialValuesUnits=kg/ha; WaterTableConcentration=0; D0=0; DepthConstant=0; MaxDepthSoluteAccessible=0; RunoffEffectivenessAtMovingSolute=0; MaxEffectiveRunoff=0
            Thickness  InitialValues  Exco  FIP
            50         0.1            0     1
            100        0.1            0     1
            100        0.1            0     1
            150        0.01           0     1
            200        0.01           0     1
            200        0.01           0     1
            400        0.01           0     1
            300        0.01           0     1
          Solute NH4: InitialValuesUnits=kg/ha; WaterTableConcentration=0; D0=0; DepthConstant=0; MaxDepthSoluteAccessible=0; RunoffEffectivenessAtMovingSolute=0; MaxEffectiveRunoff=0
            Thickness  InitialValues  Exco  FIP
            50         0.01           0     1
            100        0.01           0     1
            100        0.01           0     1
            150        0.01           0     1
            200        0.01           0     1
            200        0.01           0     1
            400        0.01           0     1
            300        0.01           0     1
          Solute Urea: same as Experiment.Factors.Permutation.Soil.SICL.NO3
        SurfaceOrganicMatter: InitialResidueName=Wheat; InitialResidueType=wheat; InitialResidueMass=0; InitialStandingFraction=0; InitialCPR=0; InitialCNR=80
        Report: EventNames=[Clock].DoReport
          VariableNames:
            [Clock].Today
            [Water].Volumetric[1]
            [Water].Volumetric[3]
            [Soil].SoilWater.SW[1]
            [Soil].SoilWater.SW[3]
            [Soil].SoilWater.Evaporation
            [ISoilTemperature].AverageSoilTemperature
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