Simulations: Version=57
  Memo TitlePage
    # Evaluation of simulations of multi-species pasture

    _Rogerio Cichota, Plant and Food Research, New Zealand_

    ##Preamble
    Pastoral systems in New Zealand and around the world rely on a few managed plant species. Generally the swards comprise a grass species and may contain companion plants, as well as weeds. Thus pastures are typically composed of multiple species that compete but may also complement each other.  A very common managed sward is the grass-legume mix, with ryegrass-white clover being the prototypical mixture for subtropical and temperate grasslands.  Such combination of species is very successful due to synegies between the two species, with complementary growth patterns and the N fixation capability of white-clover.  However, the traditional ryegrass-white clover mixture can be succeptible to drought, has a very seasonal growth pattern, and typically has high N content in the green biomass which can lead to high levels of urinary N excreted by animals, a major source of N losses from pastoral grazing systems.
    The limitations of the traditional binary mixed pasture have led to increased interest in the use of alternative forage species, such as forbs, and on increasing the number of species in the sward. The importance of plant species diversity for enhancing ecosystem function has been debated by ecologists for some time (refs). The benefits include increased total biomass production, greater yield stability, improved soil quality and protection, improved water and nutrient use, among others.  However, the addition of alternative species can change the pasture’s seasonal growth pattern and the pattern will change with time as some species tend to become dominant and others are less persistant.
    Quantifying the performance of these alternative species when used in mixed swards and under different management is still an issue that needs further study .  Considering the limitation in scope and environmental conditions that can covered by experimentation, modelling must be an integral part of studying alternative and diverse pastures.

    **Objective:** Assemble and test a few combination of forage plant species in multi-species swards.  This will include comparison against experimental data and sensitivity analyses using simulatiopn that include species with current available forage models.

    ## Generic background
  Replacements
    Plant RedClover: CropType=RedClover; IsEnding=false; DaysAfterEnding=0
      Memo GeneralDescription
        ## Presentation

        This model has been built using the Plant Modelling Framework (PMF) of [brown_plant_2014] to simulate the growth of red clover ( *Trifolium pratense* ) as a forage crop.  The model focus primarily on describing the vegetative growth, with a simplified account of the reproductive phase, without explicit considering flowers and seeds. The red clover model simulates the above ground plant structure, including the photosynthesis process, using the SimpleLeaf procedure of PMF, which does not consider explicitly leaf age or placement in the canopy.  The model describes a perennial crop, with phenology rewinding to the vegetative stage at the end of the reproductive phase.

        ##Inclusion in APSIM simulations
        To include red clover in a simulation the procedure is the same as any other APSIM crop:

         * - The red clover object can be dragged or copied from the Crop folder in the toolbox into a Field in your simulation;
         * - To become active and grow, the red clover crop needs to be sown using a manager script with a sowing rule. e.g.:
        <pre><code class='language-cs'>
         RedClover.Sow(cultivar: Colenso, population: 450, depth: 5, rowSpacing: 100);
        </code></pre>
        If a specified cultivar is not available, a fatal error will be thrown.

        ###Harvest and biomass removal
        Red clover biomass can be removed by raising one of the valid methods: Harvest, Cut, Graze, or Prune; this is done using a manager script, similarly to other crops.  The proportion of the biomass of each organ that is removed from the system and/or added to the residue pools may be specified; otherwise defaults will be used.  Note that the sum of fractions removed and added to residue should be <= 1.0.  To specify the proportions for removal in a manager script, use a RemovalFractions class as shown below:
        <pre><code class='language-cs'>
        [EventSubscribe("Commencing")]
        private void OnSimulationCommencing(object sender, EventArgs e)
        {
          RemoveFraction = new RemovalFractions(RedClover.Organs);
        }
        [EventSubscribe("DoManagement")]
        private void OnDoManagement(object sender, EventArgs e)
        {
          if (Clock.Today.Date == HarvestDate)
          {
            RemoveFraction.SetFractionToRemove("Leaf", 0.80);
            RemoveFraction.SetFractionToRemove("Stem", 0.50);
            RemoveFraction.SetFractionToResidue("leaf",0.05);
            RedClover.Harvest(RemoveFraction);
          }
        }
         </code></pre>
        The RemovalFractions class can be sent with Harvest, Cut, Graze, or Prune events. All parameters are optional, defaults are used whenever any value is not specified.

        ###Crop termination
        To fully terminate a crop the EndCrop event should be raised:
        <pre><code class='language-cs'>
         RedClover.EndCrop();
        </code></pre>
        Once a crop has been ended the field is open to be used by another APSIM plant model, or another red clover crop.  Note that ending red clover is not necessary before sowing another crop, competition for resources will take place between crops when there is more than one in the field.
      Phenology
        Memo Description
          The duration of each phenological phase in red clover is controlled either by the accumulation of thermal time or photoperiod.
        AirTemperatureFunction ThermalTime
          Memo Description
            The thermal time is used to control many of the phenological changes in red clover.  It is calculated using the daily average temperature and three parameters, or cardinal temperatures: minimum, maximum, and optimum.  Plant development accelerates as temperature increases from minimum to optimum and slows down after that, ceasing completely at maximum temperature.  There is little information about these thresholds for red clover, especially about their variation between cultivars. The minimum, or base, temperature seems to vary from -1.0 to 5oC ([HamptonEtAl1987]; [MonksEtAl2009]; [MootEtAll2000]). Even less data is found for the other parameters, and they are quite variable too; optimum temperature is around 25oC and 35oC for maximum temperature ([BlackEtAl2009Clovers]; [MonksEtAl2009]).
          XYPairs: X=[2, 25, 37]; Y=[0, 23, 0]
        PhotoperiodFunction Photoperiod: Twilight=-6; DayLength=0
        PhotoperiodDeltaFunction PhotoperiodVariation: Twilight=-6
        GerminatingPhase Germinating: Start=Sowing; End=Germination
          Memo Description
            Germination in most clover species is very variable (e.g. [HamptonEtAl1987]; [MurrayThesis2012]), with about 60-85% of seeds germinating for red clover. Temperatures between 5 and 20oC do not affect germination rate, but do slow it down ([HamptonEtAl1987]).  The model does not consider variable germination rate, thus the population should be adjusted by the user to account for less than 100% germination when sowing. Also, following default PMF behaviour, red clover germination will occur one day after sowing, provided that the amount of soil extractable water is greater than zero.
        EmergingPhase Emerging: ShootLag=50; ShootRate=15; Start=Germination; End=Emergence; TTForTimeStep=0
          Memo Description
            Red clover has small seeds and these need to be placed near the soil surface to emergence successfully. Best emergence rate occur when seeds are sown at depth of 5mm ([Hyde1950]; [MurrayAndClements1993]), and few plants will emerge from seeds deeper than 40mm.  Variations in germination rate due to depth are not currently simulated by the model, however the sowing depth does affect timing of emergence, in combination with temperature.  This is controlled by the parameter ShootRate, which is the shoot elongation rate as function of thermal time (mm/oCd).
            Emergence of red clover occur a few days after germination ([Hyde1950]; [MootEtAll2000]), but this is quite variable (taking 5-20 days).  Both temperature and depth of seed are important factors.  Thermal time for the emergence of red clover (cv. Huia and Nomad) has been reported as being approximately 150oCd ([MootEtAll2000]; [MurrayThesis2012]), and there seem to be no significant variations between NZ cultivars ([HamptonEtAl1987]).
          VariableReference ThermalTime: VariableName=[Phenology].ThermalTime
        GenericPhase Vegetative: Start=Emergence; End=Induction
          Memo Description
            During this phase, red clover plants allocates new biomass to only leaf+petiole, stems, and root+taproot organs. Initially, this phase starts when plants emerge, but it is also triggered as phenology resets after the end of the reproductive phase.  The vegetative phase ends when the inductive phase starts.
            Red clover is a long day species, with flowering starting in spring when day light is increasing ([Aitken1964flowering]; [BowleyEtAl1987red]; [Fagerberg1988Phenol]), and although temperature has a small effect on flowering date and intensity, red clover does not need vernalisation to start flower initiation.  Red clover plants can flower on the same year of planting, if that is done early enough in spring, but swards sown in later summer and autumn will not be developed enough to start flowering before the winter.  The model uses accumulation of days under favaourable conditions to trigger the change of phase from vegetative to inductive to ensure that flower is not triggered in autumn.
          Constant Target: FixedValue=500; Units=oCd
          VariableReference Progression: VariableName=[Phenology].ThermalTime
        GenericPhase Inductive: Start=Induction; End=Flowering
          Memo Description
            During this phase the red clover plants await for the environmental cue to start the reproductive growth.  Physiologic and metabolic processes remain the same as for the vegetative phase with plants allocating biomass to leaf+petiole, stems, and root+taproot organs.  As red clover requires long days for flowering, the trigger to end this phase is defined by the length of day, or photoperiod.  Cultivars are often grouped by flowering date, as in early, intermediate, or late flowering; thus different cultivars require different photoperiods to trigger flower initiation ([Aitken1964flowering]; [Fagerberg1988Phenol]; [ClaydonEtAl1993colenso]).  The variability in response of induction to environmental condition is considerably in red clover and not well understood (e.g. [JonesAndThomas1993gibberelins]; [FanEtAl2004cutting]).  In most stands at least some plants will show reproductive growth, but often not all the plants in the stand.  This, and genetic variability, results in considerable variation in flower initiation is any given sward.  As the model attempts to simulated an average plant, such variations are not accounted for.
          Constant Target: FixedValue=10; Units=days
          LessThanFunction Progression
            VariableReference PhotoperiodVariation: VariableName=[Phenology].PhotoperiodVariation
            Constant Zero: FixedValue=0
            Constant NoProgression: FixedValue=0
            LinearInterpolationFunction SomeProgression: XProperty=[Phenology].Photoperiod
              XYPairs: X=[10, 11, 12, 13]; Y=[0, 0, 1, 1]
        GenericPhase Reproductive: Start=Flowering; End=Ripening
          Memo Description
            During this phase the plant is partitioning biomass to all organs, including reproductive organs (peduncles, inflorescence, and seeds).  The current model does not describe the development of flower and seeds explicitly, only a generic organ referred to as *inflorescence* is defined.  The reason for this is because there isn't enough data to devise and parameterise these processes while there is considerable variability in the phenology of reproduction of red clover.  Often there are seeds maturing while new flowers are still being initiated over summer (e.g. [Aitken1964flowering]; [CliffordAndAnderson1980seed]).  Also due to their similarities and the fact that a population is describe in the model (instead of single plants), peduncles and petioles are simulated as a single organ.
            Flower emergence starts in spring when day light is increasing, heading peaks in summer, and ceases in early autumn ([Aitken1964flowering]; [CliffordAndAnderson1980seed]; [ClaydonEtAl1993colenso]).  The actual periods vary for different cultivars, with early flowering ones having typically longer reproductive phases.  The models uses the accumulation of degrees-day and photoperiod to simulate the progression and to trigger the end of this phase.
            Management practices, such as applying N fertiliser, irrigation, and defoliations, may have an impact on flower and seed production ([Brougham1959graze]; [CliffordAndAnderson1980seed]; [FanEtAl2004cutting]), but there is large variation in the responses, depending on the cultivars as well as the extent and timing of the intervention.  Currently, the model does not account for the effect of this practices explicitly, although it is expected that some effects are captured by changes in biomass allocation caused by actions such as irrigation or defoliation.
          Constant Target: FixedValue=2500; Units=oCd
          VariableReference Progression: VariableName=[Phenology].ThermalTime
        GotoPhase: Start=Ripening; End=Ripening; PhaseNameToGoto=Vegetative
          Memo Description
            At the end of reproductive phase, phenology is reset to 'Vegetative'.
      OrganArbitrator Arbitrator
        RelativeAllocation NArbitrator
          Memo Description
            Controls the allocation of N to each of the plant's organs. Partition is based on:
        RelativeAllocation DMArbitrator
          Memo Description
            Controls the allocation of biomass to each of the plant's organs. Partition is based on:
      SimpleLeaf Leaf: CohortsInitialised=false; Albedo=0.18; Gsmax350=0.015; R50=150; MicroClimatePresent=true; LeafInitialisationStage=Emergence
        zero: ApicalCohortNo, InitialisedCohortNo, TipsAtEmergence, CohortsAtInitialisation, AppearedCohortNo, PlantAppearedLeafNo, Height, BaseHeight, Width, FRGR, PotentialEP, WaterDemand, KDead, LAIDead
        Memo Description
          __Note:__ this organ represents all the leaves in the plant, it has only a basic representation of canopy structure and does not distinguish leaves for ages or placement in the canopy.
        MultiplyFunction InitialWtFunction
          Memo Description
            It is assumed that approximately 1/3 of the seed biomass is allocated to shoot upon emergence.  The weight of red clover seeds varies between 2.0 and 4.5 g/1000 seeds ([ClaydonEtAlcvColenso]; [MurrayThesis2012]).
          Constant InitialOrganWt: FixedValue=0.0002; Units=g/plant
          VariableReference Population: VariableName=[Plant].Population
        Constant CarbonConcentration: FixedValue=0.4
          Memo Description
            This is the default value for PMF.
        Constant MinimumNConc: FixedValue=0.0275; Units=gN/gDM
          Memo Description
            This is the lowest N concentration that leaves can have and still be able to grow.  It represents the N content for structural tissues and is the concentration of dead material.  Specific values for red clover were not found, but typical values for dead clover leaves are around 1.5-3.0% ([Brougham1958_LeafDev]; [WilmanAndMehdi1984]; [WarembourgEtAl1997]).
        Constant CriticalNConc: FixedValue=0.05; Units=gN/gDM
          Memo Description
            This is the N concentration that the organ must have to perform its functions without limitations; a growth penalty will occurr if N level fall below this threshold.  No values have been clearly identifyied for this parameter in red clover, thus typical values for non-stressed plants are used instead, these vary between 2.5 and 3.5% ([HeichelEtAl1985]; [WiersmaEtAl1998_RedCloverYeild]; [HakalaAndJauhiainen2007]).
        Constant MaximumNConc: FixedValue=0.06; Units=gN/gDM
          Memo Description
            This represents the maximum limit for N concentration in leaves.  The N content above CriticalNConc is not essential for growth and can be remobilised for new growth when uptake is insuficient.  Published data suggest that maximum N concentration levels for red clover leaves are about 4.0-5.0% ([HeichelEtAl1985]; [WiersmaEtAl1998_RedCloverYeild]; [HakalaAndJauhiainen2007]).
        Constant NitrogenDemandSwitch: FixedValue=1
        RUEModel Photosynthesis
          Memo Description
            There has been a number of studies on the photosynthetesis rate of red clover (e.g. [JoggiEtAl1983_RedClover]; [denHollanderEtAl2007]; [RiesingerEtAl2009rue]), including its variation due to water defficiency, nutrition, and shading. The values and trends for CO2 assimilation rates are generally consistent across the various studies and these have been used to help defining the limiting factor for photoynthesis in the model. Reported values RUE for red clover are in general around 2.5-3.0 g DM/MJ ([RiesingerEtAl2009rue]; [TorssellEtAl2007swardModel]).
          Constant RUE: FixedValue=1.5; Units=g/MJ
          RUECO2Function FCO2: PhotosyntheticPathway=C3
          LinearInterpolationFunction FN: XProperty=[Leaf].FNmetabolic
            XYPairs: X=[0, 0.5, 1, 1.5]; Y=[0, 0.5, 1, 1]
          WeightedTemperatureFunction FT: MaximumTemperatureWeighting=0.75
            XYPairs: X=[0, 2, 7.5, 15, 18, 26, 33, 35]; Y=[0, 0, 0.15, 0.7, 1, 1, 0.1, 0]
          LinearInterpolationFunction FW: XProperty=[Leaf].Fw
            XYPairs: X=[0, 0.5, 0.8, 1.5]; Y=[0, 0.6, 1, 1]
          LinearInterpolationFunction FVPD: XProperty=[Leaf].Photosynthesis.VPD
            XYPairs: X=[0, 10, 12.5, 40]; Y=[1, 1, 0.95, 0]
          VariableReference RadnInt: VariableName=[Leaf].RadIntTot
        DivideFunction FRGRFunction
          Memo Description
            This parameter represents the Fractional Growth Rate.  It is needed by the MicroClimate model, where it is used to compute the effect of growth rate on transpiration.
          VariableReference Photosynthesis: VariableName=[Leaf].Photosynthesis
          MultiplyFunction PotentialPhotosynthesis
            VariableReference RUE: VariableName=[Leaf].Photosynthesis.RUE
            MaximumFunction Radiation
              VariableReference RadnInt: VariableName=[Leaf].RadIntTot
              Constant MinRadn: FixedValue=1e-05
        Constant StomatalConductanceCO2Modifier: FixedValue=1
        PhaseLookup TargetBiomassProportion
          Memo note
            This is the 'ideal' proportion of biomass for this organ within the above ground biomass (not total).
          PhaseLookupValue VegetativeInductive: Start=Emergence; End=Flowering
            Constant TargetProportion: FixedValue=0.5; Units=g/g
          PhaseLookupValue Reproductive: Start=Flowering; End=Ripening
            MultiplyFunction TargetProportion
              VariableReference BaseProportion
                VariableName=[Leaf].TargetBiomassProportion.VegetativeInductive.TargetProportion
              SubtractFunction InflorescenceFactor
                Constant One: FixedValue=1
                MultiplyFunction ReductionDueFlowering
                  Constant MaximumReductionInFLeaf: FixedValue=0.5; Units=g/g
                    Memo note
                      This is the maximum relative reduction of leaf proportion, reached when inflorescence proportion is at its maximum.
                  VariableReference FloweringIntensity
                    VariableName=[Inflorescence].TargetBiomassProportion.Reproductive.TargetProportion.PhotoPeriodFactor
        BiomassDemand DMDemands
          MultiplyFunction Structural
            Constant StructuralFraction: FixedValue=0.95; Units=g/g
              Memo Description
                This is the default value for PMF.
            MaximumFunction DMDemandFunction
              Memo Description
                The DM demand as defined here is a weighting factor, actual values are computed by the OrganArbitrator. The value is computed as the sum of a base demand, simply based on the potential partition according to the target proportions, and a deficit demand, which diverts more biomass to organs that deviate from their targeted proportions. This ensures faster regrowth of above ground organs after defoliation. The target proportion may vary with growth stage and environmental conditions.
              Constant Zero: FixedValue=0
              AddFunction OrganDMDemand
                Memo Description: same as Replacements.RedClover.Leaf.DMDemands.Structural.DMDemandFunction.Description
                PartitionFractionDemandFunction BaseBiomassDemand
                  MultiplyFunction PartitionFraction
                    VariableReference TargetAboveGroundProp: VariableName=[TargetAboveGroundFraction]
                    VariableReference TargetOrganProp: VariableName=[Leaf].TargetBiomassProportion
                SubtractFunction DeficitBiomassDemand
                  MultiplyFunction TargetBiomass
                    VariableReference TargetAboveGroundProp: VariableName=[TargetAboveGroundFraction]
                    VariableReference TargetOrganProp: VariableName=[Leaf].TargetBiomassProportion
                    VariableReference TotalBiomass: VariableName=[TotalLive].Wt
                  VariableReference CurrentBiomass: VariableName=[Leaf].Live.Wt
          Constant Metabolic: FixedValue=0
          StorageDMDemandFunction Storage
            SubtractFunction StorageFraction
              Constant One: FixedValue=1
              VariableReference StructuralFraction: VariableName=[Leaf].DMDemands.Structural.StructuralFraction
        BiomassDemand NDemands
          MultiplyFunction Structural
            VariableReference MinNconc: VariableName=[Leaf].MinimumNConc
            VariableReference PotentialDMAllocation: VariableName=[Leaf].potentialDMAllocation.Structural
          MultiplyFunction Metabolic
            SubtractFunction MetabolicNconc
              VariableReference CritNconc: VariableName=[Leaf].CriticalNConc
              VariableReference MinNconc: VariableName=[Leaf].MinimumNConc
            VariableReference PotentialDMAllocation: VariableName=[Leaf].potentialDMAllocation.Structural
          StorageNDemandFunction Storage
            VariableReference NitrogenDemandSwitch: VariableName=[Leaf].NitrogenDemandSwitch
            VariableReference MaxNconc: VariableName=[Leaf].MaximumNConc
        Constant DMConversionEfficiency: FixedValue=1; Units=0-1
          Memo Description
            This is the default value for PMF.
        Constant MaintenanceRespirationFunction: FixedValue=0; Units=0-1
          Memo Description
            This is the default value for PMF.
        MultiplyFunction LAIFunction
          Memo Description
            The leaf area index (LAI) for green leaves of red clover is defined based on their biomass and specific leaf area (SLA). The value for SLA is currently assumed to be constant, although factors such as age and environmental conditions (shading and nutrient status) have some effect on this value.  Variations due to age can ignored because the model simulates a generic population, and thus it represents leaves of varing ages at the same time.  The effects of shading and nutrition, as well as water deficiency, are only manifested when these conditions are mantained for some time, the model may have to be revised in the future to account for some of these factors, prefereably with some experimental data.  Available data suggest that SLA of red clover varies approximately between 0.020 and 0.035 m2/g, with some variation due to cultivar; mean values for adult plants are around 0.030 m2/g ([denHollanderEtAl2007]; [MurrayThesis2012]; [MasonEtAl2016_LeafEcon]).
          Constant SpecificLeafArea: FixedValue=0.03; Units=m^2/g
          VariableReference LiveLeafWeight: VariableName=[Leaf].Live.Wt
        MultiplyFunction LaiDeadFunction
          Memo Description
            No specific data for area of dead leaves were found for red clover. The value of SLA is thus assumed to be the same as that of live leaves (this is consistent for the model as very little biomass reallocation of biomass occurs during senescence).
          VariableReference SpecificLeafArea: VariableName=[Leaf].LAIFunction.SpecificLeafArea
          VariableReference DeadLeafWeight: VariableName=[Leaf].Dead.Wt
        Constant ExtinctionCoefficientFunction: FixedValue=0.9; Units=0-1
          Memo Description
            Red clover has a high capacity for light interception due to the near horizontal placement of its leaves. Values for the light extinction coefficient reported in the literature are sparse and quite variable, depending on what light fraction they are related to and whether plants are considered in mixed swards or as separated plants; these vary from 0.80 up to 1.10 ([JoggiEtAl1983_RedClover]; [denHollanderEtAl2007]).
        Constant ExtinctionCoefficientDead: FixedValue=0.1; Units=0-1
        LinearInterpolationFunction HeightFunction: XProperty=[Leaf].Live.Wt
          Memo Description
            The average height of red clover plants is assumed to be a simple function of leaf biomass.  Generically the stem length and morphology (degree of prostration) determines the height of the plant, but leaves are used because the growth of stems and leaves are closely linked. Inflorescence are ignored for the computation of height.  The height of adult plants varies with cultivar, typically between 50 and 80 cm ([JoggiEtAl1983_RedClover]; [denHollanderEtAl2007]; [ChmelikovaEtAl2015]).  The inflorescence is typically one third higher than the leaves. Sward population and competition with other plant may have an influence on the relationship between biomass and height, but this is not currently accounted for by the model.
          XYPairs: X=[10, 50, 100, 350, 500]; Y=[25, 250, 350, 450, 500]
        MultiplyFunction SenescenceRate
          Memo Description
            Red clover has, similar to otehr clovers, a relatively high rate of leaf senescence, with leaf area estabilising when LAI reaches about 5.0 m2/m2 ([Brougham1958_LeafDev]; [JoggiEtAl1983_RedClover]; [MurrayThesis2012]).  Generic relationships to enviromental factors, such as temperature and soil moisture, are assumed based on other plant models.
          Constant ReferenceRate: FixedValue=0.05; Units=/day
          LinearInterpolationFunction StageFactor: XProperty=[Phenology].Stage
            XYPairs: X=[3, 4, 5, 6]; Y=[0.5, 1, 1, 1]
          LinearInterpolationFunction CoverFactor: XProperty=[Leaf].LAI
            XYPairs: X=[0, 2, 4, 5, 7]; Y=[0, 0.1, 0.5, 0.5, 1.5]
          WeightedTemperatureFunction TemperatureFactor: MaximumTemperatureWeighting=0.5
            XYPairs: X=[-20, -5, 0, 5, 17, 28, 37.5]; Y=[1.5, 0.25, 0.1, 0.1, 1, 1, 1.5]
          LinearInterpolationFunction SoilMoistureFactor: XProperty=[Leaf].Fw
            XYPairs: X=[0, 0.5, 1]; Y=[2, 1, 1]
        MultiplyFunction DetachmentRateFunction
          Memo Description
            A generic relationship between detachment and soil moisture is assumed.  It implies that under dry conditions the detachment rate decreases due to the lower level of activity of decomposing microorganisms.
          Constant ReferenceRate: FixedValue=0.1; Units=/day
          LinearInterpolationFunction SoilMoistureFactor: XProperty=[Leaf].Fw
            XYPairs: X=[0, 0.5, 1]; Y=[0.5, 0.5, 1]
        Constant DMRetranslocationFactor: FixedValue=0; Units=/day
        Constant DMReallocationFactor: FixedValue=1
          Memo Description
            This is the default value for PMF.
        Constant NReallocationFactor: FixedValue=1; Units=/day
          Memo Description
            This is the default value for PMF.
        MultiplyFunction NRetranslocationFactor
          Memo Description
            A generic relationship between retranslocation and environmental factors is assumed, this is done so that retranslocation is enhanced when conditions are good for growth. Retranslocation from leaves is enable any time.
          Constant ReferenceRate: FixedValue=0.1; Units=/day
          WeightedTemperatureFunction TemperatureFactor: MaximumTemperatureWeighting=0.5
            XYPairs: X=[0, 2, 7.5, 15, 18, 26, 33, 35]; Y=[0, 0, 0.15, 0.7, 1, 1, 0.1, 0]
          LinearInterpolationFunction SoilMoistureFactor: XProperty=[Leaf].Fw
            XYPairs: X=[0, 0.5, 1]; Y=[0, 1, 1]
        Constant RemobilisationCost: FixedValue=0
          Memo Description
            This is the default value for PMF.
        BiomassRemoval BiomassRemovalDefaults
          OrganBiomassRemovalType Cut: FractionLiveToRemove=0.65; FractionDeadToRemove=0.52; FractionLiveToResidue=0.15; FractionDeadToResidue=0.13
          OrganBiomassRemovalType Graze: FractionLiveToRemove=0.6; FractionDeadToRemove=0.6; FractionLiveToResidue=0.25; FractionDeadToResidue=0.25
          OrganBiomassRemovalType Harvest: FractionLiveToRemove=0.06; FractionDeadToRemove=0.07; FractionLiveToResidue=0.24; FractionDeadToResidue=0.28
          OrganBiomassRemovalType Prune: FractionLiveToRemove=0; FractionDeadToRemove=0; FractionLiveToResidue=0; FractionDeadToResidue=0
      GenericOrgan Petiole
        Memo Description
          __Note:__ this represents all the petioles as well as the flower peduncles in the plant, without distinction between ages or placement in the canopy.
        MultiplyFunction InitialWtFunction
          Constant InitialOrganWt: FixedValue=3e-05; Units=g/plant
          VariableReference Population: VariableName=[Plant].Population
        Constant CarbonConcentration: FixedValue=0.4
        Constant MinimumNConc: FixedValue=0.025; Units=gN/gDM
        Constant CriticalNConc: FixedValue=0.0275; Units=gN/gDM
        Constant MaximumNConc: FixedValue=0.03; Units=gN/gDM
        Constant NitrogenDemandSwitch: FixedValue=1
        PhaseLookup TargetBiomassProportion
          Memo note
            This is the 'ideal' proportion of biomass for this organ within the above ground biomass (not total).
          PhaseLookupValue VegetativeInductive: Start=Emergence; End=Flowering
            MultiplyFunction TargetProportion
              Constant ProportionToLeaves: FixedValue=0.5; Units=g/g
              VariableReference TargetLeafProportion: VariableName=[Leaf].TargetBiomassProportion
          PhaseLookupValue Reproductive: Start=Flowering; End=Ripening
            AddFunction TargetProportion
              MultiplyFunction TargetFromLeaf
                VariableReference ProportionToLeaves
                  VariableName=[Petiole].TargetBiomassProportion.VegetativeInductive.TargetProportion.ProportionToLeaves
                VariableReference TargetLeafProportion: VariableName=[Leaf].TargetBiomassProportion
              MultiplyFunction TargetFromInflorescence
                Constant ProportionToInflorescence: FixedValue=0.33; Units=g/g
                VariableReference TargetInflorescenceProportion: VariableName=[Inflorescence].TargetBiomassProportion
        BiomassDemand DMDemands
          MultiplyFunction Structural
            Constant StructuralFraction: FixedValue=1; Units=g/g
            MaximumFunction DMDemandFunction
              Memo Description: same as Replacements.RedClover.Leaf.DMDemands.Structural.DMDemandFunction.Description
              Constant Zero: FixedValue=0
              AddFunction OrganDMDemand
                PartitionFractionDemandFunction BaseBiomassDemand
                  MultiplyFunction PartitionFraction
                    VariableReference TargetAboveGroundProp: VariableName=[TargetAboveGroundFraction]
                    VariableReference TargetOrganProp: VariableName=[Petiole].TargetBiomassProportion
                SubtractFunction DeficitBiomassDemand
                  MultiplyFunction TargetBiomass
                    VariableReference TargetAboveGroundProp: VariableName=[TargetAboveGroundFraction]
                    VariableReference TargetOrganProp: VariableName=[Petiole].TargetBiomassProportion
                    VariableReference TotalBiomass: VariableName=[TotalLive].Wt
                  VariableReference CurrentBiomass: VariableName=[Petiole].Live.Wt
          Constant Metabolic: FixedValue=0
          StorageDMDemandFunction Storage
            SubtractFunction StorageFraction
              Constant One: FixedValue=1
              VariableReference StructuralFraction: VariableName=[Petiole].DMDemands.Structural.StructuralFraction
        BiomassDemand NDemands
          MultiplyFunction Structural
            VariableReference MinNconc: VariableName=[Petiole].MinimumNConc
            VariableReference PotentialDMAllocation: VariableName=[Petiole].potentialDMAllocation.Structural
          MultiplyFunction Metabolic
            SubtractFunction MetabolicNconc
              VariableReference CritNconc: VariableName=[Petiole].CriticalNConc
              VariableReference MinNconc: VariableName=[Petiole].MinimumNConc
            VariableReference PotentialDMAllocation: VariableName=[Petiole].potentialDMAllocation.Structural
          StorageNDemandFunction Storage
            VariableReference NitrogenDemandSwitch: VariableName=[Petiole].NitrogenDemandSwitch
            VariableReference MaxNconc: VariableName=[Petiole].MaximumNConc
        Constant DMConversionEfficiency: FixedValue=1; Units=0-1
        Constant MaintenanceRespirationFunction: FixedValue=0; Units=0-1
        MultiplyFunction SenescenceRate
          Memo Description
            The reference senescence rate is adjusted using generic relationships to environmental factors, such as temperature and soil moisture.  These are based on general knowledge from other plant models.
          VariableReference ReferenceRate: VariableName=[Leaf].SenescenceRate.ReferenceRate
          LinearInterpolationFunction StageFactor: XProperty=[Phenology].Stage
            XYPairs: X=[3, 4, 5.5, 5.8, 6]; Y=[0.5, 1, 1, 1.5, 1.5]
          LinearInterpolationFunction CoverFactor: XProperty=[Leaf].LAI
            XYPairs: X=[0, 2, 4, 5, 7]; Y=[0, 0.1, 0.5, 0.5, 1.5]
          WeightedTemperatureFunction TemperatureFactor: MaximumTemperatureWeighting=0.5
            XYPairs: X=[-20, -5, 0, 5, 17, 28, 37.5]; Y=[1.5, 0.25, 0.1, 0.1, 1, 1, 1.5]
          LinearInterpolationFunction SoilMoistureFactor: XProperty=[Leaf].Fw
            XYPairs: X=[0, 0.5, 1]; Y=[2, 1, 1]
        MultiplyFunction DetachmentRateFunction
          Memo Description
            A generic relationship between detachment and soil moisture is assumed.  It implies that under dry conditions the detachment rate decreases due to the lower level of activity of decomposing microorganisms.
          Constant ReferenceRate: FixedValue=0.1; Units=/day
          LinearInterpolationFunction SoilMoistureFactor: XProperty=[Leaf].Fw
            XYPairs: X=[0, 0.5, 0.75, 1]; Y=[0.1, 0.1, 0.25, 1]
        Constant DMRetranslocationFactor: FixedValue=0; Units=/day
        Constant DMReallocationFactor: FixedValue=0
        Constant NRetranslocationFactor: FixedValue=0.05; Units=/day
        Constant NReallocationFactor: FixedValue=1; Units=/day
        RetranslocateNonStructural RetranslocateNitrogen
        Constant RemobilisationCost: FixedValue=0
        BiomassRemoval BiomassRemovalDefaults
          OrganBiomassRemovalType Cut: FractionLiveToRemove=0.65; FractionDeadToRemove=0.52; FractionLiveToResidue=0.15; FractionDeadToResidue=0.13
          OrganBiomassRemovalType Graze: FractionLiveToRemove=0.6; FractionDeadToRemove=0.6; FractionLiveToResidue=0.25; FractionDeadToResidue=0.25
          OrganBiomassRemovalType Harvest: FractionLiveToRemove=0.08; FractionDeadToRemove=0.09; FractionLiveToResidue=0.32; FractionDeadToResidue=0.36
          OrganBiomassRemovalType Prune: FractionLiveToRemove=0; FractionDeadToRemove=0; FractionLiveToResidue=0; FractionDeadToResidue=0
      GenericOrgan Stem
        Memo Description
          __Note:__ this represents all the stems in the plant, without distinction between ages or placement in the canopy.
        MultiplyFunction InitialWtFunction
          Constant InitialOrganWt: FixedValue=2e-05; Units=g/plant
          VariableReference Population: VariableName=[Plant].Population
        Constant CarbonConcentration: FixedValue=0.4
        Constant MinimumNConc: FixedValue=0.025; Units=gN/gDM
        Constant CriticalNConc: FixedValue=0.03; Units=gN/gDM
        Constant MaximumNConc: FixedValue=0.045; Units=gN/gDM
        Constant NitrogenDemandSwitch: FixedValue=1
        PhaseLookup TargetBiomassProportion
          Memo note
            This is the 'ideal' proportion of biomass for this organ within the above ground biomass (not total).
          PhaseLookupValue AllPhases: Start=Emergence; End=Ripening
            SubtractFunction TargetProportion
              Constant One: FixedValue=1
              VariableReference TargetLeafProportion: VariableName=[Leaf].TargetBiomassProportion
              VariableReference TargetPetioleProportion: VariableName=[Petiole].TargetBiomassProportion
              VariableReference TargetInflorescenceProportion: VariableName=[Inflorescence].TargetBiomassProportion
        BiomassDemand DMDemands
          MultiplyFunction Structural
            Constant StructuralFraction: FixedValue=0.85; Units=g/g
            MaximumFunction DMDemandFunction
              Memo Description: same as Replacements.RedClover.Leaf.DMDemands.Structural.DMDemandFunction.Description
              Constant Zero: FixedValue=0
              AddFunction OrganDMDemand
                PartitionFractionDemandFunction BaseBiomassDemand
                  MultiplyFunction PartitionFraction
                    VariableReference TargetAboveGroundProp: VariableName=[TargetAboveGroundFraction]
                    VariableReference TargetOrganProp: VariableName=[Stem].TargetBiomassProportion
                SubtractFunction DeficitBiomassDemand
                  MultiplyFunction TargetBiomass
                    VariableReference TargetAboveGroundProp: VariableName=[TargetAboveGroundFraction]
                    VariableReference TargetOrganProp: VariableName=[Stem].TargetBiomassProportion
                    VariableReference TotalBiomass: VariableName=[TotalLive].Wt
                  VariableReference CurrentBiomass: VariableName=[Stem].Live.Wt
          MultiplyFunction Metabolic
            Constant MetabolicFraction: FixedValue=0; Units=g/g
            VariableReference DMDemandFunction: VariableName=[Stem].DMDemands.Structural.DMDemandFunction
          StorageDMDemandFunction Storage
            SubtractFunction StorageFraction
              Constant One: FixedValue=1
              VariableReference StructuralFraction: VariableName=[Stem].DMDemands.Structural.StructuralFraction
              VariableReference MetabolicFraction: VariableName=[Stem].DMDemands.Metabolic.MetabolicFraction
        BiomassDemand NDemands
          MultiplyFunction Structural
            VariableReference MinNconc: VariableName=[Stem].MinimumNConc
            VariableReference PotentialDMAllocation: VariableName=[Stem].potentialDMAllocation.Structural
          MultiplyFunction Metabolic
            SubtractFunction MetabolicNconc
              VariableReference CritNconc: VariableName=[Stem].CriticalNConc
              VariableReference MinNconc: VariableName=[Stem].MinimumNConc
            VariableReference PotentialDMAllocation: VariableName=[Stem].potentialDMAllocation.Structural
          StorageNDemandFunction Storage
            VariableReference NitrogenDemandSwitch: VariableName=[Stem].NitrogenDemandSwitch
            VariableReference MaxNconc: VariableName=[Stem].MaximumNConc
        Constant DMConversionEfficiency: FixedValue=1; Units=0-1
        Constant MaintenanceRespirationFunction: FixedValue=0; Units=0-1
        MultiplyFunction SenescenceRate
          Memo Description
            The reference senescence rate is adjusted using generic relationships to environmental factors, such as temperature and soil moisture.  These are based on general knowledge from other plant models.
          Constant ReferenceRate: FixedValue=0.01; Units=/day
          LinearInterpolationFunction StageFactor: XProperty=[Phenology].Stage
            XYPairs: X=[3, 4, 6]; Y=[0.5, 1, 1]
          WeightedTemperatureFunction TemperatureFactor: MaximumTemperatureWeighting=0.5
            XYPairs: X=[-20, -5, 0, 5, 17, 30, 37.5]; Y=[1.5, 0.25, 0.1, 0.1, 1, 1, 1.25]
          LinearInterpolationFunction SoilMoistureFactor: XProperty=[Leaf].Fw
            XYPairs: X=[0, 0.5, 1]; Y=[2, 1, 1]
        MultiplyFunction DetachmentRateFunction
          Memo Description
            A generic relationship between detachment and soil moisture is assumed.  It implies that under dry conditions the detachment rate decreases due to the lower level of activity of decomposing microorganisms.
          Constant ReferenceRate: FixedValue=0.05; Units=/day
          LinearInterpolationFunction SoilMoistureFactor: XProperty=[Leaf].Fw
            XYPairs: X=[0, 0.5, 0.75, 1]; Y=[0.1, 0.1, 0.25, 1]
        MultiplyFunction DMRetranslocationFactor
          Memo Description
            A generic relationship between retranslocation and environmental factors is assumed, this is done so that retranslocation is enhanced when conditions are good for growth. Plus retranslocation is only allowed when days are increasing, thus helping growth in spring and allowing for some replenishing in late summer and autumn.
          Constant ReferenceRate: FixedValue=0.05; Units=/day
          VariableReference TemperatureFactor: VariableName=[Leaf].NRetranslocationFactor.TemperatureFactor
          LinearInterpolationFunction SoilMoistureFactor: XProperty=[Leaf].Fw
            XYPairs: X=[0, 0.5, 1]; Y=[0, 1, 1]
          LessThanFunction PhotoPeriodFactor
            VariableReference PhotoperiodVariation: VariableName=[Phenology].PhotoperiodVariation
            Constant Zero: FixedValue=0
            Constant BaseFactor: FixedValue=0.01
            LinearInterpolationFunction VariableFactor: XProperty=[Phenology].PhotoperiodVariation
              XYPairs: X=[-0.075, -0.05, -0.03, -0.01, 0]; Y=[1, 1, 0.75, 0.1, 0.01]
        Constant DMReallocationFactor: FixedValue=1
        MultiplyFunction NRetranslocationFactor
          Memo Description
            A generic relationship between retranslocation and environmental factors is assumed, this is done so that retranslocation is enhanced when conditions are good for growth. Plus retranslocation is only allowed when days are increasing, thus helping growth in spring and allowing for some replenishing in late summer and autumn.
          Constant ReferenceRate: FixedValue=0.1; Units=/day
          VariableReference TemperatureFactor: VariableName=[Leaf].NRetranslocationFactor.TemperatureFactor
          LinearInterpolationFunction SoilMoistureFactor: XProperty=[Leaf].Fw
            XYPairs: X=[0, 0.5, 1]; Y=[0, 1, 1]
          VariableReference PhotoPeriodFactor: VariableName=[Stem].DMRetranslocationFactor.PhotoPeriodFactor
        Constant NReallocationFactor: FixedValue=1; Units=/day
        Constant RemobilisationCost: FixedValue=0
        RetranslocateNonStructural RetranslocateNitrogen
        BiomassRemoval BiomassRemovalDefaults
          OrganBiomassRemovalType Cut: FractionLiveToRemove=0.68; FractionDeadToRemove=0.55; FractionLiveToResidue=0.07; FractionDeadToResidue=0.05
          OrganBiomassRemovalType Graze: FractionLiveToRemove=0.45; FractionDeadToRemove=0.45; FractionLiveToResidue=0.15; FractionDeadToResidue=0.15
          OrganBiomassRemovalType Harvest: FractionLiveToRemove=0.03; FractionDeadToRemove=0.04; FractionLiveToResidue=0.12; FractionDeadToResidue=0.14
          OrganBiomassRemovalType Prune: FractionLiveToRemove=0; FractionDeadToRemove=0; FractionLiveToResidue=0; FractionDeadToResidue=0
      GenericOrgan Inflorescence
        Memo Description
          __Note:__ this represents all the reproductive parts of the plant, flowers, pods, seed, etc. No distinction is made between ages or placement in the canopy.
        Constant InitialWtFunction: FixedValue=0; Units=g/m^2
        Constant CarbonConcentration: FixedValue=0.4
        LinearInterpolationFunction MinimumNConc: XProperty=[Phenology].Reproductive.FractionComplete
          Memo Description
            The N concentration in the inflorescence of is relatively low compared to other organs (typical values about 2.0%), but the seed N content is considerably higher (about 4.5%).  The model currently does not separate inflorescence from seeds, thus the N thresholds are set to vary over time to account for the fact that the proportion of seed increases during the reproductive phase.
          XYPairs: X=[0, 0.1, 0.5, 0.75, 1]; Y=[0.025, 0.03, 0.04, 0.045, 0.045]
        LinearInterpolationFunction CriticalNConc: XProperty=[Phenology].Reproductive.FractionComplete
          XYPairs: X=[0, 0.1, 0.5, 0.75, 1]; Y=[0.025, 0.03, 0.04, 0.045, 0.045]
        LinearInterpolationFunction MaximumNConc: XProperty=[Phenology].Reproductive.FractionComplete
          XYPairs: X=[0, 0.1, 0.5, 0.75, 1]; Y=[0.03, 0.035, 0.042, 0.045, 0.045]
        Constant NitrogenDemandSwitch: FixedValue=1
        PhaseLookup TargetBiomassProportion
          Memo note
            This is the 'ideal' proportion of biomass for this organ within the above ground biomass (not total).
          PhaseLookupValue VegetativeInductive: Start=Emergence; End=Flowering
            Constant TargetProportion: FixedValue=0; Units=g/g
          PhaseLookupValue Reproductive: Start=Flowering; End=Ripening
            MultiplyFunction TargetProportion
              Constant BaseProportion: FixedValue=0.35; Units=g/g
              LinearInterpolationFunction PhotoPeriodFactor: XProperty=[Phenology].Photoperiod
                XYPairs: X=[11, 12, 13, 14, 15, 16, 18, 20]; Y=[0.05, 0.075, 0.15, 0.3, 0.6, 0.8, 0.95, 1]
        BiomassDemand DMDemands
          MultiplyFunction Structural
            Constant StructuralFraction: FixedValue=1; Units=g/g
            MaximumFunction DMDemandFunction
              Memo Description: same as Replacements.RedClover.Leaf.DMDemands.Structural.DMDemandFunction.Description
              Constant Zero: FixedValue=0
              AddFunction OrganDMDemand
                PartitionFractionDemandFunction BaseBiomassDemand
                  MultiplyFunction PartitionFraction
                    VariableReference TargetAboveGroundProp: VariableName=[TargetAboveGroundFraction]
                    VariableReference TargetOrganProp: VariableName=[Inflorescence].TargetBiomassProportion
                SubtractFunction DeficitBiomassDemand
                  MultiplyFunction TargetBiomass
                    VariableReference TargetAboveGroundProp: VariableName=[TargetAboveGroundFraction]
                    VariableReference TargetOrganProp: VariableName=[Inflorescence].TargetBiomassProportion
                    VariableReference TotalBiomass: VariableName=[TotalLive].Wt
                  VariableReference CurrentBiomass: VariableName=[Inflorescence].Live.Wt
          Constant Metabolic: FixedValue=0
          StorageDMDemandFunction Storage
            SubtractFunction StorageFraction
              Constant One: FixedValue=1
              VariableReference StructuralFraction: VariableName=[Inflorescence].DMDemands.Structural.StructuralFraction
        BiomassDemand NDemands
          MultiplyFunction Structural
            VariableReference MinNconc: VariableName=[Inflorescence].MinimumNConc
            VariableReference PotentialDMAllocation: VariableName=[Inflorescence].potentialDMAllocation.Structural
          MultiplyFunction Metabolic
            SubtractFunction MetabolicNconc
              VariableReference CritNconc: VariableName=[Inflorescence].CriticalNConc
              VariableReference MinNconc: VariableName=[Inflorescence].MinimumNConc
            VariableReference PotentialDMAllocation: VariableName=[Inflorescence].potentialDMAllocation.Structural
          StorageNDemandFunction Storage
            VariableReference NitrogenDemandSwitch: VariableName=[Inflorescence].NitrogenDemandSwitch
            VariableReference MaxNconc: VariableName=[Inflorescence].MaximumNConc
        Constant DMConversionEfficiency: FixedValue=1; Units=0-1
        Constant MaintenanceRespirationFunction: FixedValue=0; Units=0-1
        MultiplyFunction SenescenceRate
          Memo Description
            The reference senescence rate is adjusted using generic relationships to environmental factors, such as temperature and soil moisture.  These are based on general knowledge from other plant models.
          Constant ReferenceRate: FixedValue=0.1; Units=/day
          LinearInterpolationFunction StageFactor: XProperty=[Phenology].Stage
            XYPairs: X=[3, 4.99, 5, 5.5, 6]; Y=[2, 1, 0.5, 0.65, 1]
          WeightedTemperatureFunction TemperatureFactor: MaximumTemperatureWeighting=0.5
            XYPairs: X=[-20, -5, 0, 5, 17, 28, 37.5]; Y=[1.5, 0.5, 0.25, 0.1, 0.75, 1, 1.5]
          LinearInterpolationFunction SoilMoistureFactor: XProperty=[Leaf].Fw
            XYPairs: X=[0, 0.5, 1]; Y=[2, 1, 1]
        MultiplyFunction DetachmentRateFunction
          Memo Description
            A generic relationship between detachment and soil moisture is assumed.  It implies that under dry conditions the detachment rate decreases due to the lower level of activity of decomposing microorganisms.
          Constant ReferenceRate: FixedValue=0.1; Units=/day
          LinearInterpolationFunction SoilMoistureFactor: XProperty=[Leaf].Fw
            XYPairs: X=[0, 0.5, 1]; Y=[0, 0.5, 1]
        Constant DMRetranslocationFactor: FixedValue=0; Units=/day
        Constant DMReallocationFactor: FixedValue=1
        Constant NRetranslocationFactor: FixedValue=0; Units=/day
        Constant NReallocationFactor: FixedValue=1; Units=/day
        RetranslocateNonStructural RetranslocateNitrogen
        Constant RemobilisationCost: FixedValue=0
        BiomassRemoval BiomassRemovalDefaults
          OrganBiomassRemovalType Cut: FractionLiveToRemove=0.68; FractionDeadToRemove=0.55; FractionLiveToResidue=0.17; FractionDeadToResidue=0.15
          OrganBiomassRemovalType Graze: FractionLiveToRemove=0.63; FractionDeadToRemove=0.63; FractionLiveToResidue=0.27; FractionDeadToResidue=0.27
          OrganBiomassRemovalType Harvest: FractionLiveToRemove=0.6; FractionDeadToRemove=0.7; FractionLiveToResidue=0.15; FractionDeadToResidue=0.2
          OrganBiomassRemovalType Prune: FractionLiveToRemove=0; FractionDeadToRemove=0; FractionLiveToResidue=0; FractionDeadToResidue=0
      Nodule
        Memo Description
          __Note:__ this represents all the nodules containing the symbiotic N-fixing bacteria (*Rhizobium*) of the plant, without distinction between ages or placement in the root system.
          Nodules are considered plant organs that result from the infection of fine roots by *Rhizobium* bacteria ([CrushChapter1987]; [HirschEtAl1997]; [PuppoEtAl2005]; [RusselleEtAl2008]).  These organs are composed by a mixture of infected and non infected plant cells that behave as an isolated organ, but under general control of the host plant.  This is a symbiotic relationship whereby the plant supplies carbon and energy to the the bacteria which in turn provide the plant with N fixed from the atmosphere.  Nodules of red clover are of indeterminate type, these are more complex than determinate types (including a meristematic zone) and have a much longer life span ([PuppoEtAl2005]; [RusselleEtAl2008]).  However, the model currently does not simulate variations in nodule development nor on N fixation capacity due to varying bacteria strains.
          The host plant controls the supply of sugars and oxygen to the nodules, thus regulating the N fixation rate and, by extention, the growth and senescence of nodules ([PuppoEtAl2005]; [RusselleEtAl2008]; [HaagEtAl2013]). The model simulates this by linking the respective processes to the plants N status.
        Constant InitialWtFunction: FixedValue=1e-06; Units=g/m^2
        Constant CarbonConcentration: FixedValue=0.4
        Constant MinimumNConc: FixedValue=0.05; Units=gN/gDM
        Constant CriticalNConc: FixedValue=0.055; Units=gN/gDM
        Constant MaximumNConc: FixedValue=0.055; Units=gN/gDM
        Constant NitrogenDemandSwitch: FixedValue=1
        PhaseLookup TargetBiomassProportion
          Memo Description
            The growth and senescence of nodules in clover roots is regulated by the host plant, this is done in tandem with its need for N fixation by controlling the supply of sugars and oxygen to the nodules ([CrushChapter1987]; [VlassakEtAl1997]; [PuppoEtAl2005]; [RusselleEtAl2008]; [HaagEtAl2013]).  The aproach used in the red clover model to simulate this regulation is to define a base, or mean, proportion of nodules in the below ground biomass and modify this according to the plants N status.  Thus nodule growth demand is inversely proportional to the plant's N deficiency factor.
            *Rhizobium* bacteria are ubiquitous in soils (e.g. [CrushChapter1987]; [VlassakEtAl1997]; [RusselleEtAl2008]), although strains vary widelly in infection capacities and fixation efficiencies.  Thus, in typical growing conditions nearly all red clover plants will have some nodulation, add to this the fact that the model simulates a population instead of a single plant, the model assumes that nodule biomass never goes below a minimum threshold, as propotion of below ground biomass.  This also ensures a prompt minimum capacity for N fixation.
          Memo note
            This is the 'ideal' proportion of biomass for this organ within the above ground biomass (not total).
          PhaseLookupValue AllPhases: Start=Emergence; End=Ripening
            MultiplyFunction TargetProportion
              Constant BaseProportion: FixedValue=0.05; Units=g/g
              LinearInterpolationFunction NDeficiencyFactor: XProperty=[Leaf].FN
                XYPairs: X=[0, 0.5, 0.75, 0.9, 1]; Y=[1.65, 1, 1, 0.75, 0.2]
        BiomassDemand DMDemands
          MultiplyFunction Structural
            Constant StructuralFraction: FixedValue=1; Units=g/g
            MaximumFunction DMDemandFunction
              Memo Description: same as Replacements.RedClover.Leaf.DMDemands.Structural.DMDemandFunction.Description
              Constant Zero: FixedValue=0
              AddFunction OrganDMDemand
                PartitionFractionDemandFunction BaseBiomassDemand
                  MultiplyFunction PartitionFraction
                    SubtractFunction TargetBelowGroundProp
                      Constant One: FixedValue=1
                      VariableReference TargetAboveGroundProp: VariableName=[TargetAboveGroundFraction]
                    VariableReference TargetOrganProp: VariableName=[Nodule].TargetBiomassProportion
                SubtractFunction DeficitBiomassDemand
                  MultiplyFunction TargetBiomass
                    SubtractFunction TargetBelowGroundProp
                      Constant One: FixedValue=1
                      VariableReference TargetAboveGroundProp: VariableName=[TargetAboveGroundFraction]
                    VariableReference TargetOrganProp: VariableName=[Nodule].TargetBiomassProportion
                    VariableReference TotalBiomass: VariableName=[TotalLive].Wt
                  VariableReference CurrentBiomass: VariableName=[Nodule].Live.Wt
          Constant Metabolic: FixedValue=0
          StorageDMDemandFunction Storage
            SubtractFunction StorageFraction
              Constant One: FixedValue=1
              VariableReference StructuralFraction: VariableName=[Nodule].DMDemands.Structural.StructuralFraction
        BiomassDemand NDemands
          MultiplyFunction Structural
            VariableReference MinNconc: VariableName=[Nodule].MinimumNConc
            VariableReference PotentialDMAllocation: VariableName=[Nodule].potentialDMAllocation.Structural
          MultiplyFunction Metabolic
            SubtractFunction MetabolicNconc
              VariableReference CritNconc: VariableName=[Nodule].CriticalNConc
              VariableReference MinNconc: VariableName=[Nodule].MinimumNConc
            VariableReference PotentialDMAllocation: VariableName=[Nodule].potentialDMAllocation.Structural
          StorageNDemandFunction Storage
            VariableReference NitrogenDemandSwitch: VariableName=[Nodule].NitrogenDemandSwitch
            VariableReference MaxNconc: VariableName=[Nodule].MaximumNConc
        Constant DMConversionEfficiency: FixedValue=1; Units=0-1
        MultiplyFunction FixationRate
          Memo Description
            The rate of N fixation in legumes is highly regulated by the host plant, but in its basis it is defined by the presence and quantity of symbiont bacteria.  The RedClover model uses an approach whereby the basic fixation rate is directly proportional to the biomass of nodules ([RysAndPhung1985]; [LedgardEtAl1990]; [WarembourgEtAl1997]; [HoghJensenEtAl2002]; [RusselleEtAl2008]). This is then regulated by environmental factors and the plant ([CrushChapter1987]; [RusselleEtAl2008]).  The plants control N fixation by limiting the supply of sugars and oxygen to the nodules ([PuppoEtAl2005]; [RusselleEtAl2008]; [HaagEtAl2013]).  In the model, this is simulated as a function of N deficiency, with fixation rate being inversely proportional to the plant's N deficiency factor.  The mechanism regulating N fixation is quite fast, with fixation nearly ceasing soon after fertilisation or defoliation (e.g. [CarrollGresshoff1983]; [RusselleEtAl2008]).  By linking potential fixation to nodule biomass, the model is capable of describing both a upper limit for fixation and the temporal lag between the inception of N stress and an elevated N fixation rate.
          Constant MaxFixationRate: FixedValue=0.05; Units=gN/gDM nodule/day
          VariableReference NoduleBiomass: VariableName=[Nodule].Live.Wt
          LinearInterpolationFunction NDeficiencyFactor: XProperty=[Leaf].FN
            XYPairs: X=[0, 0.5, 0.75, 0.9, 1]; Y=[1, 1, 0.9, 0.5, 0]
          MinimumFunction EnvironmentalFactor
            LinearInterpolationFunction SoilMoistureFactor: XProperty=[Root].SoilWaterScale
              XYPairs: X=[0, 0.2, 0.5, 1, 1.5, 2]; Y=[0.05, 0.2, 1, 1, 1, 0]
            VariableReference TemperatureFactor: VariableName=[Leaf].NRetranslocationFactor.TemperatureFactor
        MultiplyFunction FixationMetabolicCost
          Memo Description
            The cost of symbiotic N fixation in general has been extensively studied. The theoretical cost at enzyme level is around 5-8 gC/gN, or about 33% higher than NO3 uptake (e.g. [MinchinAndWitty2005]; [PuppoEtAl2005]; [RusselleEtAl2008]), or 2.8-4.8 gC/gN for the whole nodule apparatus. Measured value are typically a bit higher than these.
          Constant SpecificFixationCost: FixedValue=5; Units=gC/gNFixed
          VariableReference FixedN: VariableName=[Nodule].NFixed
        Constant MaintenanceRespirationFunction: FixedValue=0; Units=0-1
        MultiplyFunction SenescenceRate
          Memo Description
            The reference senescence rate is adjusted according to enviromental factors, temperature and soil water status.
          Constant ReferenceRate: FixedValue=0.005; Units=/day
          WeightedTemperatureFunction TemperatureFactor: MaximumTemperatureWeighting=0.5
            XYPairs: X=[-5, 0, 5, 16, 28, 37.5]; Y=[0.5, 0.1, 0.1, 1, 1, 1.5]
          LinearInterpolationFunction SoilMoistureFactor: XProperty=[Leaf].Fw
            XYPairs: X=[0, 0.25, 1]; Y=[2, 1, 1]
          LinearInterpolationFunction SoilAerationFactor: XProperty=[Root].SoilWaterScale
            XYPairs: X=[1, 1.5, 2]; Y=[1, 1, 2]
        Constant DetachmentRateFunction: FixedValue=1; Units=/d
        Constant DMRetranslocationFactor: FixedValue=0
        Constant DMReallocationFactor: FixedValue=1
        Constant NRetranslocationFactor: FixedValue=0
        Constant NReallocationFactor: FixedValue=1
        Constant RemobilisationCost: FixedValue=0
        BiomassRemoval BiomassRemovalDefaults
          OrganBiomassRemovalType Harvest: FractionLiveToRemove=0; FractionDeadToRemove=0; FractionLiveToResidue=0.1; FractionDeadToResidue=0
          OrganBiomassRemovalType Cut: FractionLiveToRemove=0; FractionDeadToRemove=0; FractionLiveToResidue=0.1; FractionDeadToResidue=0
          OrganBiomassRemovalType Prune: FractionLiveToRemove=0; FractionDeadToRemove=0; FractionLiveToResidue=0.05; FractionDeadToResidue=0
          OrganBiomassRemovalType Graze: FractionLiveToRemove=0; FractionDeadToRemove=0; FractionLiveToResidue=0; FractionDeadToResidue=0
      GenericOrgan Taproot
        Memo Description
          __Note:__ this represents all the taproots of the plant.
          Red clover has pronounce taproots that enable it reach deep soil layers and act as a major storage organ ([BennetAndDoss1960roots]; [FrameEtAll1998Book]; [Thomas2003LegumeGrowth]).  The reserves can then be used to enhance growth in spring as well as after defoliation.  Given that, the proportion that taproots contribute to the total plant biomass should vary considerably, similar to other taprooted species ([Evans1977Roots]; [Teixeira2008DMPartition]).
        MultiplyFunction InitialWtFunction
          Constant InitialOrganWt: FixedValue=5e-05; Units=g/plant
          VariableReference Population: VariableName=[Plant].Population
        Constant CarbonConcentration: FixedValue=0.4
        Constant MinimumNConc: FixedValue=0.025; Units=gN/gDM
        Constant CriticalNConc: FixedValue=0.025; Units=gN/gDM
        Constant MaximumNConc: FixedValue=0.0325; Units=gN/gDM
        Constant NitrogenDemandSwitch: FixedValue=1
        PhaseLookup TargetBiomassProportion
          Memo Description
            The targeted biomass proportion in below ground organs is linked to the variations in nodule growth. This means that if the plant experiences N deficiency it will favour the growth of the N fixing nodules instead of root and taproot. Note that this reffers only to the relative propotions of below ground organs, plant can still alter the shoot-to-root ratio so that more roots as well as noduels are growth in conditions of N deficiency.
          Memo note
            This is the 'ideal' proportion of biomass for this organ within the above ground biomass (not total).
          PhaseLookupValue AllPhases: Start=Emergence; End=Ripening
            MultiplyFunction TargetProportion
              Constant BaseProportion: FixedValue=0.45; Units=g/g
              SubtractFunction VariationInOrgan
                Constant One: FixedValue=1
                DivideFunction VariationInNodule
                  SubtractFunction DeltaNoduleProp
                    VariableReference ActualNoduleProp: VariableName=[Nodule].TargetBiomassProportion
                    VariableReference BaseNoduleProp
                      VariableName=[Nodule].TargetBiomassProportion.AllPhases.TargetProportion.BaseProportion
                  AddFunction RootsBaseProp
                    VariableReference TaprootBaseProp
                      VariableName=[Taproot].TargetBiomassProportion.AllPhases.TargetProportion.BaseProportion
                    VariableReference RootBaseProp
                      VariableName=[Root].TargetBiomassProportion.AllPhases.TargetProportion.BaseProportion
        BiomassDemand DMDemands
          MultiplyFunction Structural
            Constant StructuralFraction: FixedValue=0.85; Units=g/g
            MaximumFunction DMDemandFunction
              Memo Description: same as Replacements.RedClover.Leaf.DMDemands.Structural.DMDemandFunction.Description
              Constant Zero: FixedValue=0
              AddFunction OrganDMDemand
                PartitionFractionDemandFunction BaseBiomassDemand
                  MultiplyFunction PartitionFraction
                    SubtractFunction TargetBelowGroundProp
                      Constant One: FixedValue=1
                      VariableReference TargetAboveGroundProp: VariableName=[TargetAboveGroundFraction]
                    VariableReference TargetOrganProp: VariableName=[Taproot].TargetBiomassProportion
                SubtractFunction DeficitBiomassDemand
                  MultiplyFunction TargetBiomass
                    SubtractFunction TargetBelowGroundProp
                      Constant One: FixedValue=1
                      VariableReference TargetAboveGroundProp: VariableName=[TargetAboveGroundFraction]
                    VariableReference TargetOrganProp: VariableName=[Taproot].TargetBiomassProportion
                    VariableReference TotalBiomass: VariableName=[TotalLive].Wt
                  VariableReference CurrentBiomass: VariableName=[Taproot].Live.Wt
          MultiplyFunction Metabolic
            Constant MetabolicFraction: FixedValue=0; Units=g/g
            VariableReference DMDemandFunction: VariableName=[Taproot].DMDemands.Structural.DMDemandFunction
          StorageDMDemandFunction Storage
            SubtractFunction StorageFraction
              Constant One: FixedValue=1
              VariableReference StructuralFraction: VariableName=[Taproot].DMDemands.Structural.StructuralFraction
              VariableReference MetabolicFraction: VariableName=[Taproot].DMDemands.Metabolic.MetabolicFraction
        BiomassDemand NDemands
          MultiplyFunction Structural
            VariableReference MinNconc: VariableName=[Taproot].MinimumNConc
            VariableReference PotentialDMAllocation: VariableName=[Taproot].potentialDMAllocation.Structural
          MultiplyFunction Metabolic
            SubtractFunction MetabolicNconc
              VariableReference CritNconc: VariableName=[Taproot].CriticalNConc
              VariableReference MinNconc: VariableName=[Taproot].MinimumNConc
            VariableReference PotentialDMAllocation: VariableName=[Taproot].potentialDMAllocation.Structural
          StorageNDemandFunction Storage
            VariableReference NitrogenDemandSwitch: VariableName=[Taproot].NitrogenDemandSwitch
            VariableReference MaxNconc: VariableName=[Taproot].MaximumNConc
        Constant DMConversionEfficiency: FixedValue=1; Units=0-1
        Constant MaintenanceRespirationFunction: FixedValue=0; Units=0-1
        MultiplyFunction SenescenceRate
          Memo Description
            The reference senescence rate is adjusted according to environmental factors, temperature and soil water status.
          Constant ReferenceRate: FixedValue=0.01; Units=/day
          WeightedTemperatureFunction TemperatureFactor: MaximumTemperatureWeighting=0.5
            XYPairs: X=[-2, 5, 17, 30, 37.5]; Y=[0, 0.1, 1, 1, 1.25]
          LinearInterpolationFunction SoilMoistureFactor: XProperty=[Leaf].Fw
            XYPairs: X=[0, 0.5, 1]; Y=[1, 1, 1]
          LinearInterpolationFunction SoilAerationFactor: XProperty=[Root].SoilWaterScale
            XYPairs: X=[1, 1.25, 1.75, 2]; Y=[1, 1, 1.5, 2]
        Constant DetachmentRateFunction: FixedValue=1; Units=/day
        MultiplyFunction DMRetranslocationFactor
          Memo Description
            A generic relationship between retranslocation and environmental factors is assumed, this is done so that retranslocation is enhanced when conditions are good for growth. Plus retranslocation is only allowed when days are increasing, thus helping growth in spring and allowing for some replenishing in late summer and autumn.
          Constant ReferenceRate: FixedValue=0.05; Units=/day
          VariableReference TemperatureFactor: VariableName=[Leaf].NRetranslocationFactor.TemperatureFactor
          LinearInterpolationFunction SoilMoistureFactor: XProperty=[Leaf].Fw
            XYPairs: X=[0, 0.5, 1]; Y=[0, 1, 1]
          VariableReference PhotoPeriodFactor: VariableName=[Stem].DMRetranslocationFactor.PhotoPeriodFactor
        Constant DMReallocationFactor: FixedValue=1; Units=/day
        MultiplyFunction NRetranslocationFactor: same as Replacements.RedClover.Stem.NRetranslocationFactor
        Constant NReallocationFactor: FixedValue=1; Units=/day
        RetranslocateNonStructural RetranslocateNitrogen
        Constant RemobilisationCost: FixedValue=0
        BiomassRemoval BiomassRemovalDefaults
          OrganBiomassRemovalType Cut: FractionLiveToRemove=0; FractionDeadToRemove=0; FractionLiveToResidue=0.03; FractionDeadToResidue=0
          OrganBiomassRemovalType Graze: FractionLiveToRemove=0; FractionDeadToRemove=0; FractionLiveToResidue=0.03; FractionDeadToResidue=0
          OrganBiomassRemovalType Harvest: FractionLiveToRemove=0; FractionDeadToRemove=0; FractionLiveToResidue=0.01; FractionDeadToResidue=0
          OrganBiomassRemovalType Prune: FractionLiveToRemove=0; FractionDeadToRemove=0; FractionLiveToResidue=0; FractionDeadToResidue=0
      Root: GrowthRespiration=0; MaintenanceRespiration=0; RootAngle=45; SWAvailabilityRatio=0
        Memo Description
          __Note:__ this represents all the fine roots of the plant.  The root organ demands and can supply both N and DM, although the later is typically samll and due to remobilisation of non-structural biomass upon senescence. The root depth increases through time, but currently it does not retreat.  Roots provide N and water uptake supply.
        Constant InitialDM: FixedValue=0.00035; Units=g/plant
          Memo Description
            It is assumed that approximately 2/3 of the seed biomass is allocated to roots upon emergence.  The weight of red clover seeds varies between 2.0 and 4.5 g/1000 seeds ([ClaydonEtAlcvColenso]; [MurrayThesis2012]).
        Constant CarbonConcentration: FixedValue=0.4
        Constant MinimumNConc: FixedValue=0.025; Units=gN/gDM
        Constant CriticalNConc: FixedValue=0.025; Units=gN/gDM
        Constant MaximumNConc: FixedValue=0.03; Units=gN/gDM
        PhaseBasedSwitch NitrogenDemandSwitch: Start=Germination; End=Ripening
        PhaseLookup TargetBiomassProportion
          Memo Description: same as Replacements.RedClover.Taproot.TargetBiomassProportion.Description
          Memo note
            This is the 'ideal' proportion of biomass for this organ within the above ground biomass (not total).
          PhaseLookupValue AllPhases: Start=Emergence; End=Ripening
            MultiplyFunction TargetProportion
              Constant BaseProportion: FixedValue=0.5; Units=g/g
              SubtractFunction VariationInOrgan: same as Replacements.RedClover.Taproot.TargetBiomassProportion.AllPhases.TargetProportion.VariationInOrgan
        BiomassDemand DMDemands
          MultiplyFunction Structural
            Constant StructuralFraction: FixedValue=1; Units=g/g
            MaximumFunction DMDemandFunction
              Memo Description: same as Replacements.RedClover.Leaf.DMDemands.Structural.DMDemandFunction.Description
              Constant Zero: FixedValue=0
              AddFunction OrganDMDemand
                PartitionFractionDemandFunction BaseBiomassDemand
                  MultiplyFunction PartitionFraction
                    SubtractFunction TargetBelowGroundProp
                      Constant One: FixedValue=1
                      VariableReference TargetAboveGroundProp: VariableName=[TargetAboveGroundFraction]
                    VariableReference TargetOrganProp: VariableName=[Root].TargetBiomassProportion
                SubtractFunction DeficitBiomassDemand
                  MultiplyFunction TargetBiomass
                    SubtractFunction TargetBelowGroundProp
                      Constant One: FixedValue=1
                      VariableReference TargetAboveGroundProp: VariableName=[TargetAboveGroundFraction]
                    VariableReference TargetOrganProp: VariableName=[Root].TargetBiomassProportion
                    VariableReference TotalBiomass: VariableName=[TotalLive].Wt
                  VariableReference CurrentBiomass: VariableName=[Root].Live.Wt
          Constant Metabolic: FixedValue=0
          StorageDMDemandFunction Storage
            SubtractFunction StorageFraction
              Constant One: FixedValue=1
              VariableReference StructuralFraction: VariableName=[Root].DMDemands.Structural.StructuralFraction
        BiomassDemand NDemands
          MultiplyFunction Structural
            VariableReference MinNconc: VariableName=[Root].MinimumNConc
            VariableReference PotentialDMAllocation: VariableName=[Root].potentialDMAllocation.Structural
          MultiplyFunction Metabolic
            SubtractFunction MetabolicNconc
              VariableReference CritNconc: VariableName=[Root].CriticalNConc
              VariableReference MinNconc: VariableName=[Root].MinimumNConc
            VariableReference PotentialDMAllocation: VariableName=[Root].potentialDMAllocation.Structural
          StorageNDemandFunction Storage
            VariableReference NitrogenDemandSwitch: VariableName=[Root].NitrogenDemandSwitch
            VariableReference MaxNconc: VariableName=[Root].MaximumNConc
        Constant DMConversionEfficiency: FixedValue=1
        Constant MaintenanceRespirationFunction: FixedValue=1
        PhaseLookup RootFrontVelocity
          PhaseLookupValue PreEmergence: Start=Germination; End=Emergence
            Constant ReferenceVelocity: FixedValue=4.5; Units=mm/day
          PhaseLookupValue VegetativeInductive: Start=Emergence; End=Flowering
            MultiplyFunction GrowthVelocity
              Constant ReferenceVelocity: FixedValue=9; Units=mm/day
              MinimumFunction EnvironmentalFactor
                WeightedTemperatureFunction TemperatureFactor: MaximumTemperatureWeighting=0.5
                  XYPairs: X=[0, 2, 15, 28, 35]; Y=[0, 0, 1, 1, 0]
                Constant SoilMoistureFactor: FixedValue=1
                Constant SoilAerationFactor: FixedValue=1
          PhaseLookupValue Reproductive: Start=Flowering; End=Ripening
            MultiplyFunction GrowthVelocity
              Constant ReferenceVelocity: FixedValue=5; Units=mm/day
              MinimumFunction EnvironmentalFactor: same as Replacements.RedClover.Root.RootFrontVelocity.VegetativeInductive.GrowthVelocity.EnvironmentalFactor
        Constant MaximumRootDepth: FixedValue=750; Units=mm
        Constant SpecificRootLength: FixedValue=100; Units=m/g
        MultiplyFunction SenescenceRate
          Memo Description
            The reference senescence rate is adjusted according to environmental factors, temperature and soil water status.
          Constant ReferenceRate: FixedValue=0.02; Units=/day
          WeightedTemperatureFunction TemperatureFactor: MaximumTemperatureWeighting=0.5
            XYPairs: X=[-2, 5, 17, 30, 37.5]; Y=[0, 0.1, 1, 1, 1.25]
          LinearInterpolationFunction SoilMoistureFactor: XProperty=[Leaf].Fw
            XYPairs: X=[0, 0.5, 1]; Y=[1, 1, 1]
          LinearInterpolationFunction SoilAerationFactor: XProperty=[Root].SoilWaterScale
            XYPairs: X=[1, 1.25, 1.75, 2]; Y=[1, 1, 1.5, 2]
        Constant DMRetranslocationFactor: FixedValue=0; Units=/day
        Constant DMReallocationFactor: FixedValue=1; Units=/day
        Constant NRetranslocationFactor: FixedValue=0; Units=/day
        Constant NReallocationFactor: FixedValue=1; Units=/day
        Constant RemobilisationCost: FixedValue=0
        LinearInterpolationFunction KLModifier: XProperty=[Root].LengthDensity
          Memo
            No adjustment of KL are considered for red clover in the current model.  More analyses, preferably with support from data specific to this issue, are needed to improve the description of this relationship.
            Memo Description
              This represents all the fine roots of the plant.  The root organ demands and is partitioned N and DM and its depth increases through time to provide a water uptake supply
          XYPairs: X=[0, 1]; Y=[1, 1]
        LinearInterpolationFunction KNH4: XProperty=[Root].LengthDensity
          XYPairs: X=[0, 0.003]; Y=[0.01, 0.02]
        LinearInterpolationFunction KNO3: XProperty=[Root].LengthDensity
          XYPairs: X=[0, 0.003]; Y=[0.02, 0.03]
        LinearInterpolationFunction NUptakeSWFactor: XProperty=[Root].SoilWaterScale
          XYPairs: X=[0, 0.75, 1]; Y=[0, 1, 1]
        Constant MaxDailyNUptake: FixedValue=10; Units=kgN/ha
        SoilWaterScale
        BiomassRemoval BiomassRemovalDefaults
          OrganBiomassRemovalType Cut: FractionLiveToRemove=0; FractionDeadToRemove=0; FractionLiveToResidue=0.05; FractionDeadToResidue=0
          OrganBiomassRemovalType Graze: FractionLiveToRemove=0; FractionDeadToRemove=0; FractionLiveToResidue=0.05; FractionDeadToResidue=0
          OrganBiomassRemovalType Harvest: FractionLiveToRemove=0; FractionDeadToRemove=0; FractionLiveToResidue=0.05; FractionDeadToResidue=0
          OrganBiomassRemovalType Prune: FractionLiveToRemove=0; FractionDeadToRemove=0; FractionLiveToResidue=0; FractionDeadToResidue=0
      CompositeBiomass AboveGround: DMDOfStructural=0.6
        Propertys=[[Leaf].Live, [Leaf].Dead, [Stem].Live, [Stem].Dead, [Petiole].Live, [Petiole].Dead, [Inflorescence].Live, [Inflorescence].Dead]
      CompositeBiomass AboveGroundLive: DMDOfStructural=0.6
        Propertys=[[Leaf].Live, [Stem].Live, [Petiole].Live, [Inflorescence].Live]
      CompositeBiomass AboveGroundDead: DMDOfStructural=0.6
        Propertys=[[Leaf].Dead, [Stem].Dead, [Petiole].Dead, [Inflorescence].Dead]
      CompositeBiomass BelowGround: DMDOfStructural=0.6
        Propertys=[[Root].Live, [Root].Dead, [Taproot].Live, [Taproot].Dead, [Nodule].Live, [Nodule].Dead]
      CompositeBiomass BelowGroundLive: Propertys=[[Root].Live, [Taproot].Live, [Nodule].Live]; DMDOfStructural=0.6
      CompositeBiomass BelowGroundDead: Propertys=[[Root].Dead, [Taproot].Dead, [Nodule].Dead]; DMDOfStructural=0.6
      CompositeBiomass Total: DMDOfStructural=0.6
        Propertys=[[Leaf].Live, [Leaf].Dead, [Stem].Live, [Stem].Dead, [Petiole].Live, [Petiole].Dead, [Inflorescence].Live, [Inflorescence].Dead, [Root].Live, [Root].Dead, [Taproot].Live, [Taproot].Dead, [Nodule].Live, [Nodule].Dead]
      CompositeBiomass TotalLive: DMDOfStructural=0.6
        Propertys=[[Leaf].Live, [Stem].Live, [Petiole].Live, [Inflorescence].Live, [Root].Live, [Taproot].Live, [Nodule].Live]
      CompositeBiomass TotalDead: DMDOfStructural=0.6
        Propertys=[[Leaf].Dead, [Stem].Dead, [Petiole].Dead, [Inflorescence].Dead, [Root].Dead, [Taproot].Dead, [Nodule].Dead]
      PhaseLookup ShootRootRatio
        PhaseLookupValue AllPhases: Start=Emergence; End=Ripening
          DivideFunction CurrentSR
            VariableReference AboveGroundDM: VariableName=[AboveGroundLive].Wt
            VariableReference BelowGroundDM: VariableName=[BelowGroundLive].Wt
      PhaseLookup TargetShootRootRatio
        Memo Description
          The target shoot-to-root is used to alter the allocation of biomass when the balance between the various organs is disturbed, such as after a defoliation.
          Published data for the shoot-to-root ratio in red clover show considerable variability, with values between 1.5 to 8.0 for a wide range of conditions ([Evans1973RootShoot]; [Evans1977Roots]; [HeichelEtAl1985]; [ChmelikovaEtAl2015]). For typical enviromental conditions (low stress levels) the data suggest a strong seasonality in biomass allocation.  Similar to other forages that are strongly taprooted, basically all growth in spring is allocated to above ground organs, whereas in summer-autumn the allocation is more even, replenishing the below ground reserves (e.g. [Evans1973RootShoot]; [HeichelEtAl1985]; [Teixeira2008DMPartition]).  The partition can be further affected by environmental conditions, with water or nutrient deficiency inducing greater root growth, while low light conditions lead to a higher allocation above ground ([GistAndMott1957]; [KendallEtAl1994GLFs]). The current model does not explicitly consider these variations, this should be upgraded when data becomes available.
        PhaseLookupValue AllPhases: Start=Emergence; End=Ripening
          DivideFunction TargetSR
            VariableReference TargetAboveGroundAllocation: VariableName=[TargetAboveGroundFraction]
            SubtractFunction BaseTargetBelowGroundAllocation
              Constant One: FixedValue=1
              VariableReference TargetAboveGroundAllocation: VariableName=[TargetAboveGroundFraction]
      PhaseLookup TargetAboveGroundFraction
        Memo Description
          The model attempts to keep the proportion of the plant biomass above and below ground at a given value.  The 'target' value is the 'ideal' relative proportion of biomass above and below ground for the plant at a given growth phase.  The approach used here mimics the allocation pattern in strongly taprooted forages (e.g. [Teixeira2008DMPartition]).  In spring, nearly all biomass is allocated to above ground organs, with the proportion reducing as the length of day increases.  In summer-autumn the allocation evenly distributed amoung all organs, favouring the replenishment of below ground reserves ([Evans1973RootShoot]; [HeichelEtAl1985]).
          The approach used in the RedClover model is based on that used for describing biomass partitioning in lucerne ([Teixeira2008DMPartition]), which was parameterised for Lincoln, NZ, only.  This was generalised by assuming that miminum and maximum allocations are a function of the annual variation in day length (which is a function of latitude).  Thus, the variation in allocation to above ground organs is small in the tropics and reaches a maximum near the polar circle.  This function allows for smooth transition between seasons and describe the general pattern sensibly, but it should be revised when more data becomes available.
        PhaseLookupValue AllPhases: Start=Emergence; End=Ripening
          LessThanFunction TargetAboveGroundAllocation
            VariableReference PhotoperiodVariation: VariableName=[Phenology].PhotoperiodVariation
            Constant Zero: FixedValue=0
            VariableReference BaseAllocationFraction: VariableName=[LowerAllocationFractionAboveG]
            AddFunction VariableAllocationFraction
              VariableReference BaseAllocationFraction: VariableName=[LowerAllocationFractionAboveG]
              MultiplyFunction AdditionalAllocation
                SubtractFunction DeltaAllocation
                  VariableReference MaximumAllocationFraction: VariableName=[UpperAllocationFractionAboveG]
                  VariableReference MinimumAllocationFraction: VariableName=[LowerAllocationFractionAboveG]
                SubtractFunction DayLengthFactor
                  Constant One: FixedValue=1
                  PowerFunction PowerFactor: Exponent=2.5
                    DivideFunction BaseFactor
                      MaximumFunction Nominator
                        Constant Zero: FixedValue=0
                        SubtractFunction PhotoDev
                          PhotoperiodFunction PhotoPeriod: Twilight=0; DayLength=0
                          SubtractFunction Deviation
                            Constant Noon: FixedValue=12; Units=hours
                            VariableReference DeltaDayLength: VariableName=[DeltaAnnualDayLength]
                      MultiplyFunction Denominator
                        Constant Two: FixedValue=2
                        VariableReference DeltaDayLength: VariableName=[DeltaAnnualDayLength]
      MaximumFunction LowerAllocationFractionAboveG
        Memo
          This is the lower limit for biomass allocation in above ground organs, assumed to be a function of latitude.
        Constant MinimumAllocation: FixedValue=0.4; Units=g/g
        SubtractFunction EstimatedAllocation
          Constant MedianAllocation: FixedValue=0.75; Units=g/g
          MultiplyFunction LatitudeFactor
            LessThanFunction AbsLatitude
              VariableReference Latitude: VariableName=[Weather].Latitude
              Constant Zero: FixedValue=0
              MultiplyFunction SouthLatitude
                Constant MinusOne: FixedValue=-1
                VariableReference Latitude: VariableName=[Weather].Latitude
              VariableReference NorthLatitude: VariableName=[Weather].Latitude
            DivideFunction Variation
              SubtractFunction DeltaAllocation
                VariableReference MedianAllocation
                  VariableName=[LowerAllocationFractionAboveG].EstimatedAllocation.MedianAllocation
                VariableReference MinimumAllocation: VariableName=[LowerAllocationFractionAboveG].MinimumAllocation
              Constant ReferenceLatitude: FixedValue=65; Units=degrees
      MinimumFunction UpperAllocationFractionAboveG
        Memo
          This is the upper limit for biomass allocation in above ground organs, assumed to be a function of latitude.  It is the values used for partitioning growth in early spring.
        Constant MaximumAllocation: FixedValue=0.99; Units=g/g
        AddFunction EstimatedAllocation
          VariableReference MedianAllocation
            VariableName=[LowerAllocationFractionAboveG].EstimatedAllocation.MedianAllocation
          MultiplyFunction LatitudeFactor
            LessThanFunction AbsLatitude: same as Replacements.RedClover.LowerAllocationFractionAboveG.EstimatedAllocation.LatitudeFactor.AbsLatitude
            DivideFunction Variation
              SubtractFunction DeltaAllocation
                VariableReference MaximumAllocation: VariableName=[UpperAllocationFractionAboveG].MaximumAllocation
                VariableReference MedianAllocation
                  VariableName=[LowerAllocationFractionAboveG].EstimatedAllocation.MedianAllocation
              Constant ReferenceLatitude: FixedValue=50; Units=degrees
      LinearInterpolationFunction DeltaAnnualDayLength: XProperty=[Weather].Latitude
        XYPairs
          X=[-60.561, -60, -58, -56, -53, -50, -45, -40, -35, -30, -20, -10, 0, 10, 20, 30, 35, 40, 45, 50, 53, 56, 58, 60, 60.561]
          Y=[8.16263, 7.22844, 6.23534, 5.57804, 4.82687, 4.2383, 3.47239, 2.87562, 2.37888, 1.94128, 1.21059, 0.58553637, 0, 0.58553637, 1.21059, 1.94128, 2.37888, 2.87562, 3.47239, 4.2383, 4.82687, 5.57804, 6.23534, 7.22844, 8.16263]
        Memo
          This is the variation in day length within a year (i.e. the length of longest day minus that of the shortest).  It could, or should, be computed functions in 'Weather' as it is a function of latitude, but due to the lack of an accessor, a fitted function is used instead.  The value is used to generalise the computations of the target partitioning of new growth to above ground organs.
      CultivarFolder Cultivars
        Cultivar Colenso
          Memo Description
            *Colenso* is the basic red clover cultivar in the model.  This is an early flowering diploid cultivar with a semi-erect growth habit, developed to tolerate grazing and with improved growth over cool weather conditions.  With moderate levels of phyto-oestrogen.
        Cultivar Pawera
          Command:
            [Leaf].Photosynthesis.FT.XYPairs.X = 0,4,9,15,18.5,27,35,37.5
            [Leaf].Photosynthesis.FT.XYPairs.Y = 0,0,0.15,0.6,1,1,0.1,0
            [Leaf].NRetranslocationFactor.TemperatureFactor.XYPairs.X = 0,4,9,15,18.5,27,35,37.5
            [Leaf].NRetranslocationFactor.TemperatureFactor.XYPairs.Y = 0,0,0.15,0.6,1,1,0.1,0
            [Phenology].Inductive.Target.FixedValue = 20
            [Phenology].Inductive.Progression.SomeProgression.XYPairs.X = 12,13,14,15
            [Phenology].Reproductive.Target.FixedValue = 2000
          Memo Description
            *Pawera* was developed in New Zealand, it is a late flowering tetraploid cultivar with an erect growth habit, indicated for rotational grazing and silage.  The cultivar has a good summer-autumn growth, but little growth over winter.  Also, it contains high phyto-oestrogen levels.
        Cultivar Rajah
          Command:
            [Leaf].Photosynthesis.FT.XYPairs.X = 0,2.5,8,15,18,26,34,37.5
            [Leaf].Photosynthesis.FT.XYPairs.Y = 0,0,0.15,0.68,1,1,0.1,0
            [Leaf].NRetranslocationFactor.TemperatureFactor.XYPairs.X = 0,2.5,8,15,18,26,34,37.5
            [Leaf].NRetranslocationFactor.TemperatureFactor.XYPairs.Y = 0,0,0.15,0.68,1,1,0.1,0
            [Phenology].Inductive.Target.FixedValue = 15
            [Phenology].Inductive.Progression.SomeProgression.XYPairs.X = 12,12.5,13.5,14
            [Phenology].Reproductive.Target.FixedValue = 2200
          Memo Description
            *Rajah* is an European red clover with an intermediate to late flowering date.
    Manager ExtraVariables
```csharp
using Models.Interfaces;
using System;
using Models.Core;
using System.Collections.Generic;
using System.Text;
using Models.Soils;
using Models.PMF;
using Models;
using System.Xml.Serialization;
using APSIM.Shared.Utilities;
using Models.Interfaces;

namespace Models
{
    [Serializable] 
    public class Script : Model
    {
        [Link] private Clock Clock;
        [Link] private Zone myZone;
        [Link] private Weather Met;
        [Link] private Fertiliser Fert;
        [Link] private Irrigation Irrig;
        [Link] private ISummary mySummary;
        [Link] Models.Surface.SurfaceOrganicMatter SOM;
        [Link] Soils.Soil Soil;
        [ScopedLinkByName] private ISolute Urea;
        [ScopedLinkByName] private ISolute NO3;
        [ScopedLinkByName] private ISolute NH4;
        [ScopedLinkByName] private SoilNitrogen SoilNitrogen;
                    
        [XmlIgnore] public bool InitialDay { get; set; }
        [XmlIgnore] public double  InitialSoilOMN { get; set; }
        [XmlIgnore] public double  InitialSurfaceOMN { get; set; }
        [XmlIgnore] public double  InitialMineralN { get; set; }
        [XmlIgnore] public double AccumHarvestedWt { get; set; }
        [XmlIgnore] public double AccumHarvestedN { get; set; }
        [XmlIgnore] public double HerbageNConc { get; set; }

        private DateTime YearStartDate;
        private double yesterdayNconc;
        private List<Plant> PMFSpecies = new List<Plant>();
        private List<AgPasture.PastureSpecies> AgPSpecies = new List<AgPasture.PastureSpecies>();

        [EventSubscribe("Commencing")]
        private void OnSimulationCommencing(object sender, EventArgs e)
        {
            InitialDay = true;

            // set up the links to all plant species
            foreach (Plant species in Apsim.Children(myZone, typeof(Plant)))
                PMFSpecies.Add(species);
            foreach (AgPasture.PastureSpecies species in Apsim.Children(myZone, typeof(AgPasture.PastureSpecies)))
                AgPSpecies.Add(species);
        }

        [EventSubscribe("StartOfDay")]
        private void OnStartOfDay(object sender, EventArgs e)
        {
            double allDM = 0.0;
            double allN = 0.0;
            foreach (Plant species in Apsim.Children(myZone, typeof(Plant)))
            {
                allDM += species.AboveGround.Wt;
                allN += species.AboveGround.N;
            }
            foreach (AgPasture.PastureSpecies species in Apsim.Children(myZone, typeof(AgPasture.PastureSpecies)))
            {
                allDM += species.AboveGround.Wt*0.1;
                allN += species.AboveGround.N*0.1;
            }
            yesterdayNconc =  MathUtilities.Divide(allN, allDM, 0.0);
        }

        [EventSubscribe("DoManagement")]
        private void OnDoManagement(object sender, EventArgs e)
        {
            if (InitialDay == true)
            {
                InitialSurfaceOMN = SOM.N;
                InitialSoilOMN = MathUtilities.Sum(SoilNitrogen.FOMN)+MathUtilities.Sum(SoilNitrogen.MicrobialN)+MathUtilities.Sum(SoilNitrogen.HumicN);
                InitialMineralN = MathUtilities.Sum(Urea.kgha)+MathUtilities.Sum(NH4.kgha)+MathUtilities.Sum(NO3.kgha);
                InitialDay = false;

                // check whether we're in the north or south hemisphere
                if (Met.Latitude >= 0.0)
                    YearStartDate = DateTime.Parse("01/01/2000");
                else
                    YearStartDate = DateTime.Parse("01/07/2000");
            }

            HerbageNConc = yesterdayNconc;
        }
        
        [EventSubscribe("DoManagementCalculations")]
        private void OnDoManagementCalculations(object sender, EventArgs e)
        {
            //!!!!!! Plant Harvest !!!!!!
            if (Clock.Today.DayOfYear == YearStartDate.DayOfYear)
            {
	                AccumHarvestedWt = (double)myZone.Get("[DefoliationManager].Script.DefoliatedWt");
	                AccumHarvestedN = (double)myZone.Get("[DefoliationManager].Script.DefoliatedN");
            }
            else
            {
	                AccumHarvestedWt += (double)myZone.Get("[DefoliationManager].Script.DefoliatedWt");
	                AccumHarvestedN += (double)myZone.Get("[DefoliationManager].Script.DefoliatedN");
            }
        }
    }
}
```
  DataStore
    ExcelInput Observed: FileName=Observed.xlsx; SheetNames=[Observed]
    ExcelInput ObservedMeans: FileName=Observed.xlsx; SheetNames=[ObservedMeans]
    PredictedObserved: PredictedTableName=Report; ObservedTableName=Observed; FieldNameUsedForMatch=Date
    PredictedObserved PredictedObservedMeans: PredictedTableName=Report; ObservedTableName=ObservedMeans; FieldNameUsedForMatch=Date
  Folder Evaluation
    Memo Note
      Evaluating the performance of Apsim to simulate multi-species pasture swards against experiments conducted in New Zealand and Denmark.
    Folder NewZealand
      Experiment FRNLRuakuraMix1
        DisabledSimNames=[FRNLRuakuraNRate50, FRNLRuakuraNRate100, FRNLRuakuraNRate200, FRNLRuakuraNRate350]
        Memo
          ###FRNL Ruakura###

          This simulation setup was based on field trials performed at DairyNZ's Scott Farm, in Ruakura, New Zealand, between 2014 and 2016.  The experiment was part of the FRNL (Forages for Reduced Nitrogen Leaching) program and the data is basically unpublished (references will be added when they come about).  Here only plots with the "standard" mixed pasture species are used, this includes ryegrass and white clover (weeds also occured, but are not included in the simulation - the fraction of biomass was fairly small).
          The experiment consisted of six fertiliser treatments (nominally at N rates of 0, 50, 100, 200, 350 and 500 kg/ha/yr) in three replicates; actual amounts varied as fertiliser applications followed pasture harvests.  Measurements comprised yield, for each species, and quality indicators (here N content is used), for whole sward.
          Observed data supplied by Grant Edwards, Lincoln University.

          The soil at the experimental site was a Horotiu silt loam (an Orthic Allophanic soil; USDA: Typic Udivitrand), the parameters required were inferred using data from the New Zealand National Soils Database (Landcare Research).
          Weather data was obtained from nearby Ruakura weather station (NIWA).
          Simulation of ryegrass and lucerne are done using the AgPasture model as the PMF versions are still under development.
        Factors
          Factor NRate: Specification=[NRate]
            Operations 0
            Operations 50
              2014-12-22  [Fertiliser].Apply(Amount: 5, Type: Fertiliser.Types.UreaN, Depth: 10)
              2015-01-22  [Fertiliser].Apply(Amount: 5, Type: Fertiliser.Types.UreaN, Depth: 10)
              2015-03-10  [Fertiliser].Apply(Amount: 5, Type: Fertiliser.Types.UreaN, Depth: 10)
              2015-04-16  [Fertiliser].Apply(Amount: 5, Type: Fertiliser.Types.UreaN, Depth: 10)
              2015-05-21  [Fertiliser].Apply(Amount: 5, Type: Fertiliser.Types.UreaN, Depth: 10)
              2015-07-31  [Fertiliser].Apply(Amount: 5, Type: Fertiliser.Types.UreaN, Depth: 10)
              2015-09-16  [Fertiliser].Apply(Amount: 5, Type: Fertiliser.Types.UreaN, Depth: 10)
              2015-11-19  [Fertiliser].Apply(Amount: 5, Type: Fertiliser.Types.UreaN, Depth: 10)
              2015-12-17  [Fertiliser].Apply(Amount: 5, Type: Fertiliser.Types.UreaN, Depth: 10)
              2016-01-26  [Fertiliser].Apply(Amount: 5, Type: Fertiliser.Types.UreaN, Depth: 10)
              2016-03-09  [Fertiliser].Apply(Amount: 5, Type: Fertiliser.Types.UreaN, Depth: 10)
              2016-04-20  [Fertiliser].Apply(Amount: 5, Type: Fertiliser.Types.UreaN, Depth: 10)
              2016-06-13  [Fertiliser].Apply(Amount: 5, Type: Fertiliser.Types.UreaN, Depth: 10)
              2016-08-24  [Fertiliser].Apply(Amount: 5, Type: Fertiliser.Types.UreaN, Depth: 10)
              2016-09-30  [Fertiliser].Apply(Amount: 5, Type: Fertiliser.Types.UreaN, Depth: 10)
              2016-11-03  [Fertiliser].Apply(Amount: 5, Type: Fertiliser.Types.UreaN, Depth: 10)
            Operations 100
              2014-12-22  [Fertiliser].Apply(Amount: 10, Type: Fertiliser.Types.UreaN, Depth: 10)
              2015-01-22  [Fertiliser].Apply(Amount: 10, Type: Fertiliser.Types.UreaN, Depth: 10)
              2015-03-10  [Fertiliser].Apply(Amount: 10, Type: Fertiliser.Types.UreaN, Depth: 10)
              2015-04-16  [Fertiliser].Apply(Amount: 10, Type: Fertiliser.Types.UreaN, Depth: 10)
              2015-05-21  [Fertiliser].Apply(Amount: 10, Type: Fertiliser.Types.UreaN, Depth: 10)
              2015-07-31  [Fertiliser].Apply(Amount: 10, Type: Fertiliser.Types.UreaN, Depth: 10)
              2015-09-16  [Fertiliser].Apply(Amount: 10, Type: Fertiliser.Types.UreaN, Depth: 10)
              2015-11-19  [Fertiliser].Apply(Amount: 10, Type: Fertiliser.Types.UreaN, Depth: 10)
              2015-12-17  [Fertiliser].Apply(Amount: 10, Type: Fertiliser.Types.UreaN, Depth: 10)
              2016-01-26  [Fertiliser].Apply(Amount: 10, Type: Fertiliser.Types.UreaN, Depth: 10)
              2016-03-09  [Fertiliser].Apply(Amount: 10, Type: Fertiliser.Types.UreaN, Depth: 10)
              2016-04-20  [Fertiliser].Apply(Amount: 10, Type: Fertiliser.Types.UreaN, Depth: 10)
              2016-06-13  [Fertiliser].Apply(Amount: 10, Type: Fertiliser.Types.UreaN, Depth: 10)
              2016-08-24  [Fertiliser].Apply(Amount: 10, Type: Fertiliser.Types.UreaN, Depth: 10)
              2016-09-30  [Fertiliser].Apply(Amount: 10, Type: Fertiliser.Types.UreaN, Depth: 10)
              2016-11-03  [Fertiliser].Apply(Amount: 10, Type: Fertiliser.Types.UreaN, Depth: 10)
            Operations 200
              2014-12-22  [Fertiliser].Apply(Amount: 20, Type: Fertiliser.Types.UreaN, Depth: 10)
              2015-01-22  [Fertiliser].Apply(Amount: 20, Type: Fertiliser.Types.UreaN, Depth: 10)
              2015-03-10  [Fertiliser].Apply(Amount: 20, Type: Fertiliser.Types.UreaN, Depth: 10)
              2015-04-16  [Fertiliser].Apply(Amount: 20, Type: Fertiliser.Types.UreaN, Depth: 10)
              2015-05-21  [Fertiliser].Apply(Amount: 20, Type: Fertiliser.Types.UreaN, Depth: 10)
              2015-07-31  [Fertiliser].Apply(Amount: 20, Type: Fertiliser.Types.UreaN, Depth: 10)
              2015-09-16  [Fertiliser].Apply(Amount: 20, Type: Fertiliser.Types.UreaN, Depth: 10)
              2015-11-19  [Fertiliser].Apply(Amount: 20, Type: Fertiliser.Types.UreaN, Depth: 10)
              2015-12-17  [Fertiliser].Apply(Amount: 20, Type: Fertiliser.Types.UreaN, Depth: 10)
              2016-01-26  [Fertiliser].Apply(Amount: 20, Type: Fertiliser.Types.UreaN, Depth: 10)
              2016-03-09  [Fertiliser].Apply(Amount: 20, Type: Fertiliser.Types.UreaN, Depth: 10)
              2016-04-20  [Fertiliser].Apply(Amount: 20, Type: Fertiliser.Types.UreaN, Depth: 10)
              2016-06-13  [Fertiliser].Apply(Amount: 20, Type: Fertiliser.Types.UreaN, Depth: 10)
              2016-08-24  [Fertiliser].Apply(Amount: 20, Type: Fertiliser.Types.UreaN, Depth: 10)
              2016-09-30  [Fertiliser].Apply(Amount: 20, Type: Fertiliser.Types.UreaN, Depth: 10)
              2016-11-03  [Fertiliser].Apply(Amount: 20, Type: Fertiliser.Types.UreaN, Depth: 10)
            Operations 350
              2014-12-22  [Fertiliser].Apply(Amount: 35, Type: Fertiliser.Types.UreaN, Depth: 10)
              2015-01-22  [Fertiliser].Apply(Amount: 35, Type: Fertiliser.Types.UreaN, Depth: 10)
              2015-03-10  [Fertiliser].Apply(Amount: 35, Type: Fertiliser.Types.UreaN, Depth: 10)
              2015-04-16  [Fertiliser].Apply(Amount: 35, Type: Fertiliser.Types.UreaN, Depth: 10)
              2015-05-21  [Fertiliser].Apply(Amount: 35, Type: Fertiliser.Types.UreaN, Depth: 10)
              2015-07-31  [Fertiliser].Apply(Amount: 35, Type: Fertiliser.Types.UreaN, Depth: 10)
              2015-09-16  [Fertiliser].Apply(Amount: 35, Type: Fertiliser.Types.UreaN, Depth: 10)
              2015-11-19  [Fertiliser].Apply(Amount: 35, Type: Fertiliser.Types.UreaN, Depth: 10)
              2015-12-17  [Fertiliser].Apply(Amount: 35, Type: Fertiliser.Types.UreaN, Depth: 10)
              2016-01-26  [Fertiliser].Apply(Amount: 35, Type: Fertiliser.Types.UreaN, Depth: 10)
              2016-03-09  [Fertiliser].Apply(Amount: 35, Type: Fertiliser.Types.UreaN, Depth: 10)
              2016-04-20  [Fertiliser].Apply(Amount: 35, Type: Fertiliser.Types.UreaN, Depth: 10)
              2016-06-13  [Fertiliser].Apply(Amount: 35, Type: Fertiliser.Types.UreaN, Depth: 10)
              2016-08-24  [Fertiliser].Apply(Amount: 35, Type: Fertiliser.Types.UreaN, Depth: 10)
              2016-09-30  [Fertiliser].Apply(Amount: 35, Type: Fertiliser.Types.UreaN, Depth: 10)
              2016-11-03  [Fertiliser].Apply(Amount: 35, Type: Fertiliser.Types.UreaN, Depth: 10)
            Operations 500
              2014-12-22  [Fertiliser].Apply(Amount: 50, Type: Fertiliser.Types.UreaN, Depth: 10)
              2015-01-22  [Fertiliser].Apply(Amount: 50, Type: Fertiliser.Types.UreaN, Depth: 10)
              2015-03-10  [Fertiliser].Apply(Amount: 50, Type: Fertiliser.Types.UreaN, Depth: 10)
              2015-04-16  [Fertiliser].Apply(Amount: 50, Type: Fertiliser.Types.UreaN, Depth: 10)
              2015-05-21  [Fertiliser].Apply(Amount: 50, Type: Fertiliser.Types.UreaN, Depth: 10)
              2015-07-31  [Fertiliser].Apply(Amount: 50, Type: Fertiliser.Types.UreaN, Depth: 10)
              2015-09-16  [Fertiliser].Apply(Amount: 50, Type: Fertiliser.Types.UreaN, Depth: 10)
              2015-11-19  [Fertiliser].Apply(Amount: 50, Type: Fertiliser.Types.UreaN, Depth: 10)
              2015-12-17  [Fertiliser].Apply(Amount: 50, Type: Fertiliser.Types.UreaN, Depth: 10)
              2016-01-26  [Fertiliser].Apply(Amount: 50, Type: Fertiliser.Types.UreaN, Depth: 10)
              2016-03-09  [Fertiliser].Apply(Amount: 50, Type: Fertiliser.Types.UreaN, Depth: 10)
              2016-04-20  [Fertiliser].Apply(Amount: 50, Type: Fertiliser.Types.UreaN, Depth: 10)
              2016-06-13  [Fertiliser].Apply(Amount: 50, Type: Fertiliser.Types.UreaN, Depth: 10)
              2016-08-24  [Fertiliser].Apply(Amount: 50, Type: Fertiliser.Types.UreaN, Depth: 10)
              2016-09-30  [Fertiliser].Apply(Amount: 50, Type: Fertiliser.Types.UreaN, Depth: 10)
              2016-11-03  [Fertiliser].Apply(Amount: 50, Type: Fertiliser.Types.UreaN, Depth: 10)
        Simulation FRNLRuakuraMix1
          Clock: StartDate=2014-09-01; EndDate=2016-12-31
          Weather: FileName=Ruakura.met
          Summary summaryfile
          SoilArbitrator Soil Arbitrator
          Zone Field: Area=1; Slope=0
            Folder Management
              Operations Sowing
                2014-10-24  [WhiteClover].Sow(population: 50, cultivar: "Kopu", depth: 5, rowSpacing: 150)
                2014-09-01  [Ryegrass].EndCrop()
                2014-11-15  [Ryegrass].Sow(population: 0, cultivar: "R", depth: 0, rowSpacing: 0)
              Operations NRate
              Operations BaseFertiliser
                2014-10-13  [Fertiliser].Apply(Amount: 26.4, Type: Fertiliser.Types.UreaN, Depth: 10)
                2014-12-23  [Fertiliser].Apply(Amount: 3.9, Type: Fertiliser.Types.UreaN, Depth: 10)
              Manager DefoliationManager
                AutomaticManagementIsEnabled = False
                DefoliationRotationStartDate = 2014-11-01
                DefoliationRotationEndDate = 2100-12-31
                DefoliateType = Cut
                DefoliationTriggerType = TargetStandingBiomass
                IntervalBetweenDefoliations = 21
                TargetStandingBiomass = 200
                DurationOfEachDefoliation = 1
                RemoveAmountType = ResidualDM
                AmountForEachDefoliation = 150
                RemoveAllBiomassIsEnabled = False
                DMRemoveType = UserDefinedFraction
                FractionDMToRemove = 1
                NRemoveType = UserDefinedFraction
                FractionNToRemove = 1
                ReturnType = AsResidue
                NDungType = DefineCNratio
                ProportionN2Dung = 0.4
                CNRatioDung = 20
                UrineDepth = 250
```csharp
// Performs defoliations, or removes biomass, from any existing plant (PMF and/or AgPasture) based on a set of given rules.  
// Defoliations can be triggered automatically by this manager or be called from another Script or a Schedule model.
// Developed by RCichota, last updated in 31/Mar/2019

namespace Models
{
	using System;
	using System.Xml.Serialization;
	using System.Collections.Generic;
	using APSIM.Shared.Utilities;
	using Models.Core;
	using Models.Soils;
	using Models.PMF;
	using Models.Interfaces;
	using Models.PMF.Interfaces;

    [Serializable]
    public class Script : Model
    {
        //> Links to other Apsim models
        [Link] private Clock clock;
        [Link] private Zone myZone;
        [Link] private Soil mySoil;
        [ScopedLinkByName] private ISolute Urea;
        [Link] private ISummary mySummary;
        //Auxiliary 'links'
        private List<Plant> PMFSpecies = new List<Plant>();
        private List<AgPasture.PastureSpecies> AgPSpecies = new List<AgPasture.PastureSpecies>();

        //> Events raised by this manager
        public event BiomassRemovedDelegate BiomassRemoved;

        //> User inputs from properties tab
        [Separator("Generic defoliation management - removes biomass from PMF and AgPasture species, plus residue management")]
        [Description("Allow this manager to control defoliations? ")]
        public bool AutomaticManagementIsEnabled { get; set; }
        [Description("Date to start the defoliation management (dd/mm/yyyy): ")]
        public DateTime DefoliationRotationStartDate { get; set; }
        [Description("Date to end the defoliation management (dd/mm/yyyy): ")]
        public DateTime DefoliationRotationEndDate { get; set; }

        [Separator("Parameters defining how the defoliation is managed")]
        [Description("What type of defoliation should be triggered? ")]
        public DefoliationTypes DefoliateType { get; set; }
        [Description("How the defoliations should be triggered? ")]
        public DefoliationTriggerTypes DefoliationTriggerType { get; set; }
        [Description("  Minimum number of days between defoliations, used if trigger is an interval: ")]
        public int IntervalBetweenDefoliations { get; set; }
        [Description("  Minimum standing biomass to start defoliations, used if trigger is DM target(g/m2): ")]
        public int TargetStandingBiomass { get; set; }
        [Description("Duration of each defoliation event (days): ")]
        public int DurationOfEachDefoliation { get; set; }
        [Description("Which amount is being defined? ")]
        public DefoliateAmountTypes RemoveAmountType { get; set; }
        [Description("DM amount to use (g/m2): ")]
        public double AmountForEachDefoliation { get; set; }
        [Description("For PMF species, allow all biomass to be removed? ")]
        public bool RemoveAllBiomassIsEnabled { get; set; }

        [Separator("Parameters defining the management of the defoliated biomass")]
        [Description("How much of the DM defoliated is to be removed from the field? ")]
        public DMRemovalTypes DMRemoveType { get; set; }
        [Description("  Fraction of DM to remove off field, if using UserDefinedFraction (0-1): ")]
        public double FractionDMToRemove { get; set; }
        [Description("How much of the N defoliated is to be removed from the field? ")]
        public NRemovalTypes NRemoveType { get; set; }
        [Description("  Fraction of N to remove off field, if using UserDefinedFraction (0-1): ")]
        public double FractionNToRemove { get; set; }
        [Description("How the non-removed material is returned to the field? ")]
        public ReturnAsTypes ReturnType { get; set; }

        [Separator("Parameters for partitioning non-removed N into urine and dung")]
        [Description("How the partition of N to dung and urine is defined? ")]
        public DungNContentTypes NDungType { get; set; }
        [Description("  Proportion of N returned in dung, if using DefineProportion (0-1): ")]
        public double ProportionN2Dung { get; set; }
        [Description("  The C:N of dung, if using DefineCNratio (typically around 20): ")]
        public double CNRatioDung { get; set; }
        [Description("Soil depth down to which urine should be applied (mm): ")]
        public double UrineDepth { get; set; }

        //> Outputs from this manager
        [XmlIgnore][Units("g/m2")] // Pasture DM defoliated (removed from plants) today
        public double DefoliatedWt{ get; set; }
        [XmlIgnore][Units("g/m2")] // N in the pasture material defoliated today
        public double DefoliatedN{ get; set; }
        [XmlIgnore][Units("g/m2")] // Pasture DM harvested (removed from plants minus direct residue) today
        public double HarvestedWt{ get; set; }
        [XmlIgnore][Units("g/m2")] // N in the pasture material harvested today
        public double HarvestedN{ get; set; }
        [XmlIgnore][Units("g/m2")] // Pasture DM actually removed from the field
        public double RemovedWt{ get; set; }
        [XmlIgnore][Units("g/m2")] // N in the pasture material removed from the field
        public double RemovedN{ get; set; }
        [XmlIgnore][Units("g/m2")] // Pasture DM returned by this manager to the field
        public double ReturnedWt{ get; set; }
        [XmlIgnore][Units("g/m2")] // N in the pasture material returned by this manager to the field
        public double ReturnedN{ get; set; }
        [XmlIgnore][Units("g/m2")] // Non-removed N returned as dung (to SurfaceOM)
        public double NReturnedInDung{ get; set; }
        [XmlIgnore][Units("g/m2")] // Non-removed N returned as urine (soil urea)
        public double NReturnedInUrine{ get; set; }
        [XmlIgnore][Units("days")] // Number of days since the end of last defoliation event
        public int DaysSinceLastDefoliation{ get; set; }
        [XmlIgnore][Units("g/m2")] // Total standing aboveground DM before a defoliation
        public double PreHarvestDM{ get; set; }
        [XmlIgnore][Units("g/m2")] // Total standing aboveground DM after a defoliation
        public double PostHarvestDM{ get; set; }
        [XmlIgnore][Units("g/m2")] // Total pasture DM harvested over a complete defoliation event
        public double RotationHarvestedDM{ get; set; }

        //> Internal variables
        private string baseDefoliationType;			  // type of defoliation, as set in UI (Cut, Graze, or harvest)
        private string typeOfDefoliation;			  // type of defoliation, as defined in Defoliate() (Cut, Graze, or harvest)
        private string baseAmountType;				  // type of DM amount, as set in UI (ResidualDM or DMToRemove)
        private string typeOfAmount;				  // type of DM amount, as defined in Defoliate() (ResidualDM, DMToRemove, or UseDefoliationFractions)
        private double amountGiven;					  // DM amount given, to use in the defoliation management (g/m2)
        private double herbageToRemove;				  // total herbage to remove per day (g/m2)
        private RemovalFractions defoliationFractions;// fraction of each organ to defoliate (PMF species)
        private double[] urineFraction;				  // fraction of urine to be applied in each soil layer
        private int durationOfDefoliation;			  // duration of a defoliation event
        private int daysDefoliating;				  // counter for days within a defoliation event
        private double cumAmountHarvested;			  // cumulative defoliated amount within each event
        // auxiliary boolean
        private bool aDefoliationHasHappened = false; // flag whether a defoliation has happened in this simulation run

        // auxiliary - lists of species and removal fractions
        private string[] swardSpeciesName;			  // name of each species in the sward
        private string[] swardSpeciesType;			  // type of each species in the sward (PMF or AgPasture)
        private double[] speciesFraction;			  // biomass fraction of harvestable material of each species

        [EventSubscribe("Commencing")]
        private void OnSimulationCommencing(object sender, EventArgs e)
        {
            // check the type of defoliation given
            if (DefoliateType == DefoliationTypes.Cut)
                baseDefoliationType = "Cut";
            else if (DefoliateType == DefoliationTypes.Graze)
                baseDefoliationType = "Graze";
            else
                baseDefoliationType = "Harvest";

            // check the type of amount given
            if (RemoveAmountType == DefoliateAmountTypes.DMToRemove)
                baseAmountType = "DMToRemove";
            else if (RemoveAmountType == DefoliateAmountTypes.ResidualDM)
                baseAmountType = "ResidualDM";
            else
                baseAmountType = "UseDefoliationFractions";

            // check the interval between events
            if (IntervalBetweenDefoliations < 1)
                throw new Exception("The interval between defoliation events must be at least one day");

            // check the duration for each defoliation
            if(DurationOfEachDefoliation <= 0)
                throw new Exception("The duration of defoliations cannot be zero or negative!");

            // check the fraction of defoliated material to remove from the field
            if (DMRemoveType == DMRemovalTypes.RemoveAll)
                FractionDMToRemove = 1.0;
            else if (DMRemoveType == DMRemovalTypes.RemoveNone)
                FractionDMToRemove = 0.0;
            else if (DMRemoveType == DMRemovalTypes.BasedOnDigestibility)
                FractionDMToRemove = -1.0;  // will be calculated dynamically
            else // DMRemoveType == DMRemovalTypes.UserDefinedFraction
            {
                if (FractionDMToRemove < 0.0)
                    throw new Exception("The fraction of DM defoliated to remove from the field cannot be negative!");
            }

            // check the fraction of defoliated N to remove from the field
            if (NRemoveType == NRemovalTypes.RemoveAll)
                FractionNToRemove = 1.0;
            else if (NRemoveType == NRemovalTypes.RemoveNone)
                FractionNToRemove = 0.0;
            else if (NRemoveType == NRemovalTypes.ProportionalToDM)
            	FractionNToRemove = FractionDMToRemove;
            else // NRemoveType == NRemovalTypes.UserDefinedFraction
            {
                if (FractionNToRemove < 0.0)
                    throw new Exception("The fraction of defoliated N to remove from the field cannot be negative!");
            }

            // set up the links to all plant species
            foreach (Plant species in Apsim.Children(myZone, typeof(Plant)))
                PMFSpecies.Add(species);
            foreach (AgPasture.PastureSpecies species in Apsim.Children(myZone, typeof(AgPasture.PastureSpecies)))
                AgPSpecies.Add(species);

            int numPlants = PMFSpecies.Count + AgPSpecies.Count;
            swardSpeciesName = new string[numPlants];
            swardSpeciesType = new string[numPlants];
            int i = 0;
            foreach (Plant species in Apsim.Children(myZone, typeof(Plant)))
            {
                swardSpeciesName[i] = species.Name;
                swardSpeciesType[i] = "PMF";
                i += 1;
            }
            foreach (AgPasture.PastureSpecies species in Apsim.Children(myZone, typeof(AgPasture.PastureSpecies)))
            {
                swardSpeciesName[i] = species.Name;
                swardSpeciesType[i] = "AgPasture";
                i += 1;
            }

            // make sure that management starts when RotationStartDate < simulationStartDay
            if ((clock.Today > DefoliationRotationStartDate) && (clock.Today < DefoliationRotationEndDate))
                DefoliationRotationStartDate = clock.Today;

            // initialise some variables
            speciesFraction = new double[numPlants];
            defoliationFractions = new RemovalFractions();
            DaysSinceLastDefoliation = 0;
            durationOfDefoliation = -1;
            daysDefoliating = 0;
            resetMyOutputs();

            // set the fraction of urine for each layer
            if (ReturnType == ReturnAsTypes.AsDungUrine)
            {
	            double depthFromSurface = 0.0;
	            for (int layer = 0; layer < mySoil.Thickness.Length; layer++)
	            {
	                depthFromSurface += mySoil.Thickness[layer];
	            	if (depthFromSurface >= UrineDepth)
	            	{ // bottom layer found
	            		urineFraction = new double[layer + 1];
		                double atZ0;
		                double atZ1;
			            double distFactor = 1.5;
		                double totalProp = UrineDepth * Math.Pow(1.0, distFactor) / (distFactor + 1.0);
	            		depthFromSurface = 0.0;
		                atZ1 = (UrineDepth - depthFromSurface) * Math.Pow(1.0 - depthFromSurface / UrineDepth, distFactor) / (distFactor + 1.0);
	            		for (int z = 0; z < layer+1; z++)
		                {
		                    atZ0 = atZ1;
		                    depthFromSurface += mySoil.Thickness[z];
		                    atZ1 = (UrineDepth - depthFromSurface) * Math.Pow(1.0 - depthFromSurface / UrineDepth, distFactor) / (distFactor + 1);
		                    if (1.0 - (depthFromSurface / UrineDepth) < 0.0)
		                        atZ1 = 0;
		                    urineFraction[z] = (atZ0 - atZ1) / totalProp;
		                }
	                    layer = mySoil.Thickness.Length;
	                }
	            }
            }

            // write message in summary
            mySummary.WriteMessage(this," Automatic defoliation manager initialised");
            if (AutomaticManagementIsEnabled)
            {
	            mySummary.WriteMessage(this, "   Defoliations will happen between " + DefoliationRotationStartDate.ToShortDateString()
                     					 + " and " + DefoliationRotationEndDate.ToShortDateString() + ".");
                mySummary.WriteMessage(this, "   Biomass from the sward will be defoliated simulating a \"" + baseDefoliationType + "\" rotation.");
                if (DefoliationTriggerType == DefoliationTriggerTypes.TargetStandingBiomass)
                    mySummary.WriteMessage(this, "   Events will happen whenever aboveground biomass surpasses " + TargetStandingBiomass.ToString("#0.0") + " g/m2.");
                else
                    mySummary.WriteMessage(this, "   Events will happen every " + IntervalBetweenDefoliations + " days, if there is enough biomass.");
                if(baseAmountType == "ResidualDM")
                	mySummary.WriteMessage(this, "   Removing biomass down to a residual amount of " + AmountForEachDefoliation.ToString("#.0") + " g/m2 over " 
                	                         + DurationOfEachDefoliation + " days.");
                else
                	mySummary.WriteMessage(this, "   Removing " + AmountForEachDefoliation.ToString("#.0") + " g/m2 of biomass per day over " 
                	                         + DurationOfEachDefoliation + " days.");
	        }
            else
            {
	            mySummary.WriteMessage(this,"   Automatic defoliations are currently disabled, though defoliations can be triggered by another manager");
                mySummary.WriteMessage(this,"   If called, the manager will remove biomass from the sward simulating a \"" + baseDefoliationType + "\" event.");
            }

            if(ReturnType == ReturnAsTypes.AsDungUrine)
            {
            	mySummary.WriteMessage(this,"   Non-removed material will be returned as dung and urine. Urine added to soil according to proportions: "
            	+ string.Join(", ",urineFraction));
            }
            else
            	mySummary.WriteMessage(this,"   Non-removed material will be returned as residue.");
        }

        [EventSubscribe("DoManagement")]
        private void OnDoManagement(object sender, EventArgs e)
        {
            // check whether we need to continue defoliationg, i.e. within a multi-day defoliation event (need to check this first in the day)
            if ((daysDefoliating > 0) && (daysDefoliating < durationOfDefoliation))
            {
                // reset outputs
                resetMyOutputs();

                // re-check the amount to defoliate
	            double harvestableBiomass = harvestableSwardBiomass("All", "Harvestable");
                if (typeOfAmount == "DMToRemove")
                {
					if(harvestableBiomass > 0.001)
	                    herbageToRemove = Math.Min(harvestableBiomass, (amountGiven - cumAmountHarvested) / (durationOfDefoliation - daysDefoliating));
                }
                else if (typeOfAmount == "ResidualDM")
                {
	            	double currentDM = standingSwardBiomassWt;
	                if (currentDM > amountGiven)
	                    herbageToRemove = Math.Min(harvestableBiomass, (currentDM - amountGiven) / (durationOfDefoliation - daysDefoliating));
                }

                // remove plant biomass and return residue
	            if (Math.Abs(herbageToRemove) >= 0.001)
                {
	                // set biomass removal
mySummary.WriteMessage(this, "   Defoliation initialised on DoManagement - " + clock.Today.Date.ToShortDateString());
	                defoliateSward(herbageToRemove, typeOfDefoliation);

	                // return residue or excreta
		            if(ReturnedWt + ReturnedN > 0.0)
		            {
		                if (ReturnType == ReturnAsTypes.AsResidue)
		                    returnResidues();
		                else
		                    returnExcreta();
					}

	                // gather amount removed this event
	                cumAmountHarvested += HarvestedWt;
	            }

                daysDefoliating += 1;
            }

            // check whether a defoliation ended yesterday
            if (daysDefoliating < 0)
            { // clean up variables
                resetMyOutputs();
                daysDefoliating = 0;
            }

        	// check whether automatic defoliations are enabled
        	if (AutomaticManagementIsEnabled)
        	{
                // check whether we are within the period in which defoliations can happen
	            if ((clock.Today.Date >= DefoliationRotationStartDate.Date) && (clock.Today.Date <= DefoliationRotationEndDate.Date))
	            {
	                if (clock.Today.Date == DefoliationRotationStartDate.Date)
	                    DaysSinceLastDefoliation = IntervalBetweenDefoliations;

                    // check whether we should start a defoliation event
                    if (DefoliationTriggerType == DefoliationTriggerTypes.FixedInterval)
                    {
                        if (DaysSinceLastDefoliation == IntervalBetweenDefoliations)
		                    Defoliate(baseDefoliationType, AmountForEachDefoliation, baseAmountType, DurationOfEachDefoliation);
                    }
                    else if (DefoliationTriggerType == DefoliationTriggerTypes.TargetInterval)
                    {
                        if (DaysSinceLastDefoliation >= IntervalBetweenDefoliations)
                            Defoliate(baseDefoliationType, AmountForEachDefoliation, baseAmountType, DurationOfEachDefoliation);
                    }
                    else  //DefoliationTriggerType == DefoliationTriggerTypes.TargetStandingBiomass
                    {
                        if (standingSwardBiomassWt >= TargetStandingBiomass)
                            Defoliate(baseDefoliationType, AmountForEachDefoliation, baseAmountType, DurationOfEachDefoliation);
                    }
	            }
                //// Note: Only the code above, responsible for triggering automatic events, is limited by 'AutomaticManagementIsEnabled'. 
                ////       The rest of the code is still available to perform one-off defoliations.
                ////       It can be called from another manager or a schedulle thingy via Defoliate().
            }
        }

        [EventSubscribe("DoManagementCalculations")]
        private void OnDoManagementCalculations(object sender, EventArgs e)
        {
            // check whether a defoliation event has just been completed
            if (daysDefoliating == durationOfDefoliation)
            {
            	// get amount of biomass remaining and zero counters
                PostHarvestDM = standingSwardBiomassWt;
                RotationHarvestedDM = cumAmountHarvested;
                aDefoliationHasHappened = true;
                daysDefoliating = -1;
            }

            // count the days after a defoliation
            if (aDefoliationHasHappened && (daysDefoliating == 0))
                DaysSinceLastDefoliation += 1;
        }

        /// <summary>Sets up a defoliation event.</summary>
        /// <param name="defoliationType">Type of defoliation (cut, graze, or harvest)</param>
        /// <param name="amountDM">Amount of biomass to use (g/m2)</param>
        /// <param name="amountType">How the DM amount is interpreted (toRemove, residual)</param>
        /// <param name="duration">Number of days to defoliate over</param>
        public void Defoliate(string defoliationType, double amountDM, string amountType, int duration)
        {
            // check whether there are plants in the sward that can be defoliated
            if (swardHasLivingPlants)
            {
	            // check the defoliation type
	            if (defoliationType.ToLower() == "cut")
	                typeOfDefoliation = "Cut";
	            else if (defoliationType.ToLower() == "graze")
	                typeOfDefoliation = "Graze";
	            else if (defoliationType.ToLower() == "harvest")
	                typeOfDefoliation = "Harvest";
	            else
	                throw new Exception("Defoliation type should be either \"Cut\", \"Graze\", or \"Harvest\"!");

	            // check DM amount given
	            if (amountDM < 0.0)
	                throw new Exception("Amount to defoliate cannot be negative!");
	            else
	                amountGiven = amountDM;

	            // check the type of amount given
	            if (amountType.ToLower() == "dmtoremove")
	                typeOfAmount = "DMToRemove";
	            else if (amountType.ToLower() == "residualdm")
	                typeOfAmount = "ResidualDM";
	            else if (amountType.ToLower() == "usedefoliationfractions")
	                typeOfAmount = "UseDefoliationFractions";
	            else
		            throw new Exception("Amount type should be \"DMToRemove\", \"ResidualDM\", or \"UseDefoliationFractions\"!");

	            // check duration given
	            if (duration <= 0)
	                throw new Exception("Duration of defoliation cannot be zero or negative!");
	            else
	            	durationOfDefoliation = duration;

	            // check existing biomass and amount to remove
	            PreHarvestDM = standingSwardBiomassWt;
	            herbageToRemove = 0.0;
		        double harvestableBiomass = harvestableSwardBiomass("All", "Harvestable");
	        	if (typeOfAmount == "UseDefoliationFractions")
	        	{ // amount given is ignored, removal based on fractions
	        		amountGiven = 0.0;
	                if (harvestableBiomass > 0.0)
	                    herbageToRemove = -1.0;

	                mySummary.WriteMessage(this, "   Defoliation triggered, removing biomass using the removal fractions (set or default), during " + durationOfDefoliation + " days");
	        	}
	        	else if (typeOfAmount == "DMToRemove")
	        	{
	        		if (amountGiven > 0.001)
		            { // a meaningful amount was given, check whether all can be removed
						if (harvestableBiomass > 0.001)
		                	herbageToRemove = Math.Min(harvestableBiomass, amountGiven / durationOfDefoliation);

		                mySummary.WriteMessage(this, "   Defoliation triggered, attempting to remove " + amountGiven.ToString("#0.0") + " g/m2 of biomass over " + durationOfDefoliation + " days");
		            }
		        }
	            else if (typeOfAmount == "ResidualDM")
	            {
	            	// check how much biomass will be removed
	                if (PreHarvestDM > amountGiven)
	                    herbageToRemove = Math.Min(harvestableBiomass, (PreHarvestDM - amountGiven) / durationOfDefoliation);

	                mySummary.WriteMessage(this, "   Defoliation triggered, attempting to remove biomass down to " + amountGiven.ToString("#0.0") + " g/m2 over " + durationOfDefoliation + " days");
		        }

	            // can defoliation begin?
	            if (Math.Abs(herbageToRemove) >= 0.001)
				{
		            // set off first defoliation
mySummary.WriteMessage(this, "   Defoliation initialised on Defoliate - " + clock.Today.Date.ToShortDateString());
		            defoliateSward(herbageToRemove, typeOfDefoliation);

		            // return residue or excreta
		            if(ReturnedWt + ReturnedN > 0.0)
		            {
			            if (ReturnType == ReturnAsTypes.AsResidue)
			                returnResidues();
			            else
			                returnExcreta();
					}

		            // gather values for this event
		            cumAmountHarvested = HarvestedWt;
		            daysDefoliating = 1;
		            DaysSinceLastDefoliation = 0;
				}
				else
				{
		            // abort command as there is not enough biomass, check interval type
	                if (DefoliationTriggerType == DefoliationTriggerTypes.FixedInterval)
	                { // count the event as if it did happen
	                    cumAmountHarvested = 0.0;
	                    daysDefoliating = 1;
	                    DaysSinceLastDefoliation = 0;
	                }

	                mySummary.WriteMessage(this, "   Defoliation did not happend because current biomass (" + PreHarvestDM.ToString("#0.0") + " g/m2) is too low (total harvestable = " + harvestableBiomass.ToString("#0.0") + " g/m2)");
				}
			}
			else
			{
				mySummary.WriteMessage(this, "   Defoliation did not happend because there is no growing plants in the sward");
			}
        }

        /// <summary>Resets the values of outputs.</summary>
        private void resetMyOutputs()
        {
            DefoliatedWt = 0.0;
            DefoliatedN = 0.0;
            HarvestedWt = 0.0;
            HarvestedN = 0.0;
            RemovedWt = 0.0;
            RemovedN = 0.0;
            ReturnedWt = 0.0;
            ReturnedN = 0.0;
            NReturnedInDung = 0.0;
            NReturnedInUrine = 0.0;
            RotationHarvestedDM = 0.0;
        }

        /// <summary>Flags whether there is any living plant in the sward.</summary>
        private bool swardHasLivingPlants
        {
	        get
	        {
	        	bool result = false;
	        	foreach (Plant species in PMFSpecies)
                   	result |= species.IsAlive;
                foreach (AgPasture.PastureSpecies species in AgPSpecies)
                   	result |= species.IsAlive;
                return result;
	        }
        }

        /// <summary>Amount of plant biomass aboveground (g/m2).</summary>
        private double standingSwardBiomassWt
        {
        	get
        	{
        		double result = 0.0;
                foreach (Plant species in PMFSpecies)
                   result += (double)myZone.Get(species.Name+".AboveGround.Wt");
                foreach (AgPasture.PastureSpecies species in AgPSpecies)
                    result += species.StandingHerbageWt*0.1;
                return result;
            }
        }

        /// <summary>Amount of N in plant's biomass aboveground (g/m2).</summary>
        private double standingSwardBiomassN
        {
        	get
        	{
        		double result = 0.0;
                foreach (Plant species in PMFSpecies)
                   result += (double)myZone.Get(species.Name+".AboveGround.N");
                foreach (AgPasture.PastureSpecies species in AgPSpecies)
                    result += species.StandingHerbageN*0.1;
                return result;
            }
        }

        /// <summary>Amount of plant biomass from all organs available for defoliation (g/m2).</summary>
        /// <remarks>Assumes that organs with a BiomassRemoval.FractionToRemove > 0 are harvestable.
        /// For AgPasture, harvestable is based on minimum DM.</remarks>
        /// <param name="plantName">The name of the plant to retrieve its biomass</param>
        /// <param name="fractionType">The type of fraction to use (harvestable or total)</param>
        private double harvestableSwardBiomass(string plantName, string fractionType)
        {
        	double amountWt = 0.0;
    		double fraction = 0.0;
            foreach (Plant species in PMFSpecies)
            {
            	if ((plantName == "All") || (species.Name == plantName))
            	{
	            	if (species.AboveGround.Wt > 0.0)
	            	{
		                foreach (IOrgan organ in Apsim.Children(species, typeof(IOrgan)))
			    		{ // consider only amounts toRemove
				            fraction = (double)myZone.Get(species.Name + "." + organ.Name + ".BiomassRemovalDefaults." + typeOfDefoliation + ".FractionLiveToRemove");
			    			if ((fractionType == "Total") && (fraction > 0.0))
			    				fraction = 1.0;
			    			else if (RemoveAllBiomassIsEnabled && (fraction > 0.0))
			                	fraction = 0.95;
							amountWt += (double)myZone.Get(species.Name + "." + organ.Name + ".Live.Wt") * fraction;
			            	fraction = (double)myZone.Get(species.Name + "." + organ.Name + ".BiomassRemovalDefaults." + typeOfDefoliation + ".FractionDeadToRemove");
			    			if ((fractionType == "Total") && (fraction > 0.0))
			    				fraction = 1.0;
			    			else if (RemoveAllBiomassIsEnabled && (fraction > 0.0))
			                	fraction = 0.95;
							amountWt += (double)myZone.Get(species.Name + "." + organ.Name + ".Dead.Wt") * fraction;
		            	}
	            	}
            	}
			}

            foreach (AgPasture.PastureSpecies species in AgPSpecies)
            {
            	if ((plantName == "All") || (species.Name == plantName))
            	{
            		if (fractionType == "Total")
            			amountWt += species.AboveGroundWt*0.1;
            		else
	                	amountWt += species.HarvestableWt*0.1;
	            }
            }

            return amountWt;
        }

        /// <summary>Triggers the actual biomass removal and gather DM and N amounts.</summary>
        /// <param name="amountToRemove">The total DM amount to remove (g/m2)</param>
        /// <param name="removalType">The type of removal (Cut, Graze, Harvest)</param>
        private void defoliateSward(double amountToRemove, string removalType)
        {
            // get the amounts of biomass and N before today's defoliation
            double preRemovalDM = standingSwardBiomassWt;
            double preRemovalN = standingSwardBiomassN;
            double fractionToRemove = 0.0;

            // gather the actual biomass removal fractions, checking whether they need to be adjusted
            double totalHarvestableAmount = harvestableSwardBiomass("All", "Harvestable");
            if (amountToRemove > 0.0)
            { // an amount was given for defoliation, adjust removal fractions for each species in order to remove the amount specified
            	fractionToRemove = amountToRemove / totalHarvestableAmount;
            }
            else if (amountToRemove < 0.0)
            { // defoliation is not based on an amount, removal is determined simply by the removal fractions
                fractionToRemove = 1.0;
            }

            for (int i = 0; i < swardSpeciesName.Length; i++)
            {
                speciesFraction[i] = harvestableSwardBiomass(swardSpeciesName[i], "Harvestable") / totalHarvestableAmount;
                if (swardSpeciesType[i] == "PMF")
                {
                	// check whether the plant is alive
	                bool speciesIsAlive = (bool)myZone.Get(swardSpeciesName[i]+".IsEmerged");
	                if (speciesIsAlive)
	                {
	                	// set removal fractions (these overrides the default removals in the plant)
		                setRemoveFraction(swardSpeciesName[i], fractionToRemove);

			            // do the actual biomass removal
		                foreach (Plant species in PMFSpecies)
		                {
		                	if(species.Name == swardSpeciesName[i])
		                	{
		                		species.RemoveBiomass(removalType, defoliationFractions);
		                		break;
		                	}
		                }
		            }
	            }
	            else
	            {
                	// check whether the plant is alive
	                bool speciesIsAlive = (bool)myZone.Get(swardSpeciesName[i]+".IsAlive");
	                if (speciesIsAlive)
	                {
	                	// set removal amount (needs to be in kg/ha)
	                	double amountRequired = (double)myZone.Get(swardSpeciesName[i]+".HarvestableWt");
	                	if (amountToRemove > 0.0)
	                		amountRequired = amountToRemove * speciesFraction[i] * 10.0;

	                    // do the actual biomass removal
		                foreach (AgPasture.PastureSpecies species in AgPSpecies)
		                {
		                	if(species.Name == swardSpeciesName[i])
		                	{
			                    species.Graze(amount: amountRequired, type: "SetRemoveAmount");
			                    break;
                    		}
                    	}
                    }
                }
            }

            // get the amounts of biomass and N after today's defoliation
            double postRemovalDM = standingSwardBiomassWt;
            double postRemovalN = standingSwardBiomassN;

            // get total defoliation (total plant stuff lost)
            DefoliatedWt = preRemovalDM - postRemovalDM;
            DefoliatedN = preRemovalN - postRemovalN;

            // get amounts harvested, removed, and returned
            manageDefoliatedBiomass();
        }

        /// <summary>Sets the biomass removal fractions for PMF plants.</summary>
        /// <param name="plantName">The name of PMF species</param>
        /// <param name="fractionHarvestable">The fraction of harvestable biomass to be removed (0-1)</param>
        private void setRemoveFraction(string plantName, double fractionHarvestable)
        {
            foreach (Plant species in PMFSpecies)
            {
            	if ((species.Name == plantName) && (species.IsAlive))
            	{
    				double fractionToRemove;
    				double fractionToResidue;

                    // set removal fractions (these overrides the default removals in the plant)
	                foreach (IOrgan organ in Apsim.Children(species, typeof(IOrgan)))
	                {
	                	// first get the removal for Live material
			            fractionToRemove = (double)myZone.Get(species.Name + "." + organ.Name + ".BiomassRemovalDefaults." + typeOfDefoliation + ".FractionLiveToRemove");
	                	if (RemoveAllBiomassIsEnabled && (fractionToRemove > 0.0))
		                	fractionToRemove = 0.95;
						fractionToRemove = fractionHarvestable * fractionToRemove;
		                fractionToRemove = Math.Min(1.0, fractionToRemove);
		                defoliationFractions.SetFractionToRemove(organ.Name, fractionToRemove, "Live");
		                if (RemoveAllBiomassIsEnabled)
		                	fractionToResidue = 0.0;
		                else
		                	fractionToResidue = (double)myZone.Get(species.Name + "." + organ.Name + ".BiomassRemovalDefaults." + typeOfDefoliation + ".FractionLiveToResidue");
	            		fractionToResidue = Math.Min(fractionHarvestable * fractionToResidue, 1.0 - fractionToRemove);
		                defoliationFractions.SetFractionToResidue(organ.Name, fractionToResidue, "Live");

	                	// then get the removal for Dead material
	                	fractionToRemove = (double)myZone.Get(species.Name + "." + organ.Name + ".BiomassRemovalDefaults." + typeOfDefoliation + ".FractionDeadToRemove");
	                	if (RemoveAllBiomassIsEnabled && (fractionToRemove > 0.0))
		                	fractionToRemove = 0.95;
						fractionToRemove = fractionHarvestable * fractionToRemove;
		                fractionToRemove = Math.Min(1.0, fractionToRemove);
		                defoliationFractions.SetFractionToRemove(organ.Name, fractionToRemove, "Dead");
		                if (RemoveAllBiomassIsEnabled)
		                	fractionToResidue = 0.0;
		                else
			            	fractionToResidue = (double)myZone.Get(species.Name + "." + organ.Name + ".BiomassRemovalDefaults." + typeOfDefoliation + ".FractionDeadToResidue");
	            		fractionToResidue = Math.Min(fractionHarvestable * fractionToResidue, 1.0 - fractionToRemove);
		                defoliationFractions.SetFractionToResidue(organ.Name, fractionToResidue, "Dead");
	            	}
            	}
			}
        }

        /// <summary>Gathers the DM and N amounts harvested, to be removed, and to be returned.</summary>
        private void manageDefoliatedBiomass()
        {
	    	double digestibilityStructural = 0.65;
	    	double digestibilityNonStrucutural = 1.0;

            if (DefoliatedWt > 0.0)
            {
            	double speciesHarvestedWt;
            	double speciesHarvestedN;
            	double speciesFractionToRemove;
                HarvestedWt = 0.0;
                HarvestedN = 0.0;
                RemovedWt = 0.0;
                RemovedN = 0.0;

                foreach (Plant species in PMFSpecies)
                {
                	if(species.AboveGround.Wt > 0.0)
                	{
			            // get the amount harvested (plant stuff removed from plants)
                		speciesHarvestedWt = 0.0;
                		speciesHarvestedN = 0.0;
		                foreach (IOrgan organ in Apsim.Children(species, typeof(IOrgan)))
		                {
		                	speciesHarvestedWt += (double)myZone.Get(species.Name+"."+organ.Name+".Removed.Wt");
		                	speciesHarvestedN += (double)myZone.Get(species.Name+"."+organ.Name+".Removed.N");
						}

	                    HarvestedWt += speciesHarvestedWt;
	                    HarvestedN += speciesHarvestedN;

						// get the DM fraction to be removed
						if(FractionDMToRemove>=0.0)
						{
							speciesFractionToRemove = FractionDMToRemove;
						}
						else
			            { // use digestibility to define the fraction
		                	double fracStructural = species.AboveGround.StructuralWt/species.AboveGround.Wt;
		                	speciesFractionToRemove = (1.0 - fracStructural)*digestibilityNonStrucutural + fracStructural*digestibilityStructural;
		                	speciesFractionToRemove = Math.Min(1.0, Math.Max(0.0, speciesFractionToRemove));
			            }

			            // get the amounts actually removed from field
		                RemovedWt += speciesHarvestedWt * speciesFractionToRemove;
		                RemovedN += speciesHarvestedN * FractionNToRemove;
                   }
                }

                foreach (AgPasture.PastureSpecies species in AgPSpecies)
                {
                	if(species.AboveGroundWt > 0.0)
                	{
                		// get the amount harvested
	                    speciesHarvestedWt = species.HarvestedWt*0.1;
	                    speciesHarvestedN = species.HarvestedN*0.1;
	                    HarvestedWt += speciesHarvestedWt;
	                    HarvestedN += speciesHarvestedN;

						// get fraction to be removed
						if(FractionDMToRemove>=0.0)
						{
							speciesFractionToRemove = FractionDMToRemove;
						}
						else
			            { // use digestibility to define the fraction
			                speciesFractionToRemove = species.HarvestedDigestibility;
			            }

			            // get the amounts actually removed from field
		                RemovedWt += speciesHarvestedWt * speciesFractionToRemove;
		                RemovedN += speciesHarvestedN * FractionNToRemove;
                    }
                }

	            // get the amounts to be returned to the field (as residue or dung+urine)
	            ReturnedWt = HarvestedWt - RemovedWt;
	            ReturnedN = HarvestedN - RemovedN;
	            if (ReturnType == ReturnAsTypes.AsDungUrine)
	            {
	                if (NDungType == DungNContentTypes.DefineProportion)
	                    NReturnedInDung = ReturnedN * ProportionN2Dung;
	                else
	                    NReturnedInDung = Math.Min(ReturnedN, ReturnedWt * 0.4 / CNRatioDung);
	                NReturnedInDung = Math.Min(NReturnedInDung, ReturnedN);
	                NReturnedInUrine = ReturnedN - NReturnedInDung;
	            }
	            else
	            {
	                NReturnedInDung = 0.0;
	                NReturnedInUrine = 0.0;
	            }
            }
        }

        /// <summary>Returns the material not removed off field as residue.</summary>
        private void returnResidues()
        {
            if ((ReturnedWt > 0.0) || (ReturnedN > 0.0))
            {
                PMF.BiomassRemovedType BiomassResidue = new PMF.BiomassRemovedType();
                string[] type = new string[] { "Grass" };
                float[] dltdm = new float[] { (float)(10.0 * ReturnedWt) };
                float[] dltn = new float[] { (float)(10.0 * ReturnedN) };
                float[] dltp = new float[] { 0 };
                float[] fraction = new float[] { 1 };     // fraction is always 1.0 here

                BiomassResidue.crop_type = "Grass";
                BiomassResidue.dm_type = type;
                BiomassResidue.dlt_crop_dm = dltdm;
                BiomassResidue.dlt_dm_n = dltn;
                BiomassResidue.dlt_dm_p = dltp;
                BiomassResidue.fraction_to_residue = fraction;
                BiomassRemoved.Invoke(BiomassResidue);
            }
        }

        /// <summary>Returns the material not removed off field as dung and urine).</summary>
        private void returnExcreta()
        {
            if ((ReturnedWt > 0.0) || (NReturnedInDung > 0.0))
            {
                PMF.BiomassRemovedType BiomassDung = new PMF.BiomassRemovedType();
                string[] type = new string[] { "RuminantDung_PastureFed" };
                float[] dltdm = new float[] { (float)(10.0 * ReturnedWt) };
                float[] dltn = new float[] { (float)(10.0 * NReturnedInDung) };
                float[] dltp = new float[] { 0 };
                float[] fraction = new float[] { 1 };     // fraction is always 1.0 here

                BiomassDung.crop_type = "RuminantDung_PastureFed";
                BiomassDung.dm_type = type;
                BiomassDung.dlt_crop_dm = dltdm;
                BiomassDung.dlt_dm_n = dltn;
                BiomassDung.dlt_dm_p = dltp;
                BiomassDung.fraction_to_residue = fraction;
                BiomassRemoved.Invoke(BiomassDung);
            }

            if (NReturnedInUrine > 0.0)
            {
                double[] myUrineDeposition = new double[mySoil.Thickness.Length];
                for (int z = 0; z < urineFraction.Length; z++)
                    myUrineDeposition[z] = NReturnedInUrine * 10.0 * urineFraction[z];
                Urea.AddKgHaDelta(SoluteSetterType.Fertiliser, myUrineDeposition);
            }
        }

        // Auxiliary bits and pieces  - - - - - - - - - - - - - - - - - - - - - - - - - - - - - - - - -

        /// <summary>Type of defoliation to use</summary>
        public enum DefoliationTypes
        {
            /// <summary>Cut</summary>
            Cut,
            /// <summary>Graze</summary>
            Graze,
            /// <summary>Harvest</summary>
            Harvest
        }

        /// <summary>Flag how defoliations will be triggered</summary>
        public enum DefoliationTriggerTypes
        {
            /// <summary>Setting a fixed interval</summary>
            FixedInterval,
            /// <summary>Setting a target (minimum) inteval</summary>
            TargetInterval,
            /// <summary>Setting a target (maximum) standing biomass</summary>
            TargetStandingBiomass
        }

        /// <summary>How the DM amount given is interpreted</summary>
        public enum DefoliateAmountTypes
        {
            /// <summary>Setting a DM amount to remove</summary>
            DMToRemove,
            /// <summary>Setting the residual DM amount</summary>
            ResidualDM,
            /// <summary>Remove according to crop's BiomassRemovalFractions</summary>
            None_UseDefoliationFractions
        }

        /// <summary>Fraction of defoliated DM to remove from field</summary>
        public enum DMRemovalTypes
        {
            /// <summary>Remove all DM</summary>
            RemoveAll,
            /// <summary>Remove no DM</summary>
            RemoveNone,
            /// <summary>Remove a user-defined fraction</summary>
            UserDefinedFraction,
            /// <summary>Remove a fraction based on plant digestibility</summary>
            BasedOnDigestibility
        }

        /// <summary>Fraction of N in the defoliated material to remove from field</summary>
        public enum NRemovalTypes
        {
            /// <summary>Remove all N</summary>
            RemoveAll,
            /// <summary>Remove no N</summary>
            RemoveNone,
            /// <summary>Remove a user-defined fraction</summary>
            UserDefinedFraction,
            /// <summary>Remove a fraction equal to DM removed</summary>
            ProportionalToDM
        }

        /// <summary>Define how the non-removed material is returned to the field</summary>
        public enum ReturnAsTypes
        {
            /// <summary>Return plant material as residue</summary>
            AsResidue,
            /// <summary>Return meterial as dung and urine</summary>
            AsDungUrine
        }

        /// <summary>Define how the proportion of N in dung is defined</summary>
        public enum DungNContentTypes
        {
            /// <summary>Define the proportion of N returned as dung</summary>
            DefineProportion,
            /// <summary>Define the C:N of dung</summary>
            DefineCNratio
        }
	}
}
```
              Operations DefoliationSchedule
                2014-12-16  [DefoliationManager].Script.Defoliate(defoliationType: "Cut", amountDM: 100, amountType: "ResidualDM", duration: 1)
                2015-01-20  [DefoliationManager].Script.Defoliate(defoliationType: "Cut", amountDM: 100, amountType: "ResidualDM", duration: 1)
                2015-03-09  [DefoliationManager].Script.Defoliate(defoliationType: "Cut", amountDM: 100, amountType: "ResidualDM", duration: 1)
                2015-04-15  [DefoliationManager].Script.Defoliate(defoliationType: "Cut", amountDM: 100, amountType: "ResidualDM", duration: 1)
                2015-05-20  [DefoliationManager].Script.Defoliate(defoliationType: "Cut", amountDM: 100, amountType: "ResidualDM", duration: 1)
                2015-07-20  [DefoliationManager].Script.Defoliate(defoliationType: "Cut", amountDM: 100, amountType: "ResidualDM", duration: 1)
                2015-09-14  [DefoliationManager].Script.Defoliate(defoliationType: "Cut", amountDM: 100, amountType: "ResidualDM", duration: 1)
                2015-10-21  [DefoliationManager].Script.Defoliate(defoliationType: "Cut", amountDM: 100, amountType: "ResidualDM", duration: 1)
                2015-11-17  [DefoliationManager].Script.Defoliate(defoliationType: "Cut", amountDM: 100, amountType: "ResidualDM", duration: 1)
                2015-12-16  [DefoliationManager].Script.Defoliate(defoliationType: "Cut", amountDM: 100, amountType: "ResidualDM", duration: 1)
                2016-01-25  [DefoliationManager].Script.Defoliate(defoliationType: "Cut", amountDM: 100, amountType: "ResidualDM", duration: 1)
                2016-03-08  [DefoliationManager].Script.Defoliate(defoliationType: "Cut", amountDM: 100, amountType: "ResidualDM", duration: 1)
                2016-04-19  [DefoliationManager].Script.Defoliate(defoliationType: "Cut", amountDM: 100, amountType: "ResidualDM", duration: 1)
                2016-06-13  [DefoliationManager].Script.Defoliate(defoliationType: "Cut", amountDM: 100, amountType: "ResidualDM", duration: 1)
                2016-08-23  [DefoliationManager].Script.Defoliate(defoliationType: "Cut", amountDM: 100, amountType: "ResidualDM", duration: 1)
                2016-09-29  [DefoliationManager].Script.Defoliate(defoliationType: "Cut", amountDM: 100, amountType: "ResidualDM", duration: 1)
                2016-11-01  [DefoliationManager].Script.Defoliate(defoliationType: "Cut", amountDM: 100, amountType: "ResidualDM", duration: 1)
                2016-11-29  [DefoliationManager].Script.Defoliate(defoliationType: "Cut", amountDM: 100, amountType: "ResidualDM", duration: 1)
              Manager ExtraVariables
```csharp
// This will be replaced by the "ExtraVariables" section in "Replacements"

using System;
using Models.Core;

namespace Models
{
    [Serializable] 
    public class Script : Model
    {
    }
}
```
              Manager SettingUpParams
                setParamStartDate = 2019-12-01
                setParamHeight = 350
```csharp
// Set some plant parameters, for tests and development
// Following suggestions by Val Snow: Plant competition seem to be better done if heights are all the same (maybe due to some issue/feature of MicroClimate)

using System;
using Models.Core;
using System.Collections.Generic;
using System.Text;
using Models;
using Models.Soils;
using Models.PMF;
using System.Xml.Serialization;
using APSIM.Shared.Utilities;

namespace Models
{
	[Serializable]
	public class Script : Model
	{
		[Link] Clock Clock;
		[Link] Zone myZone;


		//User inputs from properties tab
		[Separator("Setting up some parameters of plants")]
		[Description(" Enter the date to set plant parameters (dd/mm/yyyy):")]
		public DateTime setParamStartDate { get; set; }
		[Description(" Enter the height to set all plants to (mm):")]
		public double setParamHeight { get; set; }


		//Internal variables
		private RemovalFractions removalFractions;

		[EventSubscribe("Commencing")]
		private void OnSimulationCommencing(object sender, EventArgs e)
		{
			// make sure that manager will work when startDate<simulationStartDay
			if (Clock.Today > setParamStartDate)
				setParamStartDate = Clock.Today;

            foreach (Plant species in Apsim.Children(myZone, typeof(Plant)))
            {
				if (species.Name == "WhiteClover")
					myZone.Set("[WhiteClover].Root.MaximumRootDepth.FixedValue", 350);
			}
		}

		[EventSubscribe("StartOfDay")]
		private void OnStartOfDay(object sender, EventArgs e)
		{
			// make sure that rotation start when startDate<simulationStartDay
			if (Clock.Today == setParamStartDate)
			{
			    double[] xVals = new double[] {0, 10};
			    double[] yVals = new double[] {setParamHeight, setParamHeight};

	            foreach (Plant species in Apsim.Children(myZone, typeof(Plant)))
	            {
					myZone.Set(species.Name+".Leaf.HeightFunction.XYPairs.X", xVals);
					myZone.Set(species.Name+".Leaf.HeightFunction.XYPairs.Y", yVals);
				}

	            foreach (AgPasture.PastureSpecies species in Apsim.Children(myZone, typeof(AgPasture.PastureSpecies)))
	            {
					myZone.Set(species.Name+".PlantHeightMaximum", setParamHeight);
					myZone.Set(species.Name+".PlantHeightMinimum", setParamHeight);
	            }
			}
		}
	}
}
```
            MicroClimate: a_interception=0; b_interception=1; c_interception=0; d_interception=0; soil_albedo=0.23; SoilHeatFluxFraction=0.4; NightInterceptionFraction=0.5; ReferenceHeight=2
            Irrigation
            Fertiliser
            SurfaceOrganicMatter: InitialResidueName=grass; InitialResidueType=grass; InitialResidueMass=500; InitialStandingFraction=0; InitialCPR=0; InitialCNR=40; FractionFaecesAdded=0.5
            Soil: SoilType=Typic Udivitrand (US), Typic Orthic Allophanic Soil (NZ); LocalName=Horotiu Silt Loam; Site=Ruakura; NearestTown=Hamilton; Region=Waikato; Country=New Zealand; Latitude=0; Longitude=0
              DataSource=Based primarily on data from Close et al (2003), complemented with NZ NSD.
              Analysis: PHUnits=Water; BoronUnits=0
                Thickness  Rocks  PH  CEC   ParticleSizeSand  ParticleSizeSilt  ParticleSizeClay
                200        0      6   23.1  47                33                20
                200        0      6   17.2  64.5              17                18.5
                130        2      6   12.4  76                13                11
                140        5      6   10    84                9.5               6.5
                380        5      6   7.2   86.3              8.6               5.1
                230        19     6   3.1   88.6              7.6               3.8
                220        33     6   1.6   91.2              6.4               2.4
              Water
                Thickness  BD     AirDry  LL15   DUL    SAT    KS
                200        0.88   0.07    0.22   0.421  0.587  507.8
                200        0.85   0.21    0.219  0.327  0.623  4445.1
                130        1.009  0.177   0.177  0.314  0.572  7262
                140        1.055  0.139   0.139  0.291  0.536  11928
                380        1.055  0.125   0.125  0.182  0.504  25031
                230        0.839  0.102   0.102  0.123  0.439  28410.4
                220        0.695  0.083   0.083  0.101  0.363  42658.3
                SoilCrop ChicorySoil: LL=[0.22, 0.219, 0.177, 0.139, 0.125, 0.102, 0.083]; KL=[0.07, 0.058, 0.038, 0.025, 0.01, 0.004, 0.002]; XF=[1, 1, 1, 1, 1, 1, 1]
                SoilCrop PlantainSoil: LL=[0.22, 0.219, 0.177, 0.139, 0.125, 0.102, 0.083]; KL=[0.08, 0.07, 0.05, 0.03, 0.01, 0.003, 0]; XF=[1, 1, 1, 1, 1, 1, 1]
                SoilCrop RyegrassSoil: LL=[0.22, 0.219, 0.177, 0.139, 0.125, 0.102, 0.083]; KL=[0.1, 0.085, 0.055, 0.02, 0.005, 0, 0]; XF=[1, 1, 1, 1, 1, 1, 1]
                SoilCrop WhiteCloverSoil: LL=[0.22, 0.219, 0.177, 0.139, 0.125, 0.102, 0.083]; KL=[0.085, 0.077, 0.04, 0.01, 0.001, 0, 0]; XF=[1, 1, 1, 1, 1, 1, 1]
                SoilCrop LucerneSoil: LL=[0.22, 0.219, 0.177, 0.139, 0.125, 0.102, 0.083]; KL=[0.06, 0.05, 0.035, 0.025, 0.015, 0.01, 0.01]; XF=[1, 1, 1, 1, 1, 1, 1]
                SoilCrop AgLucerneSoil: LL=[0.22, 0.219, 0.177, 0.139, 0.125, 0.102, 0.083]; KL=[0.06, 0.05, 0.035, 0.025, 0.015, 0.01, 0.01]; XF=[1, 1, 1, 1, 1, 1, 1]
                SoilCrop RedCloverSoil: LL=[0.22, 0.219, 0.177, 0.139, 0.125, 0.102, 0.083]; KL=[0.078, 0.069, 0.05, 0.03, 0.012, 0.005, 0.002]; XF=[1, 1, 1, 1, 1, 1, 1]
              SoilWater: SummerDate=1-Oct; SummerU=9; SummerCona=4; WinterDate=1-Apr; WinterU=6; WinterCona=3; DiffusConst=88; DiffusSlope=35; Salb=0.15; CN2Bare=70; CNRed=20; CNCov=0.8; slope=0; discharge_width=0; catchment_area=0; max_pond=0; Thickness=[200, 200, 130, 140, 380, 230, 220]; SWCON=[0.48, 0.59, 0.61, 0.6, 0.63, 0.7, 0.71]; ResidueInterception=0
              SoilNitrogen: fom_types=[default, manure, mucuna, lablab, shemp, stable]; fract_carb=[0.2, 0.3, 0.54, 0.57, 0.45, 0]; fract_cell=[0.7, 0.3, 0.37, 0.37, 0.47, 0.1]; fract_lign=[0.1, 0.4, 0.09, 0.06, 0.08, 0.9]
                SoilNitrogenNO3 NO3
                SoilNitrogenNH4 NH4
                SoilNitrogenUrea Urea
                SoilNitrogenPlantAvailableNO3 PlantAvailableNO3
                SoilNitrogenPlantAvailableNH4 PlantAvailableNH4
              SoilOrganicMatter: RootCN=40; EnrACoeff=7.4; EnrBCoeff=0.2; OCUnits=Total
                Thickness  OC    SoilCN  FBiom  FInert  RootWt
                200        8     12.5    0.075  0.7     338.974
                200        1.88  12.5    0.013  0.79    227.221
                130        0.93  12.5    0.009  0.9     175.199
                140        0.43  12.5    0.008  0.94    132.413
                380        0.13  12.5    0.007  0.96    61.9249
                230        0.1   12.5    0.005  0.99    39.0922
                220        0.07  12.5    0.005  0.995   25.1768
              CERESSoilTemperature
              InitialWater Initial water: PercentMethod=1; FractionFull=0.9
              Sample Initial nitrogen: NO3Units=kg/ha; NH4Units=kg/ha; SWUnits=Volumetric; OCUnits=Total; PHUnits=Water
                Thickness  NO3  NH4
                200        15   0.88
                200        7    0.34
                600        5    0.609708
                500        3.2  0.48267
            PastureSpecies Ryegrass: MaximumNUptake=10; Albedo=0.26; Gsmax=0.011; R50=200; InitialShootDM=500; InitialRootDM=250; InitialRootDepth=750; ReferencePhotosyntheticRate=1; LightExtinctionCoefficient=0.5; GrowthTminimum=1; GrowthToptimum=20; GrowthTEffectExponent=1.7; HeatOnsetTemperature=28; HeatFullTemperature=35; HeatRecoverySumDD=30; HeatRecoveryTReference=25; ColdOnsetTemperature=1; ColdFullTemperature=-5; ColdRecoverySumDD=25; MaintenanceRespirationCoefficient=0.03; GrowthRespirationCoefficient=0.25; RespirationTReference=20; RespirationExponent=1.5; NThresholdsForLeaves=[0.04, 0.012, 0.05]; NThresholdsForStems=[0.02, 0.006, 0.025]; NThresholdsForStolons=[0, 0, 0]; NThresholdsForRoots=[0.02, 0.006, 0.025]; DegreesDayForGermination=125; TargetShootRootRatio=4; MaxRootAllocation=0.25; ShootRootGlfFactor=0.5; ReproSeasonReferenceLatitude=41; ReproSeasonTimingCoeff=0.14; ReproSeasonMaxAllocationIncrease=0.5; ReproSeasonAllocationCoeff=0.1; FractionLeafMaximum=0.7; FractionLeafMinimum=0.7; FractionLeafDMThreshold=500; FractionLeafDMFactor=2000; FractionLeafExponent=3; SpecificLeafArea=25; SpecificRootLength=100; ShootMaxEffectOnLAI=1000; MaxStemEffectOnLAI=1; LiveLeavesPerTiller=3; TissueTurnoverRateShoot=0.05; TissueTurnoverRateRoot=0.02; DetachmentRateShoot=0.08; TurnoverTemperatureMin=2; TurnoverTemperatureRef=20; TurnoverTemperatureExponent=1; TurnoverDroughtEffectMax=1; TurnoverDroughtThreshold=0.5; TurnoverDefoliationCoefficient=0.5; TurnoverDefoliationRootEffect=0.1; FractionNLuxuryRemobilisable=[0.1, 0.1, 0.1]; SoilSaturationEffectMax=0.1; MinimumWaterFreePorosity=-1; SoilSaturationRecoveryFactor=0.25; NDillutionCoefficient=0.25; GlfGeneric=1; GlfSoilFertility=1; PlantHeightMinimum=25; PlantHeightMaximum=600; PlantHeightMassForMax=10000; PlantHeightExponent=2.8; RootDepthMinimum=50; RootDepthMaximum=750; RootElongationRate=12.5; RootDistributionDepthParam=90; RootDistributionExponent=3.2; DigestibilitiesCellWall=[0.6, 0.6, 0.6, 0.2]; MinimumGreenWt=10; PreferenceForGreenOverDead=1; PreferenceForLeafOverStems=1
              zero: SpeciesFamily, PhotosyntheticPathway, UseHeatStressFactor, UseColdStressFactor, ColdRecoveryTReference, UseReproSeasonFactor, FractionToStolon, StolonEffectOnLAI, MinimumNFixation, MaximumNFixation, FractionStolonStanding, WaterAvailableMethod, NitrogenAvailableMethod
              PastureAboveGroundOrgan Leaves
                GenericTissue LeafCohort1
                GenericTissue LeafCohort2
                GenericTissue LeafCohort3
                GenericTissue Dead
              PastureAboveGroundOrgan Stems
                GenericTissue LeafCohort1
                GenericTissue LeafCohort2
                GenericTissue LeafCohort3
                GenericTissue Dead
              PastureAboveGroundOrgan Stolons
                GenericTissue LeafCohort1
                GenericTissue LeafCohort2
                GenericTissue LeafCohort3
                GenericTissue Dead
            Plant WhiteClover: CropType=WhiteClover; IsEnding=false; DaysAfterEnding=0
            Report: EventNames=[Clock].DoReport
              VariableNames:
                [Clock].Today as Date
                [Clock].Today.DayOfYear as DayOfYear
                [Weather].Radn as SolarRadiation
                [MicroClimate].NetRadiation
                ([WhiteClover].Leaf.RadIntTot+[Ryegrass].InterceptedRadn) as InterceptedRadiation
                [Weather].MeanT
                [Weather].Rain as Rainfall
                [Irrigation].IrrigationApplied as IrrigationApplied
                [MicroClimate].PrecipitationInterception as PrecipitationInterception
                [MicroClimate].PetTotal
                [Soil].SoilWater.Eo as Eo
                [Soil].SoilWater.Es as Evaporation
                ([WhiteClover].Leaf.Transpiration+sum([Ryegrass].WaterUptake))) as Transpiration
                [Soil].SoilWater.pond as PondedWater
                [Soil].SoilWater.Drainage as Drainage
                [Soil].SoilWater.Runoff as Runoff
                sum([Soil].SoilWater.LateralOutflow) as LateralFlow
                sum([Soil].SoilWater.SWmm) as TotalSWC
                sum([Soil].DULmm) as TotalDUL
                sum([Soil].LL15mm) as TotalLL15
                [Soil].SoilWater.SW[1] as SWCTopLayer
                [Soil].DUL[1] as DULTopLayer
                [Fertiliser].NitrogenApplied as FertiliserN
                sum([Soil].SoilNitrogen.Denitrification) as DenitrifiedN
                ([Soil].SoilWater.LeachNH4 + [Soil].SoilWater.LeachNO3) as LeachedN
                ([WhiteClover].Root.NTakenUp*10+[Ryegrass].SoilUptakeN) as UptakeN
                sum([Soil].SoilNitrogen.MineralisedN) as MineralisedSoilN
                sum([Soil].SoilNitrogen.dlt_n_min_res) as MineralisedSurfOMN
                ([WhiteClover].Leaf.Detached.N+[WhiteClover].Petiole.Detached.N+[WhiteClover].Stolon.Detached.N+[WhiteClover].Inflorescence.Detached.N+[Ryegrass].LitterDepositionN*0.1) as DetachedAGN
                ([WhiteClover].Taproot.Detached.N+[WhiteClover].Root.Detached.N+[Ryegrass].RootDetachedN*0.1) as DetachedBGN
                (10*([WhiteClover].Leaf.Detached.N+[WhiteClover].Petiole.Detached.N+[WhiteClover].Stolon.Detached.N+[WhiteClover].Inflorescence.Detached.N+[WhiteClover].Taproot.Detached.N+[WhiteClover].Root.Detached.N)+[Ryegrass].LitterDepositionN+[Ryegrass].RootDetachedN) as DetachedTotalN
                10*[WhiteClover].Nodule.NFixed as FixedN
                (sum([Soil].SoilNitrogen.Urea.kgha) + sum([Soil].SoilNitrogen.NH4.kgha) + sum([Soil].SoilNitrogen.NO3.kgha)) as SoilNContent
                sum([Soil].SoilNitrogen.Urea.kgha) as SoilUrea
                sum([Soil].SoilNitrogen.NH4.kgha) as SoilNH4
                sum([Soil].SoilNitrogen.NO3.kgha) as SoilNO3
                (sum([Soil].SoilNitrogen.NH4.kgha[1:4])+sum([Soil].SoilNitrogen.NO3.kgha[1:4])) as TopSoilN
                [SurfaceOrganicMatter].N as TotalSurfOMN
                sum([Soil].SoilNitrogen.FOMN) as TotalFOMN
                sum([Soil].SoilNitrogen.HumicN) as TotalHumicN
                sum([Soil].SoilNitrogen.MicrobialN as TotalMicrobialN
                [DefoliationManager].Script.RotationHarvestedDM as RotationHarvestedWt
                [DefoliationManager].Script.PreHarvestDM
                [DefoliationManager].Script.PostHarvestDM
                [DefoliationManager].Script.DefoliatedN as NTakenOff
                [DefoliationManager].Script.HarvestedN
                (10*[DefoliationManager].Script.RemovedN) as Defoliate.Script.RemovedN
                [DefoliationManager].Script.DefoliatedWt as HarvestedWt
                ([DefoliationManager].Script.RemovedN/([DefoliationManager].Script.RemovedWt+0.000001) as RemovedNConc
                [ExtraVariables].Script.AccumHarvestedWt as CumulativeHarvestedWt
                [ExtraVariables].Script.AccumHarvestedN as CumulativeNTakenOff
                ([WhiteClover].Total.Wt+[Ryegrass].TotalWt*0.1) as TotalPlantWt
                ([WhiteClover].AboveGroundLive.Wt+[Ryegrass].AboveGroundLiveWt*0.1+[WhiteClover].BelowGround.Wt+[Ryegrass].BelowGroundWt*0.1) as TotalPlantLiveWt
                ([WhiteClover].AboveGround.Wt+[Ryegrass].AboveGroundWt*0.1) as AboveGroundWt
                ([WhiteClover].BelowGround.Wt+[Ryegrass].BelowGroundWt*0.1) as BelowGroundWt
                ([WhiteClover].Total.N+[Ryegrass].TotalN*0.1) as TotalPlantN
                ([WhiteClover].AboveGround.N+[Ryegrass].AboveGroundN*0.1) as AboveGroundN
                ([WhiteClover].BelowGround.N+[Ryegrass].BelowGroundN*0.1) as BelowGroundN
                (([WhiteClover].AboveGround.N+[Ryegrass].AboveGroundN*0.1)/([WhiteClover].AboveGround.Wt+[Ryegrass].AboveGroundWt*0.1+0.000001)) as AboveGroundNConc
                (([WhiteClover].BelowGround.N+[Ryegrass].BelowGroundN*0.1)/([WhiteClover].BelowGround.Wt+[Ryegrass].BelowGroundWt*0.1+0.000001)) as BelowGroundNConc
                ([WhiteClover].AboveGroundLive.Wt+[Ryegrass].AboveGroundLiveWt*0.1) as AboveGroundLiveWt
                ([WhiteClover].AboveGroundLive.N+[Ryegrass].AboveGroundLiveN*0.1) as AboveGroundDeadWt
                ([WhiteClover].BelowGround.Wt+[Ryegrass].BelowGroundWt*0.1) as BelowGroundLiveWt
                (([WhiteClover].AboveGroundLive.N+[Ryegrass].AboveGroundLiveN*0.1)/([WhiteClover].AboveGroundLive.Wt+[Ryegrass].AboveGroundLiveWt*0.1+0.000001)) as AboveGroundLiveNc
                [ExtraVariables].Script.HerbageNConc as HerbageNConc
                ([Ryegrass].TotalWt*0.1) as Ryegrass.Total.Wt
                ([Ryegrass].AboveGroundLiveWt*0.1+[Ryegrass].BelowGroundWt*0.1) as Ryegrass.TotalLive.Wt
                ([Ryegrass].AboveGroundWt*0.1) as Ryegrass.AboveGround.Wt
                ([Ryegrass].BelowGroundWt*0.1) as Ryegrass.BelowGround.Wt
                ([Ryegrass].AboveGroundLiveWt*0.1) as Ryegrass.AboveGroundLive.Wt
                ([Ryegrass].AboveGroundDeadWt*0.1) as Ryegrass.AboveGroundDead.Wt
                ([Ryegrass].BelowGroundWt*0.1) as Ryegrass.BelowGroundLive.Wt
                ([Ryegrass].TotalN*0.1) as Ryegrass.Total.N
                ([Ryegrass].AboveGroundN*0.1) as Ryegrass.AboveGround.N
                ([Ryegrass].BelowGroundN*0.1) as Ryegrass.BelowGround.N
                [Ryegrass].AboveGroundNConc as Ryegrass.AboveGround.NConc
                ([Ryegrass].BelowGroundN/([Ryegrass].BelowGroundWt+0.000001)) as Ryegrass.BelowGround.NConc
                ([Ryegrass].AboveGroundLiveN/([Ryegrass].AboveGroundLiveWt+0.000001)) as Ryegrass.AboveGroundLive.NConc
                [Ryegrass].StandingHerbageNConc as RyegrassHerbageNConc
                [WhiteClover].Total.Wt
                [WhiteClover].TotalLive.Wt
                [WhiteClover].AboveGround.Wt
                [WhiteClover].BelowGround.Wt
                [WhiteClover].AboveGroundLive.Wt
                [WhiteClover].AboveGroundDead.Wt
                [WhiteClover].BelowGroundLive.Wt
                [WhiteClover].Total.N
                [WhiteClover].AboveGround.N
                [WhiteClover].BelowGround.N
                [WhiteClover].AboveGround.NConc
                [WhiteClover].BelowGround.NConc
                [WhiteClover].AboveGroundLive.NConc
                (([WhiteClover].Leaf.N+[WhiteClover].Petiole.N+[WhiteClover].Inflorescence.N)/(([WhiteClover].Leaf.Wt+[WhiteClover].Petiole.Wt+[WhiteClover].Inflorescence.Wt+0.000001)) as WhiteCloverHerbageNConc
                ([WhiteClover].AboveGround.Wt/([WhiteClover].AboveGround.Wt+[Ryegrass].AboveGroundWt*0.1+0.000001)) as WhiteClover.BiomassFraction
                ([Ryegrass].AboveGroundWt*0.1/([WhiteClover].AboveGround.Wt+[Ryegrass].AboveGroundWt*0.1+0.000001)) as Ryegrass.BiomassFraction
                ([WhiteClover].AboveGround.N/([WhiteClover].AboveGround.N+[Ryegrass].AboveGroundN*0.1+0.000001)) as WhiteClover.NitrogenFraction
                ([Ryegrass].AboveGroundN*0.1/([WhiteClover].AboveGround.N+[Ryegrass].AboveGroundN*0.1+0.000001)) as Ryegrass.NitrogenFraction
                ([WhiteClover].Leaf.CoverTotal+[Ryegrass].CoverTotal) as CoverTotal
                ([WhiteClover].Leaf.CoverDead+[Ryegrass].CoverDead) as CoverDead
                [MicroClimate].CanopyCover
                ([WhiteClover].Leaf.LAI+[Ryegrass].LAIGreen) as LAIgreen
                ([WhiteClover].Leaf.LAIDead+[Ryegrass].LAIDead) as LAIdead
                (([WhiteClover].Leaf.Height+[Ryegrass].Height)/2) as AverageShootHeight
                (([WhiteClover].Root.Depth+[Ryegrass].RootDepth)/2) as AverageRootDepth
                ([WhiteClover].Root.LengthDensity+[Ryegrass].RootLengthDensity) as Total.RootLengthDensity
                [Ryegrass].CoverTotal
                [WhiteClover].Leaf.CoverTotal
                (0*[Ryegrass].TotalWt) as Ryegrass.Population
                [WhiteClover].Population
                [WhiteClover].Leaf.Height
                [Ryegrass].Height
                [WhiteClover].Root.Depth
                [Ryegrass].RootDepth
                [WhiteClover].Root.LengthDensity
                [Ryegrass].RootLengthDensity
                [WhiteClover].Leaf.LAI
                [Ryegrass].LAI
                [WhiteClover].Leaf.RadIntTot
                [Ryegrass].InterceptedRadn as Ryegrass.RadnIntTot
                [WhiteClover].Phenology.Stage
                [Ryegrass].Stage as Ryegrass.Phenology.Stage
                [WhiteClover].ShootRootRatio.Value()
                ([WhiteClover].AboveGroundLive.Wt/([WhiteClover].TotalLive.Wt+0.000001)) as WhiteClover.CurrentAboveGroundFraction
                ([Ryegrass].AboveGroundLiveWt/([Ryegrass].BelowGroundWt+0.000001)) as Ryegrass.ShootRootRatio
                ([Ryegrass].AboveGroundLiveWt/([Ryegrass].AboveGroundLiveWt+[Ryegrass].BelowGroundWt+0.000001)) as Ryegrass.CurrentAboveGroundFraction
                [Ryegrass].GrossPotentialGrowthWt as Ryegrass.Arbitrator.DM.TotalPlantDemand
                [Ryegrass].NetGrowthWt*0.1 as Ryegrass.Arbitrator.Arbitrator.DM.Allocated
                [Ryegrass].DemandAtLuxuryN*0.1 as Ryegrass.Arbitrator.N.TotalPlantDemand
                [Ryegrass].DemandAtOptimumN
                ([Ryegrass].RemobilisableSenescedN+[Ryegrass].RemobilisableLuxuryN+[Ryegrass].SoilAvailableN)*0.1 as Ryegrass.Arbitrator.N.TotalPlantSupply
                ([Ryegrass].RemobilisedSenescedN+[Ryegrass].RemobilisedLuxuryN+[Ryegrass].SoilUptakeN)*0.1 as Ryegrass.Arbitrator.N.Allocated
                [Ryegrass].SoilAvailableN
                [Ryegrass].SoilDemandN
                sum([Ryegrass].WaterAvailable) as Ryegrass.Arbitrator.WSupply
                [Ryegrass].WaterDemand as Ryegrass.Arbitrator.WDemand
                sum([Ryegrass].WaterUptake) as Ryegrass.Arbitrator.WAllocated
                [WhiteClover].Arbitrator.DM.TotalFixationSupply
                [WhiteClover].Arbitrator.DM.TotalPlantDemand
                [WhiteClover].Arbitrator.DM.Allocated
                [WhiteClover].Arbitrator.N.TotalPlantSupply
                [WhiteClover].Arbitrator.N.TotalPlantDemand
                [WhiteClover].Arbitrator.N.Allocated
                [WhiteClover].Arbitrator.WSupply
                [WhiteClover].Arbitrator.WDemand
                [WhiteClover].Arbitrator.WAllocated
                [WhiteClover].Nodule.NFixed*10 as WhiteClover.Nodule.NFixed
                [Ryegrass].GlfNSupply
                [Ryegrass].GlfWaterSupply
                [Ryegrass].GlfWaterLogging
                [Ryegrass].GlfNContent
                [Ryegrass].GlfCO2
                [Ryegrass].GlfTemperature
                [Ryegrass].GlfColdDamage
                [Ryegrass].GlfHeatDamage
                [WhiteClover].Leaf.Fw
                [WhiteClover].Leaf.Fn
                [WhiteClover].Leaf.FNmetabolic
                [WhiteClover].Leaf.Photosynthesis.FCO2
                [WhiteClover].Leaf.Photosynthesis.FN
                [WhiteClover].Leaf.Photosynthesis.FT
                [WhiteClover].Leaf.Photosynthesis.FW
                [WhiteClover].Leaf.Photosynthesis.FVPD
                [WhiteClover].Leaf.FRGR
      Experiment FRNLRuakuraMix2
        DisabledSimNames=[FRNLRuakuraNRate50, FRNLRuakuraNRate100, FRNLRuakuraNRate200, FRNLRuakuraNRate350]
        Memo
          ###FRNL Ruakura###

          This simulation setup was based on field trials performed at DairyNZ's Scott Farm, in Ruakura, New Zealand, between 2014 and 2016.  The experiment was part of the FRNL (Forages for Reduced Nitrogen Leaching) program and the data is basically unpublished (references will be added when they come about).  Here only plots with mixed pasture species are used.  The species included were ryegrass, white clover, lucerne, chicory, and plantain (weeds also occured, but are not included in the simulation - the fraction of biomass was fairly small).
          The experiment consisted of six fertiliser treatments (nominally at N rates of 0, 50, 100, 200, 350 and 500 kg/ha/yr) in three replicates; actual amounts varied as fertiliser applications followed pasture harvests.  Measurements comprised yield, for each species, and quality indicators (here N content is used), for whole sward.
          Observed data supplied by Grant Edwards, Lincoln University.

          The soil at the experimental site was a Horotiu silt loam (an Orthic Allophanic soil; USDA: Typic Udivitrand), the parameters required were inferred using data from the New Zealand National Soils Database (Landcare Research).
          Weather data was obtained from nearby Ruakura weather station (NIWA).
          Simulation of ryegrass and lucerne are done using the AgPasture model as the PMF versions are still under development.
        Factors
          Factor NRate: Specification=[NRate]
            Operations 0
            Operations 50
              2014-12-22  [Fertiliser].Apply(Amount: 5, Type: Fertiliser.Types.UreaN, Depth: 10)
              2015-01-19  [Fertiliser].Apply(Amount: 5, Type: Fertiliser.Types.UreaN, Depth: 10)
              2015-03-03  [Fertiliser].Apply(Amount: 5, Type: Fertiliser.Types.UreaN, Depth: 10)
              2015-04-21  [Fertiliser].Apply(Amount: 5, Type: Fertiliser.Types.UreaN, Depth: 10)
              2015-06-10  [Fertiliser].Apply(Amount: 5, Type: Fertiliser.Types.UreaN, Depth: 10)
              2015-09-09  [Fertiliser].Apply(Amount: 5, Type: Fertiliser.Types.UreaN, Depth: 10)
              2015-10-19  [Fertiliser].Apply(Amount: 5, Type: Fertiliser.Types.UreaN, Depth: 10)
              2015-11-19  [Fertiliser].Apply(Amount: 5, Type: Fertiliser.Types.UreaN, Depth: 10)
              2015-12-22  [Fertiliser].Apply(Amount: 5, Type: Fertiliser.Types.UreaN, Depth: 10)
              2016-02-03  [Fertiliser].Apply(Amount: 5, Type: Fertiliser.Types.UreaN, Depth: 10)
              2016-05-06  [Fertiliser].Apply(Amount: 5, Type: Fertiliser.Types.UreaN, Depth: 10)
              2016-07-12  [Fertiliser].Apply(Amount: 5, Type: Fertiliser.Types.UreaN, Depth: 10)
              2016-09-14  [Fertiliser].Apply(Amount: 5, Type: Fertiliser.Types.UreaN, Depth: 10)
            Operations 100
              2014-12-22  [Fertiliser].Apply(Amount: 10, Type: Fertiliser.Types.UreaN, Depth: 10)
              2015-01-19  [Fertiliser].Apply(Amount: 10, Type: Fertiliser.Types.UreaN, Depth: 10)
              2015-03-03  [Fertiliser].Apply(Amount: 10, Type: Fertiliser.Types.UreaN, Depth: 10)
              2015-04-21  [Fertiliser].Apply(Amount: 10, Type: Fertiliser.Types.UreaN, Depth: 10)
              2015-06-10  [Fertiliser].Apply(Amount: 10, Type: Fertiliser.Types.UreaN, Depth: 10)
              2015-09-09  [Fertiliser].Apply(Amount: 10, Type: Fertiliser.Types.UreaN, Depth: 10)
              2015-10-19  [Fertiliser].Apply(Amount: 10, Type: Fertiliser.Types.UreaN, Depth: 10)
              2015-11-19  [Fertiliser].Apply(Amount: 10, Type: Fertiliser.Types.UreaN, Depth: 10)
              2015-12-22  [Fertiliser].Apply(Amount: 10, Type: Fertiliser.Types.UreaN, Depth: 10)
              2016-02-03  [Fertiliser].Apply(Amount: 10, Type: Fertiliser.Types.UreaN, Depth: 10)
              2016-05-06  [Fertiliser].Apply(Amount: 10, Type: Fertiliser.Types.UreaN, Depth: 10)
              2016-07-12  [Fertiliser].Apply(Amount: 10, Type: Fertiliser.Types.UreaN, Depth: 10)
              2016-09-14  [Fertiliser].Apply(Amount: 10, Type: Fertiliser.Types.UreaN, Depth: 10)
            Operations 200
              2014-12-22  [Fertiliser].Apply(Amount: 20, Type: Fertiliser.Types.UreaN, Depth: 10)
              2015-01-19  [Fertiliser].Apply(Amount: 20, Type: Fertiliser.Types.UreaN, Depth: 10)
              2015-03-03  [Fertiliser].Apply(Amount: 20, Type: Fertiliser.Types.UreaN, Depth: 10)
              2015-04-21  [Fertiliser].Apply(Amount: 20, Type: Fertiliser.Types.UreaN, Depth: 10)
              2015-06-10  [Fertiliser].Apply(Amount: 20, Type: Fertiliser.Types.UreaN, Depth: 10)
              2015-09-09  [Fertiliser].Apply(Amount: 20, Type: Fertiliser.Types.UreaN, Depth: 10)
              2015-10-19  [Fertiliser].Apply(Amount: 20, Type: Fertiliser.Types.UreaN, Depth: 10)
              2015-11-19  [Fertiliser].Apply(Amount: 20, Type: Fertiliser.Types.UreaN, Depth: 10)
              2015-12-22  [Fertiliser].Apply(Amount: 20, Type: Fertiliser.Types.UreaN, Depth: 10)
              2016-02-03  [Fertiliser].Apply(Amount: 20, Type: Fertiliser.Types.UreaN, Depth: 10)
              2016-05-06  [Fertiliser].Apply(Amount: 20, Type: Fertiliser.Types.UreaN, Depth: 10)
              2016-07-12  [Fertiliser].Apply(Amount: 20, Type: Fertiliser.Types.UreaN, Depth: 10)
              2016-09-14  [Fertiliser].Apply(Amount: 20, Type: Fertiliser.Types.UreaN, Depth: 10)
            Operations 350
              2014-12-22  [Fertiliser].Apply(Amount: 35, Type: Fertiliser.Types.UreaN, Depth: 10)
              2015-01-19  [Fertiliser].Apply(Amount: 35, Type: Fertiliser.Types.UreaN, Depth: 10)
              2015-03-03  [Fertiliser].Apply(Amount: 35, Type: Fertiliser.Types.UreaN, Depth: 10)
              2015-04-21  [Fertiliser].Apply(Amount: 35, Type: Fertiliser.Types.UreaN, Depth: 10)
              2015-06-10  [Fertiliser].Apply(Amount: 35, Type: Fertiliser.Types.UreaN, Depth: 10)
              2015-09-09  [Fertiliser].Apply(Amount: 35, Type: Fertiliser.Types.UreaN, Depth: 10)
              2015-10-19  [Fertiliser].Apply(Amount: 35, Type: Fertiliser.Types.UreaN, Depth: 10)
              2015-11-19  [Fertiliser].Apply(Amount: 35, Type: Fertiliser.Types.UreaN, Depth: 10)
              2015-12-22  [Fertiliser].Apply(Amount: 35, Type: Fertiliser.Types.UreaN, Depth: 10)
              2016-02-03  [Fertiliser].Apply(Amount: 35, Type: Fertiliser.Types.UreaN, Depth: 10)
              2016-05-06  [Fertiliser].Apply(Amount: 35, Type: Fertiliser.Types.UreaN, Depth: 10)
              2016-07-12  [Fertiliser].Apply(Amount: 35, Type: Fertiliser.Types.UreaN, Depth: 10)
              2016-09-14  [Fertiliser].Apply(Amount: 35, Type: Fertiliser.Types.UreaN, Depth: 10)
            Operations 500
              2014-12-22  [Fertiliser].Apply(Amount: 50, Type: Fertiliser.Types.UreaN, Depth: 10)
              2015-01-19  [Fertiliser].Apply(Amount: 50, Type: Fertiliser.Types.UreaN, Depth: 10)
              2015-03-03  [Fertiliser].Apply(Amount: 50, Type: Fertiliser.Types.UreaN, Depth: 10)
              2015-04-21  [Fertiliser].Apply(Amount: 50, Type: Fertiliser.Types.UreaN, Depth: 10)
              2015-06-10  [Fertiliser].Apply(Amount: 50, Type: Fertiliser.Types.UreaN, Depth: 10)
              2015-09-09  [Fertiliser].Apply(Amount: 50, Type: Fertiliser.Types.UreaN, Depth: 10)
              2015-10-19  [Fertiliser].Apply(Amount: 50, Type: Fertiliser.Types.UreaN, Depth: 10)
              2015-11-19  [Fertiliser].Apply(Amount: 50, Type: Fertiliser.Types.UreaN, Depth: 10)
              2015-12-22  [Fertiliser].Apply(Amount: 50, Type: Fertiliser.Types.UreaN, Depth: 10)
              2016-02-03  [Fertiliser].Apply(Amount: 50, Type: Fertiliser.Types.UreaN, Depth: 10)
              2016-05-06  [Fertiliser].Apply(Amount: 50, Type: Fertiliser.Types.UreaN, Depth: 10)
              2016-07-12  [Fertiliser].Apply(Amount: 50, Type: Fertiliser.Types.UreaN, Depth: 10)
              2016-09-14  [Fertiliser].Apply(Amount: 50, Type: Fertiliser.Types.UreaN, Depth: 10)
        Simulation FRNLRuakuraMix2
          Clock: StartDate=2014-09-01; EndDate=2016-12-31
          Weather: FileName=Ruakura.met
          Summary summaryfile
          SoilArbitrator Soil Arbitrator
          Zone Field: Area=1; Slope=0
            Folder Management
              Operations Sowing
                2014-10-24  [Chicory].Sow(population: 100, cultivar: "Choice", depth: 10, rowSpacing: 150)
                2014-10-24  [Plantain].Sow(population: 100, cultivar: "Tonic", depth: 10, rowSpacing: 150)
                2014-10-24  [WhiteClover].Sow(population: 50, cultivar: "Kopu", depth: 5, rowSpacing: 150)
                2014-09-01  [Ryegrass].EndCrop()
                2014-11-15  [Ryegrass].Sow(population: 0, cultivar: "R", depth: 0, rowSpacing: 0)
                2014-09-01  [AgLucerne].EndCrop()
                2014-11-05  [AgLucerne].Sow(population: 0, cultivar: "R", depth: 0, rowSpacing: 0)
              Operations NRate
              Operations BaseFertiliser
                2014-10-13  [Fertiliser].Apply(Amount: 26.4, Type: Fertiliser.Types.UreaN, Depth: 10)
                2014-12-23  [Fertiliser].Apply(Amount: 3.9, Type: Fertiliser.Types.UreaN, Depth: 10)
              Manager DefoliationManager: same as Evaluation.NewZealand.FRNLRuakuraMix1.FRNLRuakuraMix1.Field.Management.DefoliationManager
              Operations DefoliationSchedule
                2014-12-15  [DefoliationManager].Script.Defoliate(defoliationType: "Cut", amountDM: 100, amountType: "ResidualDM", duration: 1)
                2015-01-20  [DefoliationManager].Script.Defoliate(defoliationType: "Cut", amountDM: 100, amountType: "ResidualDM", duration: 1)
                2015-03-18  [DefoliationManager].Script.Defoliate(defoliationType: "Cut", amountDM: 100, amountType: "ResidualDM", duration: 1)
                2015-04-20  [DefoliationManager].Script.Defoliate(defoliationType: "Cut", amountDM: 100, amountType: "ResidualDM", duration: 1)
                2015-06-08  [DefoliationManager].Script.Defoliate(defoliationType: "Cut", amountDM: 100, amountType: "ResidualDM", duration: 1)
                2015-09-07  [DefoliationManager].Script.Defoliate(defoliationType: "Cut", amountDM: 100, amountType: "ResidualDM", duration: 1)
                2015-10-14  [DefoliationManager].Script.Defoliate(defoliationType: "Cut", amountDM: 100, amountType: "ResidualDM", duration: 1)
                2015-11-17  [DefoliationManager].Script.Defoliate(defoliationType: "Cut", amountDM: 100, amountType: "ResidualDM", duration: 1)
                2015-12-21  [DefoliationManager].Script.Defoliate(defoliationType: "Cut", amountDM: 100, amountType: "ResidualDM", duration: 1)
                2016-01-21  [DefoliationManager].Script.Defoliate(defoliationType: "Cut", amountDM: 100, amountType: "ResidualDM", duration: 1)
                2016-03-08  [DefoliationManager].Script.Defoliate(defoliationType: "Cut", amountDM: 100, amountType: "ResidualDM", duration: 1)
                2016-05-25  [DefoliationManager].Script.Defoliate(defoliationType: "Cut", amountDM: 100, amountType: "ResidualDM", duration: 1)
                2016-08-18  [DefoliationManager].Script.Defoliate(defoliationType: "Cut", amountDM: 100, amountType: "ResidualDM", duration: 1)
                2016-09-21  [DefoliationManager].Script.Defoliate(defoliationType: "Cut", amountDM: 100, amountType: "ResidualDM", duration: 1)
                2016-10-26  [DefoliationManager].Script.Defoliate(defoliationType: "Cut", amountDM: 100, amountType: "ResidualDM", duration: 1)
                2016-11-30  [DefoliationManager].Script.Defoliate(defoliationType: "Cut", amountDM: 100, amountType: "ResidualDM", duration: 1)
                2016-12-10  [DefoliationManager].Script.Defoliate(defoliationType: "Cut", amountDM: 100, amountType: "ResidualDM", duration: 1)
              Manager ExtraVariables
                script: same as in Evaluation.NewZealand.FRNLRuakuraMix1.FRNLRuakuraMix1.Field.Management.ExtraVariables
              Manager SettingUpParams: same as Evaluation.NewZealand.FRNLRuakuraMix1.FRNLRuakuraMix1.Field.Management.SettingUpParams
            MicroClimate: a_interception=0; b_interception=1; c_interception=0; d_interception=0; soil_albedo=0.23; SoilHeatFluxFraction=0.4; NightInterceptionFraction=0.5; ReferenceHeight=2
            Irrigation
            Fertiliser
            SurfaceOrganicMatter: InitialResidueName=grass; InitialResidueType=grass; InitialResidueMass=500; InitialStandingFraction=0; InitialCPR=0; InitialCNR=40; FractionFaecesAdded=0.5
            Soil: SoilType=Typic Udivitrand (US), Typic Orthic Allophanic Soil (NZ); LocalName=Horotiu Silt Loam; Site=Ruakura; NearestTown=Hamilton; Region=Waikato; Country=New Zealand; Latitude=0; Longitude=0
              DataSource=Based primarily on data from Close et al (2003), complemented with NZ NSD.
              Analysis: same as Evaluation.NewZealand.FRNLRuakuraMix1.FRNLRuakuraMix1.Field.Soil.Analysis
              Water
                Thickness  BD     AirDry  LL15   DUL    SAT    KS
                200        0.88   0.07    0.22   0.421  0.587  507.8
                200        0.85   0.21    0.219  0.327  0.623  4445.1
                130        1.009  0.177   0.177  0.314  0.572  7262
                140        1.055  0.139   0.139  0.291  0.536  11928
                380        1.055  0.125   0.125  0.182  0.504  25031
                230        0.839  0.102   0.102  0.123  0.439  28410.4
                220        0.695  0.083   0.083  0.101  0.363  42658.3
                SoilCrop ChicorySoil: LL=[0.22, 0.219, 0.177, 0.139, 0.125, 0.102, 0.083]; KL=[0.07, 0.058, 0.038, 0.025, 0.01, 0.004, 0.002]; XF=[1, 1, 1, 1, 1, 1, 1]
                SoilCrop PlantainSoil: LL=[0.22, 0.219, 0.177, 0.139, 0.125, 0.102, 0.083]; KL=[0.08, 0.07, 0.05, 0.03, 0.01, 0.003, 0]; XF=[1, 1, 1, 1, 1, 1, 1]
                SoilCrop RyegrassSoil: LL=[0.22, 0.219, 0.177, 0.139, 0.125, 0.102, 0.083]; KL=[0.1, 0.085, 0.055, 0.02, 0.005, 0, 0]; XF=[1, 1, 1, 1, 1, 1, 1]
                SoilCrop WhiteCloverSoil: LL=[0.22, 0.219, 0.177, 0.139, 0.125, 0.102, 0.083]; KL=[0.085, 0.077, 0.04, 0.01, 0.001, 0, 0]; XF=[1, 1, 1, 1, 1, 1, 1]
                SoilCrop LucerneSoil: LL=[0.22, 0.219, 0.177, 0.139, 0.125, 0.102, 0.083]; KL=[0.06, 0.05, 0.035, 0.025, 0.015, 0.01, 0.01]; XF=[1, 1, 1, 1, 1, 1, 1]
                SoilCrop AgLucerneSoil: LL=[0.22, 0.219, 0.177, 0.139, 0.125, 0.102, 0.083]; KL=[0.06, 0.05, 0.035, 0.025, 0.015, 0.01, 0.01]; XF=[1, 1, 1, 1, 1, 1, 1]
              SoilWater: same as Evaluation.NewZealand.FRNLRuakuraMix1.FRNLRuakuraMix1.Field.Soil.SoilWater
              SoilNitrogen: same as Evaluation.NewZealand.FRNLRuakuraMix1.FRNLRuakuraMix1.Field.Soil.SoilNitrogen
              SoilOrganicMatter: same as Evaluation.NewZealand.FRNLRuakuraMix1.FRNLRuakuraMix1.Field.Soil.SoilOrganicMatter
              CERESSoilTemperature
              InitialWater Initial water: PercentMethod=1; FractionFull=0.9
              Sample Initial nitrogen: NO3Units=kg/ha; NH4Units=kg/ha; SWUnits=Volumetric; OCUnits=Total; PHUnits=Water
                Thickness  NO3  NH4
                200        15   0.88
                200        7    0.34
                600        5    0.609708
                500        3.2  0.48267
            Plant Chicory: CropType=Chicory; IsEnding=false; DaysAfterEnding=0
            Plant Plantain: CropType=Plantain; IsEnding=false; DaysAfterEnding=0
            PastureSpecies Ryegrass: same as Evaluation.NewZealand.FRNLRuakuraMix1.FRNLRuakuraMix1.Field.Ryegrass
            PastureSpecies AgLucerne: MaximumNUptake=10; Albedo=0.26; Gsmax=0.011; R50=200; SpeciesFamily=1; PhotosyntheticPathway=0; InitialShootDM=500; InitialRootDM=250; InitialRootDepth=750; ReferencePhotosyntheticRate=1; LightExtinctionCoefficient=0.8; GrowthTminimum=2; GrowthToptimum=25; GrowthTEffectExponent=1.5; UseHeatStressFactor=0; HeatOnsetTemperature=30; HeatFullTemperature=36; HeatRecoverySumDD=25; HeatRecoveryTReference=25; UseColdStressFactor=0; ColdOnsetTemperature=5; ColdFullTemperature=1; ColdRecoverySumDD=30; ColdRecoveryTReference=0; MaintenanceRespirationCoefficient=0.03; GrowthRespirationCoefficient=0.25; RespirationTReference=20; RespirationExponent=1.5; NThresholdsForLeaves=[0.045, 0.02, 0.055]; NThresholdsForStems=[0.0225, 0.01, 0.0275]; NThresholdsForStolons=[0.0225, 0.01, 0.0275]; NThresholdsForRoots=[0.0225, 0.01, 0.0275]; DegreesDayForGermination=125; TargetShootRootRatio=4; MaxRootAllocation=0.25; ShootRootGlfFactor=0.5; UseReproSeasonFactor=0; ReproSeasonReferenceLatitude=41; ReproSeasonTimingCoeff=0.14; ReproSeasonMaxAllocationIncrease=0.5; ReproSeasonAllocationCoeff=0.1; FractionLeafMaximum=0.56; FractionLeafMinimum=0.28; FractionLeafDMThreshold=500; FractionLeafDMFactor=2000; FractionLeafExponent=3; FractionToStolon=0.1; SpecificLeafArea=25; SpecificRootLength=50; StolonEffectOnLAI=0.25; ShootMaxEffectOnLAI=1000; MaxStemEffectOnLAI=0.5; LiveLeavesPerTiller=3; TissueTurnoverRateShoot=0.03; TissueTurnoverRateRoot=0.02; DetachmentRateShoot=0.05; TurnoverTemperatureMin=2; TurnoverTemperatureRef=20; TurnoverTemperatureExponent=1; TurnoverDroughtEffectMax=1; TurnoverDroughtThreshold=0.5; TurnoverDefoliationCoefficient=0.5; TurnoverDefoliationRootEffect=0.2; FractionNLuxuryRemobilisable=[0.1, 0.1, 0.1]; MinimumNFixation=0.4; MaximumNFixation=0.6; SoilSaturationEffectMax=0.2; MinimumWaterFreePorosity=-1; SoilSaturationRecoveryFactor=0.5; NDillutionCoefficient=0.5; GlfGeneric=1; GlfSoilFertility=1; PlantHeightMinimum=25; PlantHeightMaximum=800; PlantHeightMassForMax=10000; PlantHeightExponent=2.6; RootDepthMinimum=70; RootDepthMaximum=1500; RootElongationRate=25; RootDistributionDepthParam=90; RootDistributionExponent=3.7; DigestibilitiesCellWall=[0.7, 0.7, 0.7, 0.2]; MinimumGreenWt=15; FractionStolonStanding=0; PreferenceForGreenOverDead=1; PreferenceForLeafOverStems=1; WaterAvailableMethod=0; NitrogenAvailableMethod=0
              PastureAboveGroundOrgan Leaves
                GenericTissue LeafCohort1
                GenericTissue LeafCohort2
                GenericTissue LeafCohort3
                GenericTissue Dead
              PastureAboveGroundOrgan Stems
                GenericTissue LeafCohort1
                GenericTissue LeafCohort2
                GenericTissue LeafCohort3
                GenericTissue Dead
              PastureAboveGroundOrgan Stolons
                GenericTissue LeafCohort1
                GenericTissue LeafCohort2
                GenericTissue LeafCohort3
                GenericTissue Dead
            Plant WhiteClover: CropType=WhiteClover; IsEnding=false; DaysAfterEnding=0
            Report: EventNames=[Clock].DoReport
              VariableNames:
                [Clock].Today as Date
                [Clock].Today.DayOfYear as DayOfYear
                [Weather].Radn as SolarRadiation
                [MicroClimate].NetRadiation
                ([Chicory].Leaf.RadIntTot+[Plantain].Leaf.RadIntTot+[WhiteClover].Leaf.RadIntTot+[Ryegrass].InterceptedRadn+[AgLucerne].InterceptedRadn) as InterceptedRadiation
                [Weather].MeanT
                [Weather].Rain as Rainfall
                [Irrigation].IrrigationApplied as IrrigationApplied
                [MicroClimate].PrecipitationInterception as PrecipitationInterception
                [MicroClimate].PetTotal
                [Soil].SoilWater.Eo as Eo
                [Soil].SoilWater.Es as Evaporation
                ([Chicory].Leaf.Transpiration+[Plantain].Leaf.Transpiration+[WhiteClover].Leaf.Transpiration+sum([Ryegrass].WaterUptake)+sum([AgLucerne].WaterUptake)) as Transpiration
                [Soil].SoilWater.pond as PondedWater
                [Soil].SoilWater.Drainage as Drainage
                [Soil].SoilWater.Runoff as Runoff
                sum([Soil].SoilWater.LateralOutflow) as LateralFlow
                sum([Soil].SoilWater.SWmm) as TotalSWC
                sum([Soil].DULmm) as TotalDUL
                sum([Soil].LL15mm) as TotalLL15
                [Soil].SoilWater.SW[1] as SWCTopLayer
                [Soil].DUL[1] as DULTopLayer
                [Fertiliser].NitrogenApplied as FertiliserN
                sum([Soil].SoilNitrogen.Denitrification) as DenitrifiedN
                ([Soil].SoilWater.LeachNH4 + [Soil].SoilWater.LeachNO3) as LeachedN
                (([Chicory].Root.NTakenUp+[Plantain].Root.NTakenUp+[WhiteClover].Root.NTakenUp)*10+[Ryegrass].SoilUptakeN+[AgLucerne].SoilUptakeN) as UptakeN
                sum([Soil].SoilNitrogen.MineralisedN) as MineralisedSoilN
                sum([Soil].SoilNitrogen.dlt_n_min_res) as MineralisedSurfOMN
                ([Chicory].Leaf.Detached.N+[Chicory].Stem.Detached.N+[Chicory].Inflorescence.Detached.N+[Plantain].Leaf.Detached.N+[Plantain].Stem.Detached.N+[Plantain].Inflorescence.Detached.N+[WhiteClover].Leaf.Detached.N+[WhiteClover].Petiole.Detached.N+[WhiteClover].Stolon.Detached.N+[WhiteClover].Inflorescence.Detached.N+[Ryegrass].LitterDepositionN*0.1+[AgLucerne].LitterDepositionN*0.1) as DetachedAGN
                ([Chicory].Taproot.Detached.N+[Chicory].Root.Detached.N+[Plantain].Taproot.Detached.N+[Plantain].Root.Detached.N+[WhiteClover].Taproot.Detached.N+[WhiteClover].Root.Detached.N+[Ryegrass].RootDetachedN*0.1+[AgLucerne].RootDetachedN*0.1) as DetachedBGN
                (10*([Chicory].Leaf.Detached.N+[Chicory].Stem.Detached.N+[Chicory].Inflorescence.Detached.N+[Plantain].Leaf.Detached.N+[Plantain].Stem.Detached.N+[Plantain].Inflorescence.Detached.N+[WhiteClover].Leaf.Detached.N+[WhiteClover].Petiole.Detached.N+[WhiteClover].Stolon.Detached.N+[WhiteClover].Inflorescence.Detached.N+[Chicory].Taproot.Detached.N+[Chicory].Root.Detached.N+[Plantain].Taproot.Detached.N+[Plantain].Root.Detached.N+[WhiteClover].Taproot.Detached.N+[WhiteClover].Root.Detached.N)+[Ryegrass].LitterDepositionN+[Ryegrass].RootDetachedN+[AgLucerne].LitterDepositionN+[AgLucerne].RootDetachedN) as DetachedTotalN
                (10*[WhiteClover].Nodule.NFixed + [AgLucerne].FixedN) as FixedN
                (sum([Soil].SoilNitrogen.Urea.kgha) + sum([Soil].SoilNitrogen.NH4.kgha) + sum([Soil].SoilNitrogen.NO3.kgha)) as SoilNContent
                sum([Soil].SoilNitrogen.Urea.kgha) as SoilUrea
                sum([Soil].SoilNitrogen.NH4.kgha) as SoilNH4
                sum([Soil].SoilNitrogen.NO3.kgha) as SoilNO3
                (sum([Soil].SoilNitrogen.NH4.kgha[1:4])+sum([Soil].SoilNitrogen.NO3.kgha[1:4])) as TopSoilN
                [SurfaceOrganicMatter].N as TotalSurfOMN
                sum([Soil].SoilNitrogen.FOMN) as TotalFOMN
                sum([Soil].SoilNitrogen.HumicN) as TotalHumicN
                sum([Soil].SoilNitrogen.MicrobialN as TotalMicrobialN
                [DefoliationManager].Script.RotationHarvestedDM as RotationHarvestedWt
                [DefoliationManager].Script.PreHarvestDM
                [DefoliationManager].Script.PostHarvestDM
                [DefoliationManager].Script.DefoliatedN as NTakenOff
                [DefoliationManager].Script.HarvestedN
                (10*[DefoliationManager].Script.RemovedN) as Defoliate.Script.RemovedN
                [DefoliationManager].Script.DefoliatedWt as HarvestedWt
                ([DefoliationManager].Script.RemovedN/([DefoliationManager].Script.RemovedWt+0.000001) as RemovedNConc
                [ExtraVariables].Script.AccumHarvestedWt as CumulativeHarvestedWt
                [ExtraVariables].Script.AccumHarvestedN as CumulativeNTakenOff
                ([Chicory].Total.Wt+[Plantain].Total.Wt+[WhiteClover].Total.Wt+[Ryegrass].TotalWt*0.1+[AgLucerne].TotalWt*0.1) as TotalPlantWt
                ([Chicory].AboveGroundLive.Wt+[Plantain].AboveGroundLive.Wt+[WhiteClover].AboveGroundLive.Wt+[Ryegrass].AboveGroundLiveWt*0.1+[AgLucerne].AboveGroundLiveWt*0.1+[Chicory].BelowGround.Wt+[Plantain].BelowGround.Wt+[WhiteClover].BelowGround.Wt+[Ryegrass].BelowGroundWt*0.1+[AgLucerne].BelowGroundWt*0.1) as TotalPlantLiveWt
                ([Chicory].AboveGround.Wt+[Plantain].AboveGround.Wt+[WhiteClover].AboveGround.Wt+[Ryegrass].AboveGroundWt*0.1+[AgLucerne].AboveGroundWt*0.1) as AboveGroundWt
                ([Chicory].BelowGround.Wt+[Plantain].BelowGround.Wt+[WhiteClover].BelowGround.Wt+[Ryegrass].BelowGroundWt*0.1+[AgLucerne].BelowGroundWt*0.1) as BelowGroundWt
                ([Chicory].Total.N+[Plantain].Total.N+[WhiteClover].Total.N+[Ryegrass].TotalN*0.1+[AgLucerne].TotalN*0.1) as TotalPlantN
                ([Chicory].AboveGround.N+[Plantain].AboveGround.N+[WhiteClover].AboveGround.N+[Ryegrass].AboveGroundN*0.1+[AgLucerne].AboveGroundN*0.1) as AboveGroundN
                ([Chicory].BelowGround.N+[Plantain].BelowGround.N+[WhiteClover].BelowGround.N+[Ryegrass].BelowGroundN*0.1+[AgLucerne].BelowGroundN*0.1) as BelowGroundN
                (([Chicory].AboveGround.N+[Plantain].AboveGround.N+[WhiteClover].AboveGround.N+[Ryegrass].AboveGroundN*0.1+[AgLucerne].AboveGroundN*0.1)/([Chicory].AboveGround.Wt+[Plantain].AboveGround.Wt+[WhiteClover].AboveGround.Wt+[Ryegrass].AboveGroundWt*0.1+[AgLucerne].AboveGroundWt*0.1+0.000001)) as AboveGroundNConc
                (([Chicory].BelowGround.N+[Plantain].BelowGround.N+[WhiteClover].BelowGround.N+[Ryegrass].BelowGroundN*0.1+[AgLucerne].BelowGroundN*0.1)/([Chicory].BelowGround.Wt+[Plantain].BelowGround.Wt+[WhiteClover].BelowGround.Wt+[Ryegrass].BelowGroundWt*0.1+[AgLucerne].BelowGroundWt*0.1+0.000001)) as BelowGroundNConc
                ([Chicory].AboveGroundLive.Wt+[Plantain].AboveGroundLive.Wt+[WhiteClover].AboveGroundLive.Wt+[Ryegrass].AboveGroundLiveWt*0.1+[AgLucerne].AboveGroundLiveWt*0.1) as AboveGroundLiveWt
                ([Chicory].AboveGroundLive.N+[Plantain].AboveGroundLive.N+[WhiteClover].AboveGroundLive.N+[Ryegrass].AboveGroundLiveN*0.1+[AgLucerne].AboveGroundLiveN*0.1) as AboveGroundDeadWt
                ([Chicory].BelowGround.Wt+[Plantain].BelowGround.Wt+[WhiteClover].BelowGround.Wt+[Ryegrass].BelowGroundWt*0.1+[AgLucerne].BelowGroundWt*0.1) as BelowGroundLiveWt
                (([Chicory].AboveGroundLive.N+[Plantain].AboveGroundLive.N+[WhiteClover].AboveGroundLive.N+[Ryegrass].AboveGroundLiveN*0.1+[AgLucerne].AboveGroundLiveN*0.1)/([Chicory].AboveGroundLive.Wt+[Plantain].AboveGroundLive.Wt+[WhiteClover].AboveGroundLive.Wt+[Ryegrass].AboveGroundLiveWt*0.1+[AgLucerne].AboveGroundLiveWt*0.1+0.000001)) as AboveGroundLiveNc
                [ExtraVariables].Script.HerbageNConc as HerbageNConc
                [Chicory].Total.Wt
                ([Chicory].AboveGroundLive.Wt+[Chicory].BelowGroundLive.Wt) as Chicory.TotalLive.Wt
                [Chicory].AboveGround.Wt
                [Chicory].BelowGround.Wt
                [Chicory].AboveGroundLive.Wt
                ([Chicory].AboveGround.Wt-[Chicory].AboveGroundLive.Wt) as Chicory.AboveGroundDead.Wt
                [Chicory].BelowGroundLive.Wt
                [Chicory].Total.N
                [Chicory].AboveGround.N
                [Chicory].BelowGround.N
                [Chicory].AboveGround.NConc
                [Chicory].BelowGround.NConc
                [Chicory].AboveGroundLive.NConc
                (([Chicory].Leaf.N+[Chicory].Stem.N+[Chicory].Inflorescence.N)/(([Chicory].Leaf.Wt+[Chicory].Stem.Wt+[Chicory].Inflorescence.Wt+0.000001)) as ChicoryHerbageNConc
                [Plantain].Total.Wt
                ([Plantain].AboveGroundLive.Wt+[Plantain].BelowGroundLive.Wt) as Plantain.TotalLive.Wt
                [Plantain].AboveGround.Wt
                [Plantain].BelowGround.Wt
                [Plantain].AboveGroundLive.Wt
                ([Plantain].AboveGround.Wt-[Plantain].AboveGroundLive.Wt) as Plantain.AboveGroundDead.Wt
                [Plantain].BelowGroundLive.Wt
                [Plantain].Total.N
                [Plantain].AboveGround.N
                [Plantain].BelowGround.N
                [Plantain].AboveGround.NConc
                [Plantain].BelowGround.NConc
                [Plantain].AboveGroundLive.NConc
                (([Plantain].Leaf.N+[Plantain].Stem.N+[Plantain].Inflorescence.N)/(([Plantain].Leaf.Wt+[Plantain].Stem.Wt+[Plantain].Inflorescence.Wt+0.000001)) as PlantainHerbageNConc
                ([Ryegrass].TotalWt*0.1) as Ryegrass.Total.Wt
                ([Ryegrass].AboveGroundLiveWt*0.1+[Ryegrass].BelowGroundWt*0.1) as Ryegrass.TotalLive.Wt
                ([Ryegrass].AboveGroundWt*0.1) as Ryegrass.AboveGround.Wt
                ([Ryegrass].BelowGroundWt*0.1) as Ryegrass.BelowGround.Wt
                ([Ryegrass].AboveGroundLiveWt*0.1) as Ryegrass.AboveGroundLive.Wt
                ([Ryegrass].AboveGroundDeadWt*0.1) as Ryegrass.AboveGroundDead.Wt
                ([Ryegrass].BelowGroundWt*0.1) as Ryegrass.BelowGroundLive.Wt
                ([Ryegrass].TotalN*0.1) as Ryegrass.Total.N
                ([Ryegrass].AboveGroundN*0.1) as Ryegrass.AboveGround.N
                ([Ryegrass].BelowGroundN*0.1) as Ryegrass.BelowGround.N
                [Ryegrass].AboveGroundNConc as Ryegrass.AboveGround.NConc
                ([Ryegrass].BelowGroundN/([Ryegrass].BelowGroundWt+0.000001)) as Ryegrass.BelowGround.NConc
                ([Ryegrass].AboveGroundLiveN/([Ryegrass].AboveGroundLiveWt+0.000001)) as Ryegrass.AboveGroundLive.NConc
                [Ryegrass].StandingHerbageNConc as RyegrassHerbageNConc
                ([AgLucerne].TotalWt*0.1) as Lucerne.Total.Wt
                ([AgLucerne].AboveGroundLiveWt*0.1+[AgLucerne].BelowGroundWt*0.1) as Lucerne.TotalLive.Wt
                ([AgLucerne].AboveGroundWt*0.1) as Lucerne.AboveGround.Wt
                ([AgLucerne].BelowGroundWt*0.1) as Lucerne.BelowGround.Wt
                ([AgLucerne].AboveGroundLiveWt*0.1) as Lucerne.AboveGroundLive.Wt
                ([AgLucerne].AboveGroundDeadWt*0.1) as Lucerne.AboveGroundDead.Wt
                ([AgLucerne].BelowGroundWt*0.1) as Lucerne.BelowGroundLive.Wt
                ([AgLucerne].TotalN*0.1) as Lucerne.Total.N
                ([AgLucerne].AboveGroundN*0.1) as Lucerne.AboveGround.N
                ([AgLucerne].BelowGroundN*0.1) as Lucerne.BelowGround.N
                [AgLucerne].AboveGroundNConc as Lucerne.AboveGround.NConc
                ([AgLucerne].BelowGroundN/([AgLucerne].BelowGroundWt+0.000001)) as Lucerne.BelowGround.NConc
                ([AgLucerne].AboveGroundLiveN/([AgLucerne].AboveGroundLiveWt+0.000001)) as Lucerne.AboveGroundLive.NConc
                [AgLucerne].StandingHerbageNConc as LucerneHerbage.NConc
                [WhiteClover].Total.Wt
                [WhiteClover].TotalLive.Wt
                [WhiteClover].AboveGround.Wt
                [WhiteClover].BelowGround.Wt
                [WhiteClover].AboveGroundLive.Wt
                [WhiteClover].AboveGroundDead.Wt
                [WhiteClover].BelowGroundLive.Wt
                [WhiteClover].Total.N
                [WhiteClover].AboveGround.N
                [WhiteClover].BelowGround.N
                [WhiteClover].AboveGround.NConc
                [WhiteClover].BelowGround.NConc
                [WhiteClover].AboveGroundLive.NConc
                (([WhiteClover].Leaf.N+[WhiteClover].Petiole.N+[WhiteClover].Inflorescence.N)/(([WhiteClover].Leaf.Wt+[WhiteClover].Petiole.Wt+[WhiteClover].Inflorescence.Wt+0.000001)) as WhiteCloverHerbageNConc
                ([Chicory].AboveGround.Wt/([Chicory].AboveGround.Wt+[Plantain].AboveGround.Wt+[WhiteClover].AboveGround.Wt+[Ryegrass].AboveGroundWt*0.1+[AgLucerne].AboveGroundWt*0.1+0.000001)) as Chicory.BiomassFraction
                ([Plantain].AboveGround.Wt/([Chicory].AboveGround.Wt+[Plantain].AboveGround.Wt+[WhiteClover].AboveGround.Wt+[Ryegrass].AboveGroundWt*0.1+[AgLucerne].AboveGroundWt*0.1+0.000001)) as Plantain.BiomassFraction
                ([WhiteClover].AboveGround.Wt/([Chicory].AboveGround.Wt+[Plantain].AboveGround.Wt+[WhiteClover].AboveGround.Wt+[Ryegrass].AboveGroundWt*0.1+[AgLucerne].AboveGroundWt*0.1+0.000001)) as WhiteClover.BiomassFraction
                ([Ryegrass].AboveGroundWt*0.1/([Chicory].AboveGround.Wt+[Plantain].AboveGround.Wt+[WhiteClover].AboveGround.Wt+[Ryegrass].AboveGroundWt*0.1+[AgLucerne].AboveGroundWt*0.1+0.000001)) as Ryegrass.BiomassFraction
                ([AgLucerne].AboveGroundWt*0.1/([Chicory].AboveGround.Wt+[Plantain].AboveGround.Wt+[WhiteClover].AboveGround.Wt+[Ryegrass].AboveGroundWt*0.1+[AgLucerne].AboveGroundWt*0.1+0.000001)) as Lucerne.BiomassFraction
                ([Chicory].AboveGround.N/([Chicory].AboveGround.N+[Plantain].AboveGround.N+[WhiteClover].AboveGround.N+[Ryegrass].AboveGroundN*0.1+[AgLucerne].AboveGroundN*0.1+0.000001)) as Chicory.NitrogenFraction
                ([Plantain].AboveGround.N/([Chicory].AboveGround.N+[Plantain].AboveGround.N+[WhiteClover].AboveGround.N+[Ryegrass].AboveGroundN*0.1+[AgLucerne].AboveGroundN*0.1+0.000001)) as Plantain.NitrogenFraction
                ([WhiteClover].AboveGround.N/([Chicory].AboveGround.N+[Plantain].AboveGround.N+[WhiteClover].AboveGround.N+[Ryegrass].AboveGroundN*0.1+[AgLucerne].AboveGroundN*0.1+0.000001)) as WhiteClover.NitrogenFraction
                ([Ryegrass].AboveGroundN*0.1/([Chicory].AboveGround.N+[Plantain].AboveGround.N+[WhiteClover].AboveGround.N+[Ryegrass].AboveGroundN*0.1+[AgLucerne].AboveGroundN*0.1+0.000001)) as Ryegrass.NitrogenFraction
                ([AgLucerne].AboveGroundN*0.1/([Chicory].AboveGround.N+[Plantain].AboveGround.N+[WhiteClover].AboveGround.N+[Ryegrass].AboveGroundN*0.1+[AgLucerne].AboveGroundN*0.1+0.000001)) as Lucerne.NitrogenFraction
                ([Chicory].Leaf.CoverTotal+[Plantain].Leaf.CoverTotal+[WhiteClover].Leaf.CoverTotal+[Ryegrass].CoverTotal+[AgLucerne].CoverTotal) as CoverTotal
                ([Chicory].Leaf.CoverDead+[Plantain].Leaf.CoverDead+[WhiteClover].Leaf.CoverDead+[Ryegrass].CoverDead+[AgLucerne].CoverDead) as CoverDead
                [MicroClimate].CanopyCover
                ([Chicory].Leaf.LAI+[Plantain].Leaf.LAI+[WhiteClover].Leaf.LAI+[Ryegrass].LAIGreen+[AgLucerne].LAIGreen) as LAIgreen
                ([Chicory].Leaf.LAIDead+[Plantain].Leaf.LAIDead+[WhiteClover].Leaf.LAIDead+[Ryegrass].LAIDead+[AgLucerne].LAIDead) as LAIdead
                (([Chicory].Leaf.Height+[Plantain].Leaf.Height+[WhiteClover].Leaf.Height+[Ryegrass].Height+[AgLucerne].Height)/5) as AverageShootHeight
                (([Chicory].Root.Depth+[Plantain].Root.Depth+[WhiteClover].Root.Depth+[Ryegrass].RootDepth+[AgLucerne].RootDepth)/5) as AverageRootDepth
                ([Chicory].Root.LengthDensity+[Plantain].Root.LengthDensity+[WhiteClover].Root.LengthDensity+[Ryegrass].RootLengthDensity+[AgLucerne].RootLengthDensity) as Total.RootLengthDensity
                [Chicory].Leaf.CoverTotal
                [Plantain].Leaf.CoverTotal
                [Ryegrass].CoverTotal
                [AgLucerne].CoverTotal as Lucerne.CoverTotal
                [WhiteClover].Leaf.CoverTotal
                [Chicory].Population
                [Plantain].Population
                (0*[Ryegrass].TotalWt) as Ryegrass.Population
                (0*[AgLucerne].TotalWt) as Lucerne.Population
                [WhiteClover].Population
                [Chicory].Leaf.Height
                [Plantain].Leaf.Height
                [WhiteClover].Leaf.Height
                [Ryegrass].Height
                [AgLucerne].Height as Lucerne.Height
                [Chicory].Root.Depth
                [Plantain].Root.Depth
                [WhiteClover].Root.Depth
                [Ryegrass].RootDepth
                [AgLucerne].RootDepth as Lucerne.RootDepth
                [Chicory].Root.LengthDensity
                [Plantain].Root.LengthDensity
                [WhiteClover].Root.LengthDensity
                [Ryegrass].RootLengthDensity
                [AgLucerne].RootLengthDensity as Lucerne.RootLengthDensity
                [Chicory].Leaf.LAI
                [Plantain].Leaf.LAI
                [WhiteClover].Leaf.LAI
                [Ryegrass].LAI
                [AgLucerne].LAI as Lucerne.LAI
                [Chicory].Leaf.RadIntTot
                [Plantain].Leaf.RadIntTot
                [WhiteClover].Leaf.RadIntTot
                [Ryegrass].InterceptedRadn as Ryegrass.RadnIntTot
                [AgLucerne].InterceptedRadn as Lucerne.RadIntTot
                [Chicory].Phenology.Stage
                [Plantain].Phenology.Stage
                [WhiteClover].Phenology.Stage
                [Ryegrass].Stage as Ryegrass.Phenology.Stage
                [AgLucerne].Stage as Lucerne.Phenology.Stage
                [Chicory].ShootRootRatio
                ([Chicory].AboveGroundLive.Wt/([Chicory].AboveGroundLive.Wt+[Chicory].BelowGround.Wt+0.000001)) as Chicory.CurrentAboveGroundFraction
                [Plantain].ShootRootRatio.Value()
                ([Plantain].AboveGroundLive.Wt/([Plantain].AboveGroundLive.Wt+[Plantain].BelowGround.Wt+0.000001)) as Plantain.CurrentAboveGroundFraction
                [WhiteClover].ShootRootRatio.Value()
                ([WhiteClover].AboveGroundLive.Wt/([WhiteClover].TotalLive.Wt+0.000001)) as WhiteClover.CurrentAboveGroundFraction
                ([Ryegrass].AboveGroundLiveWt/([Ryegrass].BelowGroundWt+0.000001)) as Ryegrass.ShootRootRatio
                ([Ryegrass].AboveGroundLiveWt/([Ryegrass].AboveGroundLiveWt+[Ryegrass].BelowGroundWt+0.000001)) as Ryegrass.CurrentAboveGroundFraction
                ([AgLucerne].AboveGroundLiveWt/([AgLucerne].BelowGroundWt+0.000001)) as Lucerne.ShootRootRatio
                ([AgLucerne].AboveGroundLiveWt/([AgLucerne].AboveGroundLiveWt+[AgLucerne].BelowGroundWt+0.000001)) as Lucerne.CurrentAboveGroundFraction
                ([Chicory].Arbitrator.N.TotalPlantDemand+[Plantain].Arbitrator.N.TotalPlantDemand+[WhiteClover].Arbitrator.N.TotalPlantDemand+([Ryegrass].DemandAtLuxuryN+[AgLucerne].DemandAtLuxuryN)*0.1) as TotalPlantNDemand
                ([Chicory].Arbitrator.N.TotalPlantSupply+[Plantain].Arbitrator.N.TotalPlantSupply+[WhiteClover].Arbitrator.N.TotalPlantSupply+([Ryegrass].RemobilisableSenescedN+[Ryegrass].RemobilisableLuxuryN+[Ryegrass].SoilAvailableN+[AgLucerne].RemobilisableSenescedN+[AgLucerne].RemobilisableLuxuryN+[AgLucerne].SoilAvailableN)*0.1) as TotalPlantNSupply
                ([Chicory].Arbitrator.N.Allocated+[Plantain].Arbitrator.N.Allocated+[WhiteClover].Arbitrator.N.Allocated+([Ryegrass].RemobilisedSenescedN+[Ryegrass].RemobilisedLuxuryN+[Ryegrass].SoilUptakeN+[AgLucerne].RemobilisedSenescedN+[AgLucerne].RemobilisedLuxuryN+[AgLucerne].SoilUptakeN)*0.1) as TotalPlantNAllocated
                ([Chicory].Arbitrator.WDemand+[Plantain].Arbitrator.WDemand+[WhiteClover].Arbitrator.WDemand+[Ryegrass].WaterDemand+[AgLucerne].WaterDemand) as TotalPlantWDemand
                ([Chicory].Arbitrator.WSupply+[Plantain].Arbitrator.WSupply+[WhiteClover].Arbitrator.WSupply+sum([Ryegrass].WaterAvailable)+sum([AgLucerne].WaterAvailable)) as TotalPlantWSupply
                ([Chicory].Arbitrator.WAllocated+[Plantain].Arbitrator.WAllocated+[WhiteClover].Arbitrator.WAllocated+sum([Ryegrass].WaterUptake)+sum([AgLucerne].WaterUptake)) as TotalPlantWAllocated
                [Chicory].Arbitrator.DM.TotalFixationSupply
                [Chicory].Arbitrator.DM.TotalPlantDemand
                [Chicory].Arbitrator.DM.Allocated
                [Chicory].Arbitrator.N.TotalPlantSupply
                [Chicory].Arbitrator.N.TotalPlantDemand
                [Chicory].Arbitrator.N.Allocated
                [Chicory].Arbitrator.WSupply
                [Chicory].Arbitrator.WDemand
                [Chicory].Arbitrator.WAllocated
                [Plantain].Arbitrator.DM.TotalFixationSupply
                [Plantain].Arbitrator.DM.TotalPlantDemand
                [Plantain].Arbitrator.DM.Allocated
                [Plantain].Arbitrator.N.TotalPlantSupply
                [Plantain].Arbitrator.N.TotalPlantDemand
                [Plantain].Arbitrator.N.Allocated
                [Plantain].Arbitrator.WSupply
                [Plantain].Arbitrator.WDemand
                [Plantain].Arbitrator.WAllocated
                [Ryegrass].GrossPotentialGrowthWt as Ryegrass.Arbitrator.DM.TotalPlantDemand
                [Ryegrass].NetGrowthWt*0.1 as Ryegrass.Arbitrator.Arbitrator.DM.Allocated
                [Ryegrass].DemandAtLuxuryN*0.1 as Ryegrass.Arbitrator.N.TotalPlantDemand
                [Ryegrass].DemandAtOptimumN
                ([Ryegrass].RemobilisableSenescedN+[Ryegrass].RemobilisableLuxuryN+[Ryegrass].SoilAvailableN)*0.1 as Ryegrass.Arbitrator.N.TotalPlantSupply
                ([Ryegrass].RemobilisedSenescedN+[Ryegrass].RemobilisedLuxuryN+[Ryegrass].SoilUptakeN)*0.1 as Ryegrass.Arbitrator.N.Allocated
                [Ryegrass].SoilAvailableN
                [Ryegrass].SoilDemandN
                sum([Ryegrass].WaterAvailable) as Ryegrass.Arbitrator.WSupply
                [Ryegrass].WaterDemand as Ryegrass.Arbitrator.WDemand
                sum([Ryegrass].WaterUptake) as Ryegrass.Arbitrator.WAllocated
                [AgLucerne].GrossPotentialGrowthWt as Lucerne.Arbitrator.DM.TotalPlantDemand
                [AgLucerne].NetGrowthWt*0.1 as Lucerne.Arbitrator.DM.Allocated
                [AgLucerne].DemandAtLuxuryN*0.1 as Lucerne.Arbitrator.N.TotalPlantDemand
                [AgLucerne].DemandAtOptimumN
                ([AgLucerne].RemobilisableSenescedN+[AgLucerne].RemobilisableLuxuryN+[AgLucerne].SoilAvailableN)*0.1 as Lucerne.Arbitrator.N.TotalPlantSupply
                ([AgLucerne].RemobilisedSenescedN+[AgLucerne].RemobilisedLuxuryN+[AgLucerne].SoilUptakeN)*0.1 as Lucerne.Arbitrator.N.Allocated
                [AgLucerne].SoilAvailableN
                [AgLucerne].SoilDemandN
                sum([AgLucerne].WaterAvailable) as Lucerne.Arbitrator.WSupply
                [AgLucerne].WaterDemand as Lucerne.Arbitrator.WDemand
                sum([AgLucerne].WaterUptake) as Lucerne.Arbitrator.WAllocated
                [AgLucerne].FixedN as Lucerne.Nodule.NFixed
                [WhiteClover].Arbitrator.DM.TotalFixationSupply
                [WhiteClover].Arbitrator.DM.TotalPlantDemand
                [WhiteClover].Arbitrator.DM.Allocated
                [WhiteClover].Arbitrator.N.TotalPlantSupply
                [WhiteClover].Arbitrator.N.TotalPlantDemand
                [WhiteClover].Arbitrator.N.Allocated
                [WhiteClover].Arbitrator.WSupply
                [WhiteClover].Arbitrator.WDemand
                [WhiteClover].Arbitrator.WAllocated
                [WhiteClover].Nodule.NFixed*10 as WhiteClover.Nodule.NFixed
                [Chicory].Leaf.Fw
                [Chicory].Leaf.Fn
                [Chicory].Leaf.FNmetabolic
                [Chicory].Leaf.Photosynthesis.FCO2
                [Chicory].Leaf.Photosynthesis.FN
                [Chicory].Leaf.Photosynthesis.FT
                [Chicory].Leaf.Photosynthesis.FW
                [Chicory].Leaf.Photosynthesis.FVPD
                [Chicory].Leaf.FRGR
                [Plantain].Leaf.Fw
                [Plantain].Leaf.Fn
                [Plantain].Leaf.FNmetabolic
                [Plantain].Leaf.Photosynthesis.FCO2
                [Plantain].Leaf.Photosynthesis.FN
                [Plantain].Leaf.Photosynthesis.FT
                [Plantain].Leaf.Photosynthesis.FW
                [Plantain].Leaf.Photosynthesis.FVPD
                [Plantain].Leaf.FRGR
                [Ryegrass].GlfNSupply
                [Ryegrass].GlfWaterSupply
                [Ryegrass].GlfWaterLogging
                [Ryegrass].GlfNContent
                [Ryegrass].GlfCO2
                [Ryegrass].GlfTemperature
                [Ryegrass].GlfColdDamage
                [Ryegrass].GlfHeatDamage
                [AgLucerne].GlfNSupply
                [AgLucerne].GlfWaterSupply
                [AgLucerne].GlfWaterLogging
                [AgLucerne].GlfNContent
                [AgLucerne].GlfCO2
                [AgLucerne].GlfTemperature
                [AgLucerne].GlfColdDamage
                [AgLucerne].GlfHeatDamage
                [WhiteClover].Leaf.Fw
                [WhiteClover].Leaf.Fn
                [WhiteClover].Leaf.FNmetabolic
                [WhiteClover].Leaf.Photosynthesis.FCO2
                [WhiteClover].Leaf.Photosynthesis.FN
                [WhiteClover].Leaf.Photosynthesis.FT
                [WhiteClover].Leaf.Photosynthesis.FW
                [WhiteClover].Leaf.Photosynthesis.FVPD
                [WhiteClover].Leaf.FRGR
    Folder Denmark
      Experiment FoulumMix1
        Memo
          ###Foulum species competition###

          This simulation setup was based on field trials performed at the the Foulumgaard Experimental Station, Aarhus University, Denmark, between 2013 and 2015.  The trial was part of an experiment studying species competition in multi-species sward in a dairy organic farming context.  This comprises the establishement of plots sown with various species in monoculture and in a few combinations, either varying the number and type of species or the relative sowing rate.  The plots received either no N fertiliser or a nominal annual rate of 250 kgN/ha applied as cattle slurry.  Details of the site and trial can be found in publications ([CongEtAl2017]; [CongAndEriksen2018]; and [CongEtAl2018]).  Here only a selection of plots with mixed pasture species are used, these involved ryegrass, red clover, chicory and ribwort plantain (weeds also occurred, but are not included in the simulation - the fraction of biomass was fairly small).  In these plots ryegrass and red clover were sown in equal proportion with either chicory or plantain; the proportion of forbs was set to either 20% or 60% of the sown population (thus ryegrass and clover populations were, respectively, at 40% or 20% each).  Each treatment combining sowing rate and N inputs had three replicates.  Measurements comprised total yield and respective values for each species.
          Observed data supplied by Wen Feng Cong and Jorgen Eriksen, Aarhus University.

          The soil at the experimental site was a loamy sand (a Typic Hapludult on the USDA classification), the parameters required were derived from data published and slightly adjusted with measurements done at the experimental site ([JacobsenFoulum1989]; [HeidmannFoulum1989]).
          Weather data was obtained from nearby weather station (Aarhus University).
          Simulation of ryegrass is done using the AgPasture model as the PMF version is still under development.
          The cultivars used are those developed for New Zealand conditions, this will need rectifying in the future.
        Factors
          Factor NInputs: Specification=[FertiliserSchedule]
            Operations Nil
            Operations Slurry
              2014-04-01  [SurfaceOrganicMatter].Add(mass: 1022.7, N: 40.9, P: 0.0, type: "fym", name: "slurry")
              2014-04-01  [Fertiliser].Apply(Amount: 50.0, Type: Fertiliser.Types.NH4N, Depth: 5)
              2014-06-04  [SurfaceOrganicMatter].Add(mass: 481.5, N: 19.3, P: 0.0, type: "fym", name: "slurry")
              2014-06-04  [Fertiliser].Apply(Amount: 20.0, Type: Fertiliser.Types.NH4N, Depth: 5)
              2014-07-03  [SurfaceOrganicMatter].Add(mass: 478.6, N: 19.1, P: 0.0, type: "fym", name: "slurry")
              2014-07-03  [Fertiliser].Apply(Amount: 24.4, Type: Fertiliser.Types.NH4N, Depth: 5)
              2014-08-22  [SurfaceOrganicMatter].Add(mass: 560.5, N: 22.4, P: 0.0, type: "fym", name: "slurry")
              2014-08-22  [Fertiliser].Apply(Amount: 19.1, Type: Fertiliser.Types.NH4N, Depth: 5)
              2015-04-07  [SurfaceOrganicMatter].Add(mass: 1022.7, N: 40.9, P: 0.0, type: "fym", name: "slurry")
              2015-04-07  [Fertiliser].Apply(Amount: 50.0, Type: Fertiliser.Types.NH4N, Depth: 5)
              2015-06-10  [SurfaceOrganicMatter].Add(mass: 481.5, N: 19.3, P: 0.0, type: "fym", name: "slurry")
              2015-06-10  [Fertiliser].Apply(Amount: 20.0, Type: Fertiliser.Types.NH4N, Depth: 5)
              2015-07-21  [SurfaceOrganicMatter].Add(mass: 478.6, N: 19.1, P: 0.0, type: "fym", name: "slurry")
              2015-07-21  [Fertiliser].Apply(Amount: 24.4, Type: Fertiliser.Types.NH4N, Depth: 5)
              2015-09-03  [SurfaceOrganicMatter].Add(mass: 560.5, N: 22.4, P: 0.0, type: "fym", name: "slurry")
              2015-09-03  [Fertiliser].Apply(Amount: 19.1, Type: Fertiliser.Types.NH4N, Depth: 5)
          Factor SpeciesMix: Specification=[Sowing]
            Operations NoForbs
              2013-05-06  [RedClover].Sow(population: 250, cultivar: "Rajah", depth: 5, rowSpacing: 150)
              2013-01-01  [Ryegrass].EndCrop()
              2013-05-31  [Ryegrass].Sow(population: 0, cultivar: "R", depth: 0, rowSpacing: 0)
        Simulation FoulumMix1
          Clock: StartDate=2013-01-01; EndDate=2015-12-31
          Weather: FileName=Foulum.met
          Summary summaryfile
          SoilArbitrator Soil Arbitrator
          Zone Field: Area=1; Slope=0
            Folder Management
              Operations Sowing
              Operations BaseNApplication
                2013-05-03  [SurfaceOrganicMatter].Add(mass: 5114, N: 40.9, P: 0.0, type: "fym", name: "slurry")
                2013-05-03  [Fertiliser].Apply(Amount: 50, Type: Fertiliser.Types.NH4N, Depth: 5)
              Operations FertiliserSchedule
              Operations IrrigationSchedulle
                2013-07-17  [Irrigation].Apply(amount: 25)
                2013-08-28  [Irrigation].Apply(amount: 25)
                2014-12-06  [Irrigation].Apply(amount: 33)
                2014-07-04  [Irrigation].Apply(amount: 25)
              Manager DefoliationManager: same as Evaluation.NewZealand.FRNLRuakuraMix1.FRNLRuakuraMix1.Field.Management.DefoliationManager
              Operations DefoliationSchedule
                2013-07-04  [DefoliationManager].Script.Defoliate(defoliationType: "Cut", amountDM: 100, amountType: "ResidualDM", duration: 1)
                2013-10-01  [DefoliationManager].Script.Defoliate(defoliationType: "Cut", amountDM: 100, amountType: "ResidualDM", duration: 1)
                2014-05-22  [DefoliationManager].Script.Defoliate(defoliationType: "Cut", amountDM: 100, amountType: "ResidualDM", duration: 1)
                2014-07-02  [DefoliationManager].Script.Defoliate(defoliationType: "Cut", amountDM: 100, amountType: "ResidualDM", duration: 1)
                2014-08-20  [DefoliationManager].Script.Defoliate(defoliationType: "Cut", amountDM: 100, amountType: "ResidualDM", duration: 1)
                2014-10-06  [DefoliationManager].Script.Defoliate(defoliationType: "Cut", amountDM: 100, amountType: "ResidualDM", duration: 1)
                2015-06-01  [DefoliationManager].Script.Defoliate(defoliationType: "Cut", amountDM: 100, amountType: "ResidualDM", duration: 1)
                2015-07-14  [DefoliationManager].Script.Defoliate(defoliationType: "Cut", amountDM: 100, amountType: "ResidualDM", duration: 1)
                2015-08-24  [DefoliationManager].Script.Defoliate(defoliationType: "Cut", amountDM: 100, amountType: "ResidualDM", duration: 1)
                2015-10-19  [DefoliationManager].Script.Defoliate(defoliationType: "Cut", amountDM: 100, amountType: "ResidualDM", duration: 1)
              Manager ExtraVariables
                script: same as in Evaluation.NewZealand.FRNLRuakuraMix1.FRNLRuakuraMix1.Field.Management.ExtraVariables
              Manager SettingUpParams
                setParamStartDate = 2018-06-01
                setParamHeight = 350
```csharp
// Set some plant parameters, for tests and development
// Following suggestions by Val Snow: Plant competition seem to be better done if heights are all the same (maybe due to some issue/feature of MicroClimate)

using System;
using Models.Core;
using System.Collections.Generic;
using System.Text;
using Models;
using Models.Soils;
using Models.PMF;
using System.Xml.Serialization;
using APSIM.Shared.Utilities;

namespace Models
{
	[Serializable]
	public class Script : Model
	{
		[Link] Clock Clock;
		[Link] Zone myZone;


		//User inputs from properties tab
		[Separator("Setting up some parameters of plants")]
		[Description(" Enter the date to set plant parameters (dd/mm/yyyy):")]
		public DateTime setParamStartDate { get; set; }
		[Description(" Enter the height to set all plants to (mm):")]
		public double setParamHeight { get; set; }


		//Internal variables
		private RemovalFractions removalFractions;

		[EventSubscribe("Commencing")]
		private void OnSimulationCommencing(object sender, EventArgs e)
		{
			// make sure that manager will work when startDate<simulationStartDay
			if (Clock.Today > setParamStartDate)
				setParamStartDate = Clock.Today;
		}

		[EventSubscribe("StartOfDay")]
		private void OnStartOfDay(object sender, EventArgs e)
		{
			// make sure that rotation start when startDate<simulationStartDay
			if (Clock.Today == setParamStartDate)
			{
			    double[] xVals = new double[] {0, 10};
			    double[] yVals = new double[] {setParamHeight, setParamHeight};
				myZone.Set("RedClover.Leaf.HeightFunction.XYPairs.X", xVals);
				myZone.Set("RedClover.Leaf.HeightFunction.XYPairs.Y", yVals);
				myZone.Set("Ryegrass.PlantHeightMaximum", setParamHeight);
				myZone.Set("Ryegrass.PlantHeightMinimum", setParamHeight);
			}
		}
	}
}
```
            MicroClimate: a_interception=0; b_interception=1; c_interception=0; d_interception=0; soil_albedo=0.23; SoilHeatFluxFraction=0.4; NightInterceptionFraction=0.5; ReferenceHeight=2
            Irrigation
            Fertiliser
            SurfaceOrganicMatter: InitialResidueName=grass; InitialResidueType=grass; InitialResidueMass=1000; InitialStandingFraction=0; InitialCPR=0; InitialCNR=40; FractionFaecesAdded=0.5
            Soil: SoilType=Typic Hapludult (US); LocalName=Loamy Sandy Soil; Site=Foulum; NearestTown=Tjelle; Region=Viborg; Country=Denmark; Latitude=0; Longitude=0
              DataSource=Based on data published by Jacobsen (1989) and Heidmann et al (1989)
              Analysis: PHUnits=Water; BoronUnits=0
                Thickness  Rocks  PH  CEC   ParticleSizeSand  ParticleSizeSilt  ParticleSizeClay
                200        0      6   12.9  76.4              16.9              6.7
                250        0      6   11.2  77.7              16.1              6.2
                250        0      6   8.1   76.4              16.5              7.1
                300        0      6   4.3   83.8              11.6              4.6
                250        0      6   4.5   80.2              12.1              7.7
                250        0      6   4.4   80.2              12.1              7.7
              Water
                Thickness  BD    AirDry  LL15   DUL    SAT    KS
                200        1.47  0.024   0.072  0.299  0.42   1467
                250        1.44  0.053   0.056  0.268  0.437  1039
                250        1.65  0.054   0.054  0.182  0.384  4748
                300        1.73  0.049   0.049  0.2    0.342  882
                250        1.76  0.054   0.054  0.219  0.305  655
                250        1.86  0.062   0.062  0.219  0.294  612
                SoilCrop ChicorySoil: LL=[0.072, 0.056, 0.054, 0.049, 0.054, 0.062]; KL=[0.07, 0.06, 0.03, 0.01, 0.004, 0.002]; XF=[1, 1, 1, 1, 1, 1]
                SoilCrop PlantainSoil: LL=[0.072, 0.056, 0.054, 0.049, 0.054, 0.062]; KL=[0.08, 0.07, 0.04, 0.013, 0.005, 0]; XF=[1, 1, 1, 1, 1, 1]
                SoilCrop RyegrassSoil: LL=[0.072, 0.056, 0.054, 0.049, 0.054, 0.062]; KL=[0.1, 0.085, 0.047, 0.01, 0.003, 0]; XF=[1, 1, 1, 1, 1, 1]
                SoilCrop RedCloverSoil: LL=[0.072, 0.056, 0.054, 0.049, 0.054, 0.062]; KL=[0.078, 0.07, 0.038, 0.012, 0.005, 0.002]; XF=[1, 1, 1, 1, 1, 1]
                SoilCrop RedCloverSoil: LL=[0.072, 0.056, 0.054, 0.049, 0.054, 0.062]; KL=[0.085, 0.075, 0.033, 0.002, 0, 0]; XF=[1, 1, 1, 1, 1, 1]
              SoilWater: SummerDate=15-Sep; SummerU=6; SummerCona=3; WinterDate=15-Apr; WinterU=3; WinterCona=1; DiffusConst=88; DiffusSlope=35; Salb=0.2; CN2Bare=70; CNRed=20; CNCov=0.8; slope=0; discharge_width=0; catchment_area=0; max_pond=0; ResidueInterception=0
                Thickness  SWCON  KLAT
                200        0.391  0
                250        0.304  0
                250        0.437  0
                300        0.291  0
                250        0.334  0
                250        0.343  0
              SoilNitrogen: same as Evaluation.NewZealand.FRNLRuakuraMix1.FRNLRuakuraMix1.Field.Soil.SoilNitrogen
              SoilOrganicMatter: RootCN=40; EnrACoeff=7.4; EnrBCoeff=0.2; OCUnits=Total
                Thickness  OC    SoilCN  FBiom  FInert  RootWt
                200        1.89  11.9    0.065  0.1     1000
                250        0.99  11.9    0.02   0.275   750
                250        0.45  11.9    0.015  0.65    310
                300        0.12  11.9    0.01   0.8     160
                250        0.06  11.9    0.007  0.95    25
                250        0.06  11.9    0.005  0.99    5
              CERESSoilTemperature
              InitialWater Initial water: PercentMethod=1; FractionFull=1
              Sample Initial nitrogen: NO3Units=kg/ha; NH4Units=kg/ha; SWUnits=Volumetric; OCUnits=Total; PHUnits=Water
                Thickness  NO3  NH4
                200        15   1
                250        7    0.5
                550        5    0.5
                500        3    0.25
            PastureSpecies Ryegrass: MaximumNUptake=10; Albedo=0.26; Gsmax=0.011; R50=200; InitialShootDM=500; InitialRootDM=250; InitialRootDepth=750; ReferencePhotosyntheticRate=1; LightExtinctionCoefficient=0.5; GrowthTminimum=1; GrowthToptimum=20; GrowthTEffectExponent=1.7; HeatOnsetTemperature=28; HeatFullTemperature=35; HeatRecoverySumDD=30; HeatRecoveryTReference=25; ColdOnsetTemperature=1; ColdFullTemperature=-5; ColdRecoverySumDD=25; MaintenanceRespirationCoefficient=0.03; GrowthRespirationCoefficient=0.25; RespirationTReference=20; RespirationExponent=1.5; NThresholdsForLeaves=[0.04, 0.012, 0.05]; NThresholdsForStems=[0, 0, 0]; NThresholdsForStolons=[0, 0, 0]; NThresholdsForRoots=[0.02, 0.006, 0.025]; DegreesDayForGermination=125; TargetShootRootRatio=4; MaxRootAllocation=0.25; ShootRootGlfFactor=0.5; ReproSeasonReferenceLatitude=41; ReproSeasonTimingCoeff=0.14; ReproSeasonMaxAllocationIncrease=0.5; ReproSeasonAllocationCoeff=0.1; FractionLeafMaximum=0.7; FractionLeafMinimum=0.7; FractionLeafDMThreshold=500; FractionLeafDMFactor=2000; FractionLeafExponent=3; SpecificLeafArea=25; SpecificRootLength=100; ShootMaxEffectOnLAI=1000; MaxStemEffectOnLAI=1; LiveLeavesPerTiller=3; TissueTurnoverRateShoot=0.05; TissueTurnoverRateRoot=0.02; DetachmentRateShoot=0.08; TurnoverTemperatureMin=2; TurnoverTemperatureRef=20; TurnoverTemperatureExponent=1; TurnoverDroughtEffectMax=1; TurnoverDroughtThreshold=0.5; TurnoverDefoliationCoefficient=0.5; TurnoverDefoliationRootEffect=0.1; FractionNLuxuryRemobilisable=[0.1, 0.1, 0.1]; SoilSaturationEffectMax=0.1; MinimumWaterFreePorosity=-1; SoilSaturationRecoveryFactor=0.25; NDillutionCoefficient=0.25; GlfGeneric=1; GlfSoilFertility=1; PlantHeightMinimum=25; PlantHeightMaximum=600; PlantHeightMassForMax=10000; PlantHeightExponent=2.8; RootDepthMinimum=50; RootDepthMaximum=750; RootElongationRate=12.5; RootDistributionDepthParam=90; RootDistributionExponent=3.2; DigestibilitiesCellWall=[0.6, 0.6, 0.6, 0.2]; MinimumGreenWt=10; PreferenceForGreenOverDead=1; PreferenceForLeafOverStems=1
              zero: SpeciesFamily, PhotosyntheticPathway, UseHeatStressFactor, UseColdStressFactor, ColdRecoveryTReference, UseReproSeasonFactor, FractionToStolon, StolonEffectOnLAI, MinimumNFixation, MaximumNFixation, FractionStolonStanding, WaterAvailableMethod, NitrogenAvailableMethod
              PastureAboveGroundOrgan Leaves
                GenericTissue LeafCohort1
                GenericTissue LeafCohort2
                GenericTissue LeafCohort3
                GenericTissue Dead
              PastureAboveGroundOrgan Stems
                GenericTissue LeafCohort1
                GenericTissue LeafCohort2
                GenericTissue LeafCohort3
                GenericTissue Dead
              PastureAboveGroundOrgan Stolons
                GenericTissue LeafCohort1
                GenericTissue LeafCohort2
                GenericTissue LeafCohort3
                GenericTissue Dead
            Plant RedClover: CropType=RedClover; IsEnding=false; DaysAfterEnding=0
            Report: EventNames=[Clock].DoReport
              VariableNames:
                [Clock].Today as Date
                [Clock].Today.DayOfYear as DayOfYear
                [Weather].Radn as SolarRadiation
                [MicroClimate].NetRadiation
                ([RedClover].Leaf.RadIntTot+[Ryegrass].InterceptedRadn) as InterceptedRadiation
                [Weather].MeanT
                [Weather].Rain as Rainfall
                [Irrigation].IrrigationApplied as IrrigationApplied
                [MicroClimate].PrecipitationInterception as PrecipitationInterception
                [MicroClimate].PetTotal
                [Soil].SoilWater.Eo as Eo
                [Soil].SoilWater.Es as Evaporation
                ([RedClover].Leaf.Transpiration+sum([Ryegrass].WaterUptake)) as Transpiration
                [Soil].SoilWater.pond as PondedWater
                [Soil].SoilWater.Drainage as Drainage
                [Soil].SoilWater.Runoff as Runoff
                sum([Soil].SoilWater.LateralOutflow) as LateralFlow
                sum([Soil].SoilWater.SWmm) as TotalSWC
                sum([Soil].DULmm) as TotalDUL
                sum([Soil].LL15mm) as TotalLL15
                [Soil].SoilWater.SW[1] as SWCTopLayer
                [Soil].DUL[1] as DULTopLayer
                [Fertiliser].NitrogenApplied as FertiliserN
                sum([Soil].SoilNitrogen.Denitrification) as DenitrifiedN
                ([Soil].SoilWater.LeachNH4 + [Soil].SoilWater.LeachNO3) as LeachedN
                (([RedClover].Root.NTakenUp)*10+[Ryegrass].SoilUptakeN) as UptakeN
                sum([Soil].SoilNitrogen.MineralisedN) as MineralisedSoilN
                sum([Soil].SoilNitrogen.dlt_n_min_res) as MineralisedSurfOMN
                ([RedClover].Leaf.Detached.N+[RedClover].Petiole.Detached.N+[RedClover].Stem.Detached.N+[RedClover].Inflorescence.Detached.N+[Ryegrass].LitterDepositionN*0.1) as DetachedAGN
                ([RedClover].Root.Detached.N+[Ryegrass].RootDetachedN*0.1) as DetachedBGN
                (10*([RedClover].Leaf.Detached.N+[RedClover].Petiole.Detached.N+[RedClover].Stem.Detached.N+[RedClover].Inflorescence.Detached.N+[RedClover].Taproot.Detached.N+[RedClover].Root.Detached.N)+[Ryegrass].LitterDepositionN+[Ryegrass].RootDetachedN) as DetachedTotalN
                10*[RedClover].Nodule.NFixed as FixedN
                (sum([Soil].SoilNitrogen.Urea.kgha) + sum([Soil].SoilNitrogen.NH4.kgha) + sum([Soil].SoilNitrogen.NO3.kgha)) as SoilNContent
                sum([Soil].SoilNitrogen.Urea.kgha) as SoilUrea
                sum([Soil].SoilNitrogen.NH4.kgha) as SoilNH4
                sum([Soil].SoilNitrogen.NO3.kgha) as SoilNO3
                (sum([Soil].SoilNitrogen.NH4.kgha[1:4])+sum([Soil].SoilNitrogen.NO3.kgha[1:4])) as TopSoilN
                [SurfaceOrganicMatter].N as TotalSurfOMN
                sum([Soil].SoilNitrogen.FOMN) as TotalFOMN
                sum([Soil].SoilNitrogen.HumicN) as TotalHumicN
                sum([Soil].SoilNitrogen.MicrobialN as TotalMicrobialN
                [DefoliationManager].Script.RotationHarvestedDM as RotationHarvestedWt
                [DefoliationManager].Script.PreHarvestDM
                [DefoliationManager].Script.PostHarvestDM
                [DefoliationManager].Script.DefoliatedN as NTakenOff
                [DefoliationManager].Script.HarvestedN
                (10*[DefoliationManager].Script.RemovedN) as Defoliate.Script.RemovedN
                [DefoliationManager].Script.DefoliatedWt as HarvestedWt
                ([DefoliationManager].Script.RemovedN/([DefoliationManager].Script.RemovedWt+0.000001) as RemovedNConc
                [ExtraVariables].Script.AccumHarvestedWt as CumulativeHarvestedWt
                [ExtraVariables].Script.AccumHarvestedN as CumulativeNTakenOff
                ([RedClover].Total.Wt+[Ryegrass].TotalWt*0.1) as TotalPlantWt
                ([RedClover].AboveGroundLive.Wt+[Ryegrass].AboveGroundLiveWt*0.1+[RedClover].BelowGround.Wt+[Ryegrass].BelowGroundWt*0.1) as TotalPlantLiveWt
                ([RedClover].AboveGround.Wt+[Ryegrass].AboveGroundWt*0.1) as AboveGroundWt
                ([RedClover].BelowGround.Wt+[Ryegrass].BelowGroundWt*0.1) as BelowGroundWt
                ([RedClover].Total.N+[Ryegrass].TotalN*0.1) as TotalPlantN
                ([RedClover].AboveGround.N+[Ryegrass].AboveGroundN*0.1) as AboveGroundN
                ([RedClover].BelowGround.N+[Ryegrass].BelowGroundN*0.1) as BelowGroundN
                (([RedClover].AboveGround.N+[Ryegrass].AboveGroundN*0.1)/([RedClover].AboveGround.Wt+[Ryegrass].AboveGroundWt*0.1+0.000001)) as AboveGroundNConc
                (([RedClover].BelowGround.N+[Ryegrass].BelowGroundN*0.1)/([RedClover].BelowGround.Wt+[Ryegrass].BelowGroundWt*0.1+0.000001)) as BelowGroundNConc
                ([RedClover].AboveGroundLive.Wt+[Ryegrass].AboveGroundLiveWt*0.1) as AboveGroundLiveWt
                ([RedClover].AboveGroundLive.N+[Ryegrass].AboveGroundLiveN*0.1) as AboveGroundDeadWt
                ([RedClover].BelowGround.Wt+[Ryegrass].BelowGroundWt*0.1) as BelowGroundLiveWt
                (([RedClover].AboveGroundLive.N+[Ryegrass].AboveGroundLiveN*0.1)/([RedClover].AboveGroundLive.Wt+[Ryegrass].AboveGroundLiveWt*0.1+0.000001)) as AboveGroundLiveNc
                [ExtraVariables].Script.HerbageNConc as HerbageNConc
                ([Ryegrass].TotalWt*0.1) as Ryegrass.Total.Wt
                ([Ryegrass].AboveGroundLiveWt*0.1+[Ryegrass].BelowGroundWt*0.1) as Ryegrass.TotalLive.Wt
                ([Ryegrass].AboveGroundWt*0.1) as Ryegrass.AboveGround.Wt
                ([Ryegrass].BelowGroundWt*0.1) as Ryegrass.BelowGround.Wt
                ([Ryegrass].AboveGroundLiveWt*0.1) as Ryegrass.AboveGroundLive.Wt
                ([Ryegrass].AboveGroundDeadWt*0.1) as Ryegrass.AboveGroundDead.Wt
                ([Ryegrass].BelowGroundWt*0.1) as Ryegrass.BelowGroundLive.Wt
                ([Ryegrass].TotalN*0.1) as Ryegrass.Total.N
                ([Ryegrass].AboveGroundN*0.1) as Ryegrass.AboveGround.N
                ([Ryegrass].BelowGroundN*0.1) as Ryegrass.BelowGround.N
                [Ryegrass].AboveGroundNConc as Ryegrass.AboveGround.NConc
                ([Ryegrass].BelowGroundN/([Ryegrass].BelowGroundWt+0.000001)) as Ryegrass.BelowGround.NConc
                ([Ryegrass].AboveGroundLiveN/([Ryegrass].AboveGroundLiveWt+0.000001)) as Ryegrass.AboveGroundLive.NConc
                [Ryegrass].StandingHerbageNConc as RyegrassHerbageNConc
                [RedClover].Total.Wt
                [RedClover].TotalLive.Wt
                [RedClover].AboveGround.Wt
                [RedClover].BelowGround.Wt
                [RedClover].AboveGroundLive.Wt
                [RedClover].AboveGroundDead.Wt
                [RedClover].BelowGroundLive.Wt
                [RedClover].Total.N
                [RedClover].AboveGround.N
                [RedClover].BelowGround.N
                [RedClover].AboveGround.NConc
                [RedClover].BelowGround.NConc
                [RedClover].AboveGroundLive.NConc
                (([RedClover].Leaf.N+[RedClover].Petiole.N+[RedClover].Inflorescence.N)/(([RedClover].Leaf.Wt+[RedClover].Petiole.Wt+[RedClover].Inflorescence.Wt+0.000001)) as RedCloverHerbageNConc
                ([RedClover].AboveGround.Wt/([RedClover].AboveGround.Wt+[Ryegrass].AboveGroundWt*0.1+0.000001)) as RedClover.BiomassFraction
                ([Ryegrass].AboveGroundWt*0.1/([RedClover].AboveGround.Wt+[Ryegrass].AboveGroundWt*0.1+0.000001)) as Ryegrass.BiomassFraction
                ([RedClover].AboveGround.N/([RedClover].AboveGround.N+[Ryegrass].AboveGroundN*0.1+0.000001)) as RedClover.NitrogenFraction
                ([Ryegrass].AboveGroundN*0.1/([RedClover].AboveGround.N+[Ryegrass].AboveGroundN*0.1+0.000001)) as Ryegrass.NitrogenFraction
                ([RedClover].Leaf.CoverTotal+[Ryegrass].CoverTotal) as CoverTotal
                ([RedClover].Leaf.CoverDead+[Ryegrass].CoverDead) as CoverDead
                [MicroClimate].CanopyCover
                ([RedClover].Leaf.LAI+[Ryegrass].LAIGreen) as LAIgreen
                ([RedClover].Leaf.LAIDead+[Ryegrass].LAIDead) as LAIdead
                (([RedClover].Leaf.Height+[Ryegrass].Height)/2) as AverageShootHeight
                (([RedClover].Root.Depth+[Ryegrass].RootDepth)/2) as AverageRootDepth
                ([RedClover].Root.LengthDensity+[Ryegrass].RootLengthDensity) as Total.RootLengthDensity
                [Ryegrass].CoverTotal
                [RedClover].Leaf.CoverTotal
                (0*[Ryegrass].TotalWt) as Ryegrass.Population
                [RedClover].Population
                [RedClover].Leaf.Height
                [Ryegrass].Height
                [RedClover].Root.Depth
                [Ryegrass].RootDepth
                [RedClover].Root.LengthDensity
                [Ryegrass].RootLengthDensity
                [RedClover].Leaf.LAI
                [Ryegrass].LAI
                [RedClover].Leaf.RadIntTot
                [Ryegrass].InterceptedRadn as Ryegrass.RadnIntTot
                [RedClover].Phenology.Stage
                [Ryegrass].Stage as Ryegrass.Phenology.Stage
                [RedClover].ShootRootRatio.Value()
                ([RedClover].AboveGroundLive.Wt/([RedClover].TotalLive.Wt+0.000001)) as RedClover.CurrentAboveGroundFraction
                ([Ryegrass].AboveGroundLiveWt/([Ryegrass].BelowGroundWt+0.000001)) as Ryegrass.ShootRootRatio
                ([Ryegrass].AboveGroundLiveWt/([Ryegrass].AboveGroundLiveWt+[Ryegrass].BelowGroundWt+0.000001)) as Ryegrass.CurrentAboveGroundFraction
                ([RedClover].Arbitrator.N.TotalPlantDemand+([Ryegrass].DemandAtLuxuryN)*0.1) as TotalPlantNDemand
                ([RedClover].Arbitrator.N.TotalPlantSupply+([Ryegrass].RemobilisableSenescedN+[Ryegrass].RemobilisableLuxuryN+[Ryegrass].SoilAvailableN)*0.1) as TotalPlantNSupply
                ([RedClover].Arbitrator.N.Allocated+([Ryegrass].RemobilisedSenescedN+[Ryegrass].RemobilisedLuxuryN+[Ryegrass].SoilUptakeN)*0.1) as TotalPlantNAllocated
                ([RedClover].Arbitrator.WDemand+[Ryegrass].WaterDemand) as TotalPlantWDemand
                ([RedClover].Arbitrator.WSupply+sum([Ryegrass].WaterAvailable)) as TotalPlantWSupply
                ([RedClover].Arbitrator.WAllocated+sum([Ryegrass].WaterUptake)) as TotalPlantWAllocated
                [Ryegrass].GrossPotentialGrowthWt as Ryegrass.Arbitrator.DM.TotalPlantDemand
                [Ryegrass].NetGrowthWt*0.1 as Ryegrass.Arbitrator.Arbitrator.DM.Allocated
                [Ryegrass].DemandAtLuxuryN*0.1 as Ryegrass.Arbitrator.N.TotalPlantDemand
                [Ryegrass].DemandAtOptimumN
                ([Ryegrass].RemobilisableSenescedN+[Ryegrass].RemobilisableLuxuryN+[Ryegrass].SoilAvailableN)*0.1 as Ryegrass.Arbitrator.N.TotalPlantSupply
                ([Ryegrass].RemobilisedSenescedN+[Ryegrass].RemobilisedLuxuryN+[Ryegrass].SoilUptakeN)*0.1 as Ryegrass.Arbitrator.N.Allocated
                [Ryegrass].SoilAvailableN
                [Ryegrass].SoilDemandN
                sum([Ryegrass].WaterAvailable) as Ryegrass.Arbitrator.WSupply
                [Ryegrass].WaterDemand as Ryegrass.Arbitrator.WDemand
                sum([Ryegrass].WaterUptake) as Ryegrass.Arbitrator.WAllocated
                [RedClover].Arbitrator.DM.TotalFixationSupply
                [RedClover].Arbitrator.DM.TotalPlantDemand
                [RedClover].Arbitrator.DM.Allocated
                [RedClover].Arbitrator.N.TotalPlantSupply
                [RedClover].Arbitrator.N.TotalPlantDemand
                [RedClover].Arbitrator.N.Allocated
                [RedClover].Arbitrator.WSupply
                [RedClover].Arbitrator.WDemand
                [RedClover].Arbitrator.WAllocated
                [RedClover].Nodule.NFixed*10 as RedClover.Nodule.NFixed
                [Ryegrass].GlfNSupply
                [Ryegrass].GlfWaterSupply
                [Ryegrass].GlfWaterLogging
                [Ryegrass].GlfNContent
                [Ryegrass].GlfCO2
                [Ryegrass].GlfTemperature
                [Ryegrass].GlfColdDamage
                [Ryegrass].GlfHeatDamage
                [RedClover].Leaf.Fw
                [RedClover].Leaf.Fn
                [RedClover].Leaf.FNmetabolic
                [RedClover].Leaf.Photosynthesis.FCO2
                [RedClover].Leaf.Photosynthesis.FN
                [RedClover].Leaf.Photosynthesis.FT
                [RedClover].Leaf.Photosynthesis.FW
                [RedClover].Leaf.Photosynthesis.FVPD
                [RedClover].Leaf.FRGR
      Experiment FoulumMix2
        Memo: same as Evaluation.Denmark.FoulumMix1.Memo
        Factors
          Factor NInputs: same as Evaluation.Denmark.FoulumMix1.Factors.NInputs
          Factor SpeciesMix: Specification=[Sowing]
            Operations LessChicory
              2013-05-06  [Chicory].Sow(population: 100, cultivar: "Puna", depth: 10, rowSpacing: 150)
              2013-05-06  [RedClover].Sow(population: 150, cultivar: "Rajah", depth: 5, rowSpacing: 150)
              2013-01-01  [Ryegrass].EndCrop()
              2013-05-31  [Ryegrass].Sow(population: 0, cultivar: "R", depth: 0, rowSpacing: 0)
            Operations MoreChicory
              2013-05-06  [Chicory].Sow(population: 300, cultivar: "Puna", depth: 10, rowSpacing: 150)
              2013-05-06  [RedClover].Sow(population: 75, cultivar: "Rajah", depth: 5, rowSpacing: 150)
              2013-01-01  [Ryegrass].EndCrop()
              2013-06-05  [Ryegrass].Sow(population: 0, cultivar: "R", depth: 0, rowSpacing: 0)
        Simulation FoulumMix2
          Clock: StartDate=2013-01-01; EndDate=2015-12-31
          Weather: FileName=Foulum.met
          Summary summaryfile
          SoilArbitrator Soil Arbitrator
          Zone Field: Area=1; Slope=0
            Folder Management
              Operations Sowing
              Operations BaseNApplication
                2013-05-03  [SurfaceOrganicMatter].Add(mass: 5114, N: 40.9, P: 0.0, type: "fym", name: "slurry")
                2013-05-03  [Fertiliser].Apply(Amount: 50, Type: Fertiliser.Types.NH4N, Depth: 5)
              Operations FertiliserSchedule
              Operations IrrigationSchedulle: same as Evaluation.Denmark.FoulumMix1.FoulumMix1.Field.Management.IrrigationSchedulle
              Manager DefoliationManager: same as Evaluation.NewZealand.FRNLRuakuraMix1.FRNLRuakuraMix1.Field.Management.DefoliationManager
              Operations DefoliationSchedule: same as Evaluation.Denmark.FoulumMix1.FoulumMix1.Field.Management.DefoliationSchedule
              Manager ExtraVariables
                script: same as in Evaluation.NewZealand.FRNLRuakuraMix1.FRNLRuakuraMix1.Field.Management.ExtraVariables
              Manager SettingUpParams
                setParamStartDate = 2018-06-01
                setParamHeight = 350
```csharp
// Set some plant parameters, for tests and development
// Following suggestions by Val Snow: Plant competition seem to be better done if heights are all the same (maybe due to some issue/feature of MicroClimate)

using System;
using Models.Core;
using System.Collections.Generic;
using System.Text;
using Models;
using Models.Soils;
using Models.PMF;
using System.Xml.Serialization;
using APSIM.Shared.Utilities;

namespace Models
{
	[Serializable]
	public class Script : Model
	{
		[Link] Clock Clock;
		[Link] Zone myZone;


		//User inputs from properties tab
		[Separator("Setting up some parameters of plants")]
		[Description(" Enter the date to set plant parameters (dd/mm/yyyy):")]
		public DateTime setParamStartDate { get; set; }
		[Description(" Enter the height to set all plants to (mm):")]
		public double setParamHeight { get; set; }


		//Internal variables
		private RemovalFractions removalFractions;

		[EventSubscribe("Commencing")]
		private void OnSimulationCommencing(object sender, EventArgs e)
		{
			// make sure that manager will work when startDate<simulationStartDay
			if (Clock.Today > setParamStartDate)
				setParamStartDate = Clock.Today;
		}

		[EventSubscribe("StartOfDay")]
		private void OnStartOfDay(object sender, EventArgs e)
		{
			// make sure that rotation start when startDate<simulationStartDay
			if (Clock.Today == setParamStartDate)
			{
			    double[] xVals = new double[] {0, 10};
			    double[] yVals = new double[] {setParamHeight, setParamHeight};
				myZone.Set("Chicory.Leaf.HeightFunction.XYPairs.X", xVals);
				myZone.Set("Chicory.Leaf.HeightFunction.XYPairs.Y", yVals);
				myZone.Set("RedClover.Leaf.HeightFunction.XYPairs.X", xVals);
				myZone.Set("RedClover.Leaf.HeightFunction.XYPairs.Y", yVals);
				myZone.Set("Ryegrass.PlantHeightMaximum", setParamHeight);
				myZone.Set("Ryegrass.PlantHeightMinimum", setParamHeight);
			}
		}
	}
}
```
            MicroClimate: a_interception=0; b_interception=1; c_interception=0; d_interception=0; soil_albedo=0.23; SoilHeatFluxFraction=0.4; NightInterceptionFraction=0.5; ReferenceHeight=2
            Irrigation
            Fertiliser
            SurfaceOrganicMatter: InitialResidueName=grass; InitialResidueType=grass; InitialResidueMass=1000; InitialStandingFraction=0; InitialCPR=0; InitialCNR=40; FractionFaecesAdded=0.5
            Soil: same as Evaluation.Denmark.FoulumMix1.FoulumMix1.Field.Soil
            Plant Chicory: CropType=Chicory; IsEnding=false; DaysAfterEnding=0
            PastureSpecies Ryegrass: same as Evaluation.Denmark.FoulumMix1.FoulumMix1.Field.Ryegrass
            Plant RedClover: CropType=RedClover; IsEnding=false; DaysAfterEnding=0
            Report: EventNames=[Clock].DoReport
              VariableNames:
                [Clock].Today as Date
                [Clock].Today.DayOfYear as DayOfYear
                [Weather].Radn as SolarRadiation
                [MicroClimate].NetRadiation
                ([Chicory].Leaf.RadIntTot+[RedClover].Leaf.RadIntTot+[Ryegrass].InterceptedRadn) as InterceptedRadiation
                [Weather].MeanT
                [Weather].Rain as Rainfall
                [Irrigation].IrrigationApplied as IrrigationApplied
                [MicroClimate].PrecipitationInterception as PrecipitationInterception
                [MicroClimate].PetTotal
                [Soil].SoilWater.Eo as Eo
                [Soil].SoilWater.Es as Evaporation
                ([Chicory].Leaf.Transpiration+[RedClover].Leaf.Transpiration+sum([Ryegrass].WaterUptake)) as Transpiration
                [Soil].SoilWater.pond as PondedWater
                [Soil].SoilWater.Drainage as Drainage
                [Soil].SoilWater.Runoff as Runoff
                sum([Soil].SoilWater.LateralOutflow) as LateralFlow
                sum([Soil].SoilWater.SWmm) as TotalSWC
                sum([Soil].DULmm) as TotalDUL
                sum([Soil].LL15mm) as TotalLL15
                [Soil].SoilWater.SW[1] as SWCTopLayer
                [Soil].DUL[1] as DULTopLayer
                [Fertiliser].NitrogenApplied as FertiliserN
                sum([Soil].SoilNitrogen.Denitrification) as DenitrifiedN
                ([Soil].SoilWater.LeachNH4 + [Soil].SoilWater.LeachNO3) as LeachedN
                (([Chicory].Root.NTakenUp++[RedClover].Root.NTakenUp)*10+[Ryegrass].SoilUptakeN) as UptakeN
                sum([Soil].SoilNitrogen.MineralisedN) as MineralisedSoilN
                sum([Soil].SoilNitrogen.dlt_n_min_res) as MineralisedSurfOMN
                ([Chicory].Leaf.Detached.N+[Chicory].Stem.Detached.N+[Chicory].Inflorescence.Detached.N+[RedClover].Leaf.Detached.N+[RedClover].Petiole.Detached.N+[RedClover].Stem.Detached.N+[RedClover].Inflorescence.Detached.N+[Ryegrass].LitterDepositionN*0.1) as DetachedAGN
                ([Chicory].Taproot.Detached.N+[Chicory].Root.Detached.N+[RedClover].Root.Detached.N+[Ryegrass].RootDetachedN*0.1) as DetachedBGN
                (10*([Chicory].Leaf.Detached.N+[Chicory].Stem.Detached.N+[Chicory].Inflorescence.Detached.N+[RedClover].Leaf.Detached.N+[RedClover].Petiole.Detached.N+[RedClover].Stem.Detached.N+[RedClover].Inflorescence.Detached.N+[Chicory].Taproot.Detached.N+[Chicory].Root.Detached.N+[RedClover].Taproot.Detached.N+[RedClover].Root.Detached.N)+[Ryegrass].LitterDepositionN+[Ryegrass].RootDetachedN) as DetachedTotalN
                10*[RedClover].Nodule.NFixed as FixedN
                (sum([Soil].SoilNitrogen.Urea.kgha) + sum([Soil].SoilNitrogen.NH4.kgha) + sum([Soil].SoilNitrogen.NO3.kgha)) as SoilNContent
                sum([Soil].SoilNitrogen.Urea.kgha) as SoilUrea
                sum([Soil].SoilNitrogen.NH4.kgha) as SoilNH4
                sum([Soil].SoilNitrogen.NO3.kgha) as SoilNO3
                (sum([Soil].SoilNitrogen.NH4.kgha[1:4])+sum([Soil].SoilNitrogen.NO3.kgha[1:4])) as TopSoilN
                [SurfaceOrganicMatter].N as TotalSurfOMN
                sum([Soil].SoilNitrogen.FOMN) as TotalFOMN
                sum([Soil].SoilNitrogen.HumicN) as TotalHumicN
                sum([Soil].SoilNitrogen.MicrobialN as TotalMicrobialN
                [DefoliationManager].Script.RotationHarvestedDM as RotationHarvestedWt
                [DefoliationManager].Script.PreHarvestDM
                [DefoliationManager].Script.PostHarvestDM
                [DefoliationManager].Script.DefoliatedN as NTakenOff
                [DefoliationManager].Script.HarvestedN
                (10*[DefoliationManager].Script.RemovedN) as Defoliate.Script.RemovedN
                [DefoliationManager].Script.DefoliatedWt as HarvestedWt
                ([DefoliationManager].Script.RemovedN/([DefoliationManager].Script.RemovedWt+0.000001) as RemovedNConc
                [ExtraVariables].Script.AccumHarvestedWt as CumulativeHarvestedWt
                [ExtraVariables].Script.AccumHarvestedN as CumulativeNTakenOff
                ([Chicory].Total.Wt+[RedClover].Total.Wt+[Ryegrass].TotalWt*0.1) as TotalPlantWt
                ([Chicory].AboveGroundLive.Wt+[RedClover].AboveGroundLive.Wt+[Ryegrass].AboveGroundLiveWt*0.1+[Chicory].BelowGround.Wt+[RedClover].BelowGround.Wt+[Ryegrass].BelowGroundWt*0.1) as TotalPlantLiveWt
                ([Chicory].AboveGround.Wt+[RedClover].AboveGround.Wt+[Ryegrass].AboveGroundWt*0.1) as AboveGroundWt
                ([Chicory].BelowGround.Wt+[RedClover].BelowGround.Wt+[Ryegrass].BelowGroundWt*0.1) as BelowGroundWt
                ([Chicory].Total.N+[RedClover].Total.N+[Ryegrass].TotalN*0.1) as TotalPlantN
                ([Chicory].AboveGround.N++[RedClover].AboveGround.N+[Ryegrass].AboveGroundN*0.1) as AboveGroundN
                ([Chicory].BelowGround.N+[RedClover].BelowGround.N+[Ryegrass].BelowGroundN*0.1) as BelowGroundN
                (([Chicory].AboveGround.N+[RedClover].AboveGround.N+[Ryegrass].AboveGroundN*0.1)/([Chicory].AboveGround.Wt+[RedClover].AboveGround.Wt+[Ryegrass].AboveGroundWt*0.1+0.000001)) as AboveGroundNConc
                (([Chicory].BelowGround.N+[RedClover].BelowGround.N+[Ryegrass].BelowGroundN*0.1)/([Chicory].BelowGround.Wt+[RedClover].BelowGround.Wt+[Ryegrass].BelowGroundWt*0.1+0.000001)) as BelowGroundNConc
                ([Chicory].AboveGroundLive.Wt+[RedClover].AboveGroundLive.Wt+[Ryegrass].AboveGroundLiveWt*0.1) as AboveGroundLiveWt
                ([Chicory].AboveGroundLive.N+[RedClover].AboveGroundLive.N+[Ryegrass].AboveGroundLiveN*0.1) as AboveGroundDeadWt
                ([Chicory].BelowGround.Wt+[RedClover].BelowGround.Wt+[Ryegrass].BelowGroundWt*0.1) as BelowGroundLiveWt
                (([Chicory].AboveGroundLive.N+[RedClover].AboveGroundLive.N+[Ryegrass].AboveGroundLiveN*0.1)/([Chicory].AboveGroundLive.Wt+[RedClover].AboveGroundLive.Wt+[Ryegrass].AboveGroundLiveWt*0.1+0.000001)) as AboveGroundLiveNc
                [ExtraVariables].Script.HerbageNConc as HerbageNConc
                [Chicory].Total.Wt
                ([Chicory].AboveGroundLive.Wt+[Chicory].BelowGroundLive.Wt) as Chicory.TotalLive.Wt
                [Chicory].AboveGround.Wt
                [Chicory].BelowGround.Wt
                [Chicory].AboveGroundLive.Wt
                ([Chicory].AboveGround.Wt-[Chicory].AboveGroundLive.Wt) as Chicory.AboveGroundDead.Wt
                [Chicory].BelowGroundLive.Wt
                [Chicory].Total.N
                [Chicory].AboveGround.N
                [Chicory].BelowGround.N
                [Chicory].AboveGround.NConc
                [Chicory].BelowGround.NConc
                [Chicory].AboveGroundLive.NConc
                (([Chicory].Leaf.N+[Chicory].Stem.N+[Chicory].Inflorescence.N)/(([Chicory].Leaf.Wt+[Chicory].Stem.Wt+[Chicory].Inflorescence.Wt+0.000001)) as ChicoryHerbageNConc
                ([Ryegrass].TotalWt*0.1) as Ryegrass.Total.Wt
                ([Ryegrass].AboveGroundLiveWt*0.1+[Ryegrass].BelowGroundWt*0.1) as Ryegrass.TotalLive.Wt
                ([Ryegrass].AboveGroundWt*0.1) as Ryegrass.AboveGround.Wt
                ([Ryegrass].BelowGroundWt*0.1) as Ryegrass.BelowGround.Wt
                ([Ryegrass].AboveGroundLiveWt*0.1) as Ryegrass.AboveGroundLive.Wt
                ([Ryegrass].AboveGroundDeadWt*0.1) as Ryegrass.AboveGroundDead.Wt
                ([Ryegrass].BelowGroundWt*0.1) as Ryegrass.BelowGroundLive.Wt
                ([Ryegrass].TotalN*0.1) as Ryegrass.Total.N
                ([Ryegrass].AboveGroundN*0.1) as Ryegrass.AboveGround.N
                ([Ryegrass].BelowGroundN*0.1) as Ryegrass.BelowGround.N
                [Ryegrass].AboveGroundNConc as Ryegrass.AboveGround.NConc
                ([Ryegrass].BelowGroundN/([Ryegrass].BelowGroundWt+0.000001)) as Ryegrass.BelowGround.NConc
                ([Ryegrass].AboveGroundLiveN/([Ryegrass].AboveGroundLiveWt+0.000001)) as Ryegrass.AboveGroundLive.NConc
                [Ryegrass].StandingHerbageNConc as RyegrassHerbageNConc
                [RedClover].Total.Wt
                [RedClover].TotalLive.Wt
                [RedClover].AboveGround.Wt
                [RedClover].BelowGround.Wt
                [RedClover].AboveGroundLive.Wt
                [RedClover].AboveGroundDead.Wt
                [RedClover].BelowGroundLive.Wt
                [RedClover].Total.N
                [RedClover].AboveGround.N
                [RedClover].BelowGround.N
                [RedClover].AboveGround.NConc
                [RedClover].BelowGround.NConc
                [RedClover].AboveGroundLive.NConc
                (([RedClover].Leaf.N+[RedClover].Petiole.N+[RedClover].Inflorescence.N)/(([RedClover].Leaf.Wt+[RedClover].Petiole.Wt+[RedClover].Inflorescence.Wt+0.000001)) as RedCloverHerbageNConc
                ([Chicory].AboveGround.Wt/([Chicory].AboveGround.Wt+[RedClover].AboveGround.Wt+[Ryegrass].AboveGroundWt*0.1+0.000001)) as Chicory.BiomassFraction
                ([RedClover].AboveGround.Wt/([Chicory].AboveGround.Wt+[RedClover].AboveGround.Wt+[Ryegrass].AboveGroundWt*0.1+0.000001)) as RedClover.BiomassFraction
                ([Ryegrass].AboveGroundWt*0.1/([Chicory].AboveGround.Wt+[RedClover].AboveGround.Wt+[Ryegrass].AboveGroundWt*0.1+0.000001)) as Ryegrass.BiomassFraction
                ([Chicory].AboveGround.N/([Chicory].AboveGround.N+[RedClover].AboveGround.N+[Ryegrass].AboveGroundN*0.1+0.000001)) as Chicory.NitrogenFraction
                ([RedClover].AboveGround.N/([Chicory].AboveGround.N+[RedClover].AboveGround.N+[Ryegrass].AboveGroundN*0.1+0.000001)) as RedClover.NitrogenFraction
                ([Ryegrass].AboveGroundN*0.1/([Chicory].AboveGround.N+[RedClover].AboveGround.N+[Ryegrass].AboveGroundN*0.1+0.000001)) as Ryegrass.NitrogenFraction
                ([Chicory].Leaf.CoverTotal+[RedClover].Leaf.CoverTotal+[Ryegrass].CoverTotal) as CoverTotal
                ([Chicory].Leaf.CoverDead+[RedClover].Leaf.CoverDead+[Ryegrass].CoverDead) as CoverDead
                [MicroClimate].CanopyCover
                ([Chicory].Leaf.LAI+[RedClover].Leaf.LAI+[Ryegrass].LAIGreen) as LAIgreen
                ([Chicory].Leaf.LAIDead+[RedClover].Leaf.LAIDead+[Ryegrass].LAIDead) as LAIdead
                (([Chicory].Leaf.Height+[RedClover].Leaf.Height+[Ryegrass].Height)/3) as AverageShootHeight
                (([Chicory].Root.Depth+[RedClover].Root.Depth+[Ryegrass].RootDepth)/3) as AverageRootDepth
                ([Chicory].Root.LengthDensity+[RedClover].Root.LengthDensity+[Ryegrass].RootLengthDensity) as Total.RootLengthDensity
                [Chicory].Leaf.CoverTotal
                [Ryegrass].CoverTotal
                [RedClover].Leaf.CoverTotal
                [Chicory].Population
                (0*[Ryegrass].TotalWt) as Ryegrass.Population
                [RedClover].Population
                [Chicory].Leaf.Height
                [RedClover].Leaf.Height
                [Ryegrass].Height
                [Chicory].Root.Depth
                [RedClover].Root.Depth
                [Ryegrass].RootDepth
                [Chicory].Root.LengthDensity
                [RedClover].Root.LengthDensity
                [Ryegrass].RootLengthDensity
                [Chicory].Leaf.LAI
                [RedClover].Leaf.LAI
                [Ryegrass].LAI
                [Chicory].Leaf.RadIntTot
                [RedClover].Leaf.RadIntTot
                [Ryegrass].InterceptedRadn as Ryegrass.RadnIntTot
                [Chicory].Phenology.Stage
                [RedClover].Phenology.Stage
                [Ryegrass].Stage as Ryegrass.Phenology.Stage
                [Chicory].ShootRootRatio
                ([Chicory].AboveGroundLive.Wt/([Chicory].AboveGroundLive.Wt+[Chicory].BelowGround.Wt+0.000001)) as Chicory.CurrentAboveGroundFraction
                [RedClover].ShootRootRatio.Value()
                ([RedClover].AboveGroundLive.Wt/([RedClover].TotalLive.Wt+0.000001)) as RedClover.CurrentAboveGroundFraction
                ([Ryegrass].AboveGroundLiveWt/([Ryegrass].BelowGroundWt+0.000001)) as Ryegrass.ShootRootRatio
                ([Ryegrass].AboveGroundLiveWt/([Ryegrass].AboveGroundLiveWt+[Ryegrass].BelowGroundWt+0.000001)) as Ryegrass.CurrentAboveGroundFraction
                ([Chicory].Arbitrator.N.TotalPlantDemand+[RedClover].Arbitrator.N.TotalPlantDemand+([Ryegrass].DemandAtLuxuryN)*0.1) as TotalPlantNDemand
                ([Chicory].Arbitrator.N.TotalPlantSupply+[RedClover].Arbitrator.N.TotalPlantSupply+([Ryegrass].RemobilisableSenescedN+[Ryegrass].RemobilisableLuxuryN+[Ryegrass].SoilAvailableN)*0.1) as TotalPlantNSupply
                ([Chicory].Arbitrator.N.Allocated+[RedClover].Arbitrator.N.Allocated+([Ryegrass].RemobilisedSenescedN+[Ryegrass].RemobilisedLuxuryN+[Ryegrass].SoilUptakeN)*0.1) as TotalPlantNAllocated
                ([Chicory].Arbitrator.WDemand+[RedClover].Arbitrator.WDemand+[Ryegrass].WaterDemand) as TotalPlantWDemand
                ([Chicory].Arbitrator.WSupply+[RedClover].Arbitrator.WSupply+sum([Ryegrass].WaterAvailable)) as TotalPlantWSupply
                ([Chicory].Arbitrator.WAllocated+[RedClover].Arbitrator.WAllocated+sum([Ryegrass].WaterUptake)) as TotalPlantWAllocated
                [Chicory].Arbitrator.DM.TotalFixationSupply
                [Chicory].Arbitrator.DM.TotalPlantDemand
                [Chicory].Arbitrator.DM.Allocated
                [Chicory].Arbitrator.N.TotalPlantSupply
                [Chicory].Arbitrator.N.TotalPlantDemand
                [Chicory].Arbitrator.N.Allocated
                [Chicory].Arbitrator.WSupply
                [Chicory].Arbitrator.WDemand
                [Chicory].Arbitrator.WAllocated
                [Ryegrass].GrossPotentialGrowthWt as Ryegrass.Arbitrator.DM.TotalPlantDemand
                [Ryegrass].NetGrowthWt*0.1 as Ryegrass.Arbitrator.Arbitrator.DM.Allocated
                [Ryegrass].DemandAtLuxuryN*0.1 as Ryegrass.Arbitrator.N.TotalPlantDemand
                [Ryegrass].DemandAtOptimumN
                ([Ryegrass].RemobilisableSenescedN+[Ryegrass].RemobilisableLuxuryN+[Ryegrass].SoilAvailableN)*0.1 as Ryegrass.Arbitrator.N.TotalPlantSupply
                ([Ryegrass].RemobilisedSenescedN+[Ryegrass].RemobilisedLuxuryN+[Ryegrass].SoilUptakeN)*0.1 as Ryegrass.Arbitrator.N.Allocated
                [Ryegrass].SoilAvailableN
                [Ryegrass].SoilDemandN
                sum([Ryegrass].WaterAvailable) as Ryegrass.Arbitrator.WSupply
                [Ryegrass].WaterDemand as Ryegrass.Arbitrator.WDemand
                sum([Ryegrass].WaterUptake) as Ryegrass.Arbitrator.WAllocated
                [RedClover].Arbitrator.DM.TotalFixationSupply
                [RedClover].Arbitrator.DM.TotalPlantDemand
                [RedClover].Arbitrator.DM.Allocated
                [RedClover].Arbitrator.N.TotalPlantSupply
                [RedClover].Arbitrator.N.TotalPlantDemand
                [RedClover].Arbitrator.N.Allocated
                [RedClover].Arbitrator.WSupply
                [RedClover].Arbitrator.WDemand
                [RedClover].Arbitrator.WAllocated
                [RedClover].Nodule.NFixed*10 as RedClover.Nodule.NFixed
                [Chicory].Leaf.Fw
                [Chicory].Leaf.Fn
                [Chicory].Leaf.FNmetabolic
                [Chicory].Leaf.Photosynthesis.FCO2
                [Chicory].Leaf.Photosynthesis.FN
                [Chicory].Leaf.Photosynthesis.FT
                [Chicory].Leaf.Photosynthesis.FW
                [Chicory].Leaf.Photosynthesis.FVPD
                [Chicory].Leaf.FRGR
                [Ryegrass].GlfNSupply
                [Ryegrass].GlfWaterSupply
                [Ryegrass].GlfWaterLogging
                [Ryegrass].GlfNContent
                [Ryegrass].GlfCO2
                [Ryegrass].GlfTemperature
                [Ryegrass].GlfColdDamage
                [Ryegrass].GlfHeatDamage
                [RedClover].Leaf.Fw
                [RedClover].Leaf.Fn
                [RedClover].Leaf.FNmetabolic
                [RedClover].Leaf.Photosynthesis.FCO2
                [RedClover].Leaf.Photosynthesis.FN
                [RedClover].Leaf.Photosynthesis.FT
                [RedClover].Leaf.Photosynthesis.FW
                [RedClover].Leaf.Photosynthesis.FVPD
                [RedClover].Leaf.FRGR
      Experiment FoulumMix3
        Memo
          ###Foulum species competition###

          This simulation setup was based on field trials performed at the the Foulumgaard Experimental Station, Aarhus University, Denmark, between 2013 and 2015.  The trial was part of an experiment studying species competition in multi-species sward in a dairy organic farming context.  This comprises the stablishement of plots sown with various species in monoculture and in a few combinations, either varying the number and type of species or the relative sowing rate.  The plots received either no N fertiliser or a nominal annual rate of 250 kgN/ha applied as cattle slurry.  Details of the site and trial can be found in publications ([CongEtAl2017]; [CongAndEriksen2018]; and [CongEtAl2018]).  Here only a selection of plots with mixed pasture species are used, these involved ryegrass, red clover, chicory and ribwort plantain (weeds also occured, but are not included in the simulation - the fraction of biomass was fairly small).  In these plots ryegrass and red clover were sown in equal proportion with either chicory or plantain; the proportion of forbs was set to either 20% or 60% of the sown population (thus ryerass and clover populations were, respectively, at 40% or 20% each).  Each treatment combining sowing rate and N inputs had three replicates.  Measurements comprised total yield and respective values for each species.
          Observed data supplied by Wen Feng Cong and Jorgen Eriksen, Aarhus University.

          The soil at the experimental site was a loamy sand (a Typic Hapludult on the USDA classification), the parameters required were derived from data published and slighlty adjusted with measurements done at the experimental site ([JacobsenFoulum1989]; [HeidmannFoulum1989]).
          Weather data was obtained from nearby weather station (Arhus University).
          Simulation of ryegrass is done using the AgPasture model as the PMF version is still under development.
        Factors
          Factor NInputs: same as Evaluation.Denmark.FoulumMix1.Factors.NInputs
          Factor SpeciesMix: Specification=[Sowing]
            Operations LessPlantain
              2013-05-06  [Plantain].Sow(population: 100, cultivar: "Tonic", depth: 10, rowSpacing: 150)
              2013-05-06  [RedClover].Sow(population: 150, cultivar: "Rajah", depth: 5, rowSpacing: 150)
              2013-01-01  [Ryegrass].EndCrop()
              2013-05-31  [Ryegrass].Sow(population: 0, cultivar: "R", depth: 0, rowSpacing: 0)
            Operations MorePlantain
              2013-05-06  [Plantain].Sow(population: 300, cultivar: "Tonic", depth: 10, rowSpacing: 150)
              2013-05-06  [RedClover].Sow(population: 75, cultivar: "Rajah", depth: 5, rowSpacing: 150)
              2013-01-01  [Ryegrass].EndCrop()
              2013-06-05  [Ryegrass].Sow(population: 0, cultivar: "R", depth: 0, rowSpacing: 0)
        Simulation FoulumMix3
          Clock: StartDate=2013-01-01; EndDate=2015-12-31
          Weather: FileName=Foulum.met
          Summary summaryfile
          SoilArbitrator Soil Arbitrator
          Zone Field: Area=1; Slope=0
            Folder Management
              Operations Sowing
              Operations BaseNApplication
                2013-05-03  [SurfaceOrganicMatter].Add(mass: 5114, N: 40.9, P: 0.0, type: "fym", name: "slurry")
                2013-05-03  [Fertiliser].Apply(Amount: 50, Type: Fertiliser.Types.NH4N, Depth: 5)
              Operations FertiliserSchedule
              Operations IrrigationSchedulle: same as Evaluation.Denmark.FoulumMix1.FoulumMix1.Field.Management.IrrigationSchedulle
              Manager DefoliationManager: same as Evaluation.NewZealand.FRNLRuakuraMix1.FRNLRuakuraMix1.Field.Management.DefoliationManager
              Operations DefoliationSchedule: same as Evaluation.Denmark.FoulumMix1.FoulumMix1.Field.Management.DefoliationSchedule
              Manager ExtraVariables
                script: same as in Evaluation.NewZealand.FRNLRuakuraMix1.FRNLRuakuraMix1.Field.Management.ExtraVariables
              Manager SettingUpParams
                setParamStartDate = 2018-06-01
                setParamHeight = 350
```csharp
// Set some plant parameters, for tests and development
// Following suggestions by Val Snow: Plant competition seem to be better done if heights are all the same (maybe due to some issue/feature of MicroClimate)

using System;
using Models.Core;
using System.Collections.Generic;
using System.Text;
using Models;
using Models.Soils;
using Models.PMF;
using System.Xml.Serialization;
using APSIM.Shared.Utilities;

namespace Models
{
	[Serializable]
	public class Script : Model
	{
		[Link] Clock Clock;
		[Link] Zone myZone;


		//User inputs from properties tab
		[Separator("Setting up some parameters of plants")]
		[Description(" Enter the date to set plant parameters (dd/mm/yyyy):")]
		public DateTime setParamStartDate { get; set; }
		[Description(" Enter the height to set all plants to (mm):")]
		public double setParamHeight { get; set; }


		//Internal variables
		private RemovalFractions removalFractions;

		[EventSubscribe("Commencing")]
		private void OnSimulationCommencing(object sender, EventArgs e)
		{
			// make sure that manager will work when startDate<simulationStartDay
			if (Clock.Today > setParamStartDate)
				setParamStartDate = Clock.Today;
		}

		[EventSubscribe("StartOfDay")]
		private void OnStartOfDay(object sender, EventArgs e)
		{
			// make sure that rotation start when startDate<simulationStartDay
			if (Clock.Today == setParamStartDate)
			{
			    double[] xVals = new double[] {0, 10};
			    double[] yVals = new double[] {setParamHeight, setParamHeight};
				myZone.Set("Plantain.Leaf.HeightFunction.XYPairs.X", xVals);
				myZone.Set("Plantain.Leaf.HeightFunction.XYPairs.Y", yVals);
				myZone.Set("RedClover.Leaf.HeightFunction.XYPairs.X", xVals);
				myZone.Set("RedClover.Leaf.HeightFunction.XYPairs.Y", yVals);
				myZone.Set("Ryegrass.PlantHeightMaximum", setParamHeight);
				myZone.Set("Ryegrass.PlantHeightMinimum", setParamHeight);
			}
		}
	}
}
```
            MicroClimate: a_interception=0; b_interception=1; c_interception=0; d_interception=0; soil_albedo=0.23; SoilHeatFluxFraction=0.4; NightInterceptionFraction=0.5; ReferenceHeight=2
            Irrigation
            Fertiliser
            SurfaceOrganicMatter: InitialResidueName=grass; InitialResidueType=grass; InitialResidueMass=1000; InitialStandingFraction=0; InitialCPR=0; InitialCNR=40; FractionFaecesAdded=0.5
            Soil: same as Evaluation.Denmark.FoulumMix1.FoulumMix1.Field.Soil
            Plant Plantain: CropType=Plantain; IsEnding=false; DaysAfterEnding=0
            PastureSpecies Ryegrass: same as Evaluation.Denmark.FoulumMix1.FoulumMix1.Field.Ryegrass
            Plant RedClover: CropType=RedClover; IsEnding=false; DaysAfterEnding=0
            Report: EventNames=[Clock].DoReport
              VariableNames:
                [Clock].Today as Date
                [Clock].Today.DayOfYear as DayOfYear
                [Weather].Radn as SolarRadiation
                [MicroClimate].NetRadiation
                ([Plantain].Leaf.RadIntTot+[RedClover].Leaf.RadIntTot+[Ryegrass].InterceptedRadn) as InterceptedRadiation
                [Weather].MeanT
                [Weather].Rain as Rainfall
                [Irrigation].IrrigationApplied as IrrigationApplied
                [MicroClimate].PrecipitationInterception as PrecipitationInterception
                [MicroClimate].PetTotal
                [Soil].SoilWater.Eo as Eo
                [Soil].SoilWater.Es as Evaporation
                ([Plantain].Leaf.Transpiration+[RedClover].Leaf.Transpiration+sum([Ryegrass].WaterUptake)) as Transpiration
                [Soil].SoilWater.pond as PondedWater
                [Soil].SoilWater.Drainage as Drainage
                [Soil].SoilWater.Runoff as Runoff
                sum([Soil].SoilWater.LateralOutflow) as LateralFlow
                sum([Soil].SoilWater.SWmm) as TotalSWC
                sum([Soil].DULmm) as TotalDUL
                sum([Soil].LL15mm) as TotalLL15
                [Soil].SoilWater.SW[1] as SWCTopLayer
                [Soil].DUL[1] as DULTopLayer
                [Fertiliser].NitrogenApplied as FertiliserN
                sum([Soil].SoilNitrogen.Denitrification) as DenitrifiedN
                ([Soil].SoilWater.LeachNH4 + [Soil].SoilWater.LeachNO3) as LeachedN
                (([Plantain].Root.NTakenUp+[RedClover].Root.NTakenUp)*10+[Ryegrass].SoilUptakeN) as UptakeN
                sum([Soil].SoilNitrogen.MineralisedN) as MineralisedSoilN
                sum([Soil].SoilNitrogen.dlt_n_min_res) as MineralisedSurfOMN
                ([Plantain].Leaf.Detached.N+[Plantain].Stem.Detached.N+[Plantain].Inflorescence.Detached.N+[RedClover].Leaf.Detached.N+[RedClover].Petiole.Detached.N+[RedClover].Stem.Detached.N+[RedClover].Inflorescence.Detached.N+[Ryegrass].LitterDepositionN*0.1) as DetachedAGN
                ([Plantain].Taproot.Detached.N+[Plantain].Root.Detached.N+[RedClover].Taproot.Detached.N+[RedClover].Root.Detached.N+[Ryegrass].RootDetachedN*0.1) as DetachedBGN
                (10*([Plantain].Leaf.Detached.N+[Plantain].Stem.Detached.N+[Plantain].Inflorescence.Detached.N+[RedClover].Leaf.Detached.N+[RedClover].Petiole.Detached.N+[RedClover].Stem.Detached.N+[RedClover].Inflorescence.Detached.N+[Plantain].Taproot.Detached.N+[Plantain].Root.Detached.N+[RedClover].Taproot.Detached.N+[RedClover].Root.Detached.N)+[Ryegrass].LitterDepositionN+[Ryegrass].RootDetachedN) as DetachedTotalN
                10*[RedClover].Nodule.NFixed as FixedN
                (sum([Soil].SoilNitrogen.Urea.kgha) + sum([Soil].SoilNitrogen.NH4.kgha) + sum([Soil].SoilNitrogen.NO3.kgha)) as SoilNContent
                sum([Soil].SoilNitrogen.Urea.kgha) as SoilUrea
                sum([Soil].SoilNitrogen.NH4.kgha) as SoilNH4
                sum([Soil].SoilNitrogen.NO3.kgha) as SoilNO3
                (sum([Soil].SoilNitrogen.NH4.kgha[1:4])+sum([Soil].SoilNitrogen.NO3.kgha[1:4])) as TopSoilN
                [SurfaceOrganicMatter].N as TotalSurfOMN
                sum([Soil].SoilNitrogen.FOMN) as TotalFOMN
                sum([Soil].SoilNitrogen.HumicN) as TotalHumicN
                sum([Soil].SoilNitrogen.MicrobialN as TotalMicrobialN
                [DefoliationManager].Script.RotationHarvestedDM as RotationHarvestedWt
                [DefoliationManager].Script.PreHarvestDM
                [DefoliationManager].Script.PostHarvestDM
                [DefoliationManager].Script.DefoliatedN as NTakenOff
                [DefoliationManager].Script.HarvestedN
                (10*[DefoliationManager].Script.RemovedN) as Defoliate.Script.RemovedN
                [DefoliationManager].Script.DefoliatedWt as HarvestedWt
                ([DefoliationManager].Script.RemovedN/([DefoliationManager].Script.RemovedWt+0.000001) as RemovedNConc
                [ExtraVariables].Script.AccumHarvestedWt as CumulativeHarvestedWt
                [ExtraVariables].Script.AccumHarvestedN as CumulativeNTakenOff
                ([Plantain].Total.Wt+[RedClover].Total.Wt+[Ryegrass].TotalWt*0.1) as TotalPlantWt
                ([Plantain].AboveGroundLive.Wt+[RedClover].AboveGroundLive.Wt+[Ryegrass].AboveGroundLiveWt*0.1+[Plantain].BelowGround.Wt+[RedClover].BelowGround.Wt+[Ryegrass].BelowGroundWt*0.1) as TotalPlantLiveWt
                ([Plantain].AboveGround.Wt+[RedClover].AboveGround.Wt+[Ryegrass].AboveGroundWt*0.1) as AboveGroundWt
                ([Plantain].BelowGround.Wt+[RedClover].BelowGround.Wt+[Ryegrass].BelowGroundWt*0.1) as BelowGroundWt
                ([Plantain].Total.N+[RedClover].Total.N+[Ryegrass].TotalN*0.1) as TotalPlantN
                ([Plantain].AboveGround.N+[RedClover].AboveGround.N+[Ryegrass].AboveGroundN*0.1) as AboveGroundN
                ([Plantain].BelowGround.N+[RedClover].BelowGround.N+[Ryegrass].BelowGroundN*0.1) as BelowGroundN
                (([Plantain].AboveGround.N+[RedClover].AboveGround.N+[Ryegrass].AboveGroundN*0.1)/([Plantain].AboveGround.Wt+[RedClover].AboveGround.Wt+[Ryegrass].AboveGroundWt*0.1+0.000001)) as AboveGroundNConc
                (([Plantain].BelowGround.N+[RedClover].BelowGround.N+[Ryegrass].BelowGroundN*0.1)/([Plantain].BelowGround.Wt+[RedClover].BelowGround.Wt+[Ryegrass].BelowGroundWt*0.1+0.000001)) as BelowGroundNConc
                ([Plantain].AboveGroundLive.Wt+[RedClover].AboveGroundLive.Wt+[Ryegrass].AboveGroundLiveWt*0.1) as AboveGroundLiveWt
                ([Plantain].AboveGroundLive.N+[RedClover].AboveGroundLive.N+[Ryegrass].AboveGroundLiveN*0.1) as AboveGroundDeadWt
                ([Plantain].BelowGround.Wt+[RedClover].BelowGround.Wt+[Ryegrass].BelowGroundWt*0.1) as BelowGroundLiveWt
                (([Plantain].AboveGroundLive.N+[RedClover].AboveGroundLive.N+[Ryegrass].AboveGroundLiveN*0.1)/([Plantain].AboveGroundLive.Wt+[RedClover].AboveGroundLive.Wt+[Ryegrass].AboveGroundLiveWt*0.1+0.000001)) as AboveGroundLiveNc
                [ExtraVariables].Script.HerbageNConc as HerbageNConc
                [Plantain].Total.Wt
                ([Plantain].AboveGroundLive.Wt+[Plantain].BelowGroundLive.Wt) as Plantain.TotalLive.Wt
                [Plantain].AboveGround.Wt
                [Plantain].BelowGround.Wt
                [Plantain].AboveGroundLive.Wt
                ([Plantain].AboveGround.Wt-[Plantain].AboveGroundLive.Wt) as Plantain.AboveGroundDead.Wt
                [Plantain].BelowGroundLive.Wt
                [Plantain].Total.N
                [Plantain].AboveGround.N
                [Plantain].BelowGround.N
                [Plantain].AboveGround.NConc
                [Plantain].BelowGround.NConc
                [Plantain].AboveGroundLive.NConc
                (([Plantain].Leaf.N+[Plantain].Stem.N+[Plantain].Inflorescence.N)/(([Plantain].Leaf.Wt+[Plantain].Stem.Wt+[Plantain].Inflorescence.Wt+0.000001)) as PlantainHerbageNConc
                ([Ryegrass].TotalWt*0.1) as Ryegrass.Total.Wt
                ([Ryegrass].AboveGroundLiveWt*0.1+[Ryegrass].BelowGroundWt*0.1) as Ryegrass.TotalLive.Wt
                ([Ryegrass].AboveGroundWt*0.1) as Ryegrass.AboveGround.Wt
                ([Ryegrass].BelowGroundWt*0.1) as Ryegrass.BelowGround.Wt
                ([Ryegrass].AboveGroundLiveWt*0.1) as Ryegrass.AboveGroundLive.Wt
                ([Ryegrass].AboveGroundDeadWt*0.1) as Ryegrass.AboveGroundDead.Wt
                ([Ryegrass].BelowGroundWt*0.1) as Ryegrass.BelowGroundLive.Wt
                ([Ryegrass].TotalN*0.1) as Ryegrass.Total.N
                ([Ryegrass].AboveGroundN*0.1) as Ryegrass.AboveGround.N
                ([Ryegrass].BelowGroundN*0.1) as Ryegrass.BelowGround.N
                [Ryegrass].AboveGroundNConc as Ryegrass.AboveGround.NConc
                ([Ryegrass].BelowGroundN/([Ryegrass].BelowGroundWt+0.000001)) as Ryegrass.BelowGround.NConc
                ([Ryegrass].AboveGroundLiveN/([Ryegrass].AboveGroundLiveWt+0.000001)) as Ryegrass.AboveGroundLive.NConc
                [Ryegrass].StandingHerbageNConc as RyegrassHerbageNConc
                [RedClover].Total.Wt
                [RedClover].TotalLive.Wt
                [RedClover].AboveGround.Wt
                [RedClover].BelowGround.Wt
                [RedClover].AboveGroundLive.Wt
                [RedClover].AboveGroundDead.Wt
                [RedClover].BelowGroundLive.Wt
                [RedClover].Total.N
                [RedClover].AboveGround.N
                [RedClover].BelowGround.N
                [RedClover].AboveGround.NConc
                [RedClover].BelowGround.NConc
                [RedClover].AboveGroundLive.NConc
                (([RedClover].Leaf.N+[RedClover].Petiole.N+[RedClover].Inflorescence.N)/(([RedClover].Leaf.Wt+[RedClover].Petiole.Wt+[RedClover].Inflorescence.Wt+0.000001)) as RedCloverHerbageNConc
                ([Plantain].AboveGround.Wt/([Plantain].AboveGround.Wt+[RedClover].AboveGround.Wt+[Ryegrass].AboveGroundWt*0.1+0.000001)) as Plantain.BiomassFraction
                ([RedClover].AboveGround.Wt/([Plantain].AboveGround.Wt+[RedClover].AboveGround.Wt+[Ryegrass].AboveGroundWt*0.1+0.000001)) as RedClover.BiomassFraction
                ([Ryegrass].AboveGroundWt*0.1/([Plantain].AboveGround.Wt+[RedClover].AboveGround.Wt+[Ryegrass].AboveGroundWt*0.1+0.000001)) as Ryegrass.BiomassFraction
                ([Plantain].AboveGround.N/([Plantain].AboveGround.N+[RedClover].AboveGround.N+[Ryegrass].AboveGroundN*0.1+0.000001)) as Plantain.NitrogenFraction
                ([RedClover].AboveGround.N/([Plantain].AboveGround.N+[RedClover].AboveGround.N+[Ryegrass].AboveGroundN*0.1+0.000001)) as RedClover.NitrogenFraction
                ([Ryegrass].AboveGroundN*0.1/([Plantain].AboveGround.N+[RedClover].AboveGround.N+[Ryegrass].AboveGroundN*0.1+0.000001)) as Ryegrass.NitrogenFraction
                ([Plantain].Leaf.CoverTotal+[RedClover].Leaf.CoverTotal+[Ryegrass].CoverTotal) as CoverTotal
                ([Plantain].Leaf.CoverDead+[RedClover].Leaf.CoverDead+[Ryegrass].CoverDead) as CoverDead
                [MicroClimate].CanopyCover
                ([Plantain].Leaf.LAI+[RedClover].Leaf.LAI+[Ryegrass].LAIGreen) as LAIgreen
                ([Plantain].Leaf.LAIDead+[RedClover].Leaf.LAIDead+[Ryegrass].LAIDead) as LAIdead
                (([Plantain].Leaf.Height+[RedClover].Leaf.Height+[Ryegrass].Height)/3) as AverageShootHeight
                (([Plantain].Root.Depth+[RedClover].Root.Depth+[Ryegrass].RootDepth)/3) as AverageRootDepth
                ([Plantain].Root.LengthDensity+[RedClover].Root.LengthDensity+[Ryegrass].RootLengthDensity) as Total.RootLengthDensity
                [Plantain].Leaf.CoverTotal
                [Ryegrass].CoverTotal
                [RedClover].Leaf.CoverTotal
                [Plantain].Population
                (0*[Ryegrass].TotalWt) as Ryegrass.Population
                [RedClover].Population
                [Plantain].Leaf.Height
                [RedClover].Leaf.Height
                [Ryegrass].Height
                [Plantain].Root.Depth
                [RedClover].Root.Depth
                [Ryegrass].RootDepth
                [Plantain].Root.LengthDensity
                [RedClover].Root.LengthDensity
                [Ryegrass].RootLengthDensity
                [Plantain].Leaf.LAI
                [RedClover].Leaf.LAI
                [Ryegrass].LAI
                [Plantain].Leaf.RadIntTot
                [RedClover].Leaf.RadIntTot
                [Ryegrass].InterceptedRadn as Ryegrass.RadnIntTot
                [Plantain].Phenology.Stage
                [RedClover].Phenology.Stage
                [Ryegrass].Stage as Ryegrass.Phenology.Stage
                [Plantain].ShootRootRatio.Value()
                ([Plantain].AboveGroundLive.Wt/([Plantain].AboveGroundLive.Wt+[Plantain].BelowGround.Wt+0.000001)) as Plantain.CurrentAboveGroundFraction
                [RedClover].ShootRootRatio.Value()
                ([RedClover].AboveGroundLive.Wt/([RedClover].TotalLive.Wt+0.000001)) as RedClover.CurrentAboveGroundFraction
                ([Ryegrass].AboveGroundLiveWt/([Ryegrass].BelowGroundWt+0.000001)) as Ryegrass.ShootRootRatio
                ([Ryegrass].AboveGroundLiveWt/([Ryegrass].AboveGroundLiveWt+[Ryegrass].BelowGroundWt+0.000001)) as Ryegrass.CurrentAboveGroundFraction
                ([Plantain].Arbitrator.N.TotalPlantDemand+[RedClover].Arbitrator.N.TotalPlantDemand+([Ryegrass].DemandAtLuxuryN)*0.1) as TotalPlantNDemand
                ([Plantain].Arbitrator.N.TotalPlantSupply+[RedClover].Arbitrator.N.TotalPlantSupply+([Ryegrass].RemobilisableSenescedN+[Ryegrass].RemobilisableLuxuryN+[Ryegrass].SoilAvailableN)*0.1) as TotalPlantNSupply
                ([Plantain].Arbitrator.N.Allocated+[RedClover].Arbitrator.N.Allocated+([Ryegrass].RemobilisedSenescedN+[Ryegrass].RemobilisedLuxuryN+[Ryegrass].SoilUptakeN)*0.1) as TotalPlantNAllocated
                ([Plantain].Arbitrator.WDemand+[RedClover].Arbitrator.WDemand+[Ryegrass].WaterDemand) as TotalPlantWDemand
                ([Plantain].Arbitrator.WSupply+[RedClover].Arbitrator.WSupply+sum([Ryegrass].WaterAvailable)) as TotalPlantWSupply
                ([Plantain].Arbitrator.WAllocated+[RedClover].Arbitrator.WAllocated+sum([Ryegrass].WaterUptake)) as TotalPlantWAllocated
                [Plantain].Arbitrator.DM.TotalFixationSupply
                [Plantain].Arbitrator.DM.TotalPlantDemand
                [Plantain].Arbitrator.DM.Allocated
                [Plantain].Arbitrator.N.TotalPlantSupply
                [Plantain].Arbitrator.N.TotalPlantDemand
                [Plantain].Arbitrator.N.Allocated
                [Plantain].Arbitrator.WSupply
                [Plantain].Arbitrator.WDemand
                [Plantain].Arbitrator.WAllocated
                [Ryegrass].GrossPotentialGrowthWt as Ryegrass.Arbitrator.DM.TotalPlantDemand
                [Ryegrass].NetGrowthWt*0.1 as Ryegrass.Arbitrator.Arbitrator.DM.Allocated
                [Ryegrass].DemandAtLuxuryN*0.1 as Ryegrass.Arbitrator.N.TotalPlantDemand
                [Ryegrass].DemandAtOptimumN
                ([Ryegrass].RemobilisableSenescedN+[Ryegrass].RemobilisableLuxuryN+[Ryegrass].SoilAvailableN)*0.1 as Ryegrass.Arbitrator.N.TotalPlantSupply
                ([Ryegrass].RemobilisedSenescedN+[Ryegrass].RemobilisedLuxuryN+[Ryegrass].SoilUptakeN)*0.1 as Ryegrass.Arbitrator.N.Allocated
                [Ryegrass].SoilAvailableN
                [Ryegrass].SoilDemandN
                sum([Ryegrass].WaterAvailable) as Ryegrass.Arbitrator.WSupply
                [Ryegrass].WaterDemand as Ryegrass.Arbitrator.WDemand
                sum([Ryegrass].WaterUptake) as Ryegrass.Arbitrator.WAllocated
                [RedClover].Arbitrator.DM.TotalFixationSupply
                [RedClover].Arbitrator.DM.TotalPlantDemand
                [RedClover].Arbitrator.DM.Allocated
                [RedClover].Arbitrator.N.TotalPlantSupply
                [RedClover].Arbitrator.N.TotalPlantDemand
                [RedClover].Arbitrator.N.Allocated
                [RedClover].Arbitrator.WSupply
                [RedClover].Arbitrator.WDemand
                [RedClover].Arbitrator.WAllocated
                [RedClover].Nodule.NFixed*10 as RedClover.Nodule.NFixed
                [Plantain].Leaf.Fw
                [Plantain].Leaf.Fn
                [Plantain].Leaf.FNmetabolic
                [Plantain].Leaf.Photosynthesis.FCO2
                [Plantain].Leaf.Photosynthesis.FN
                [Plantain].Leaf.Photosynthesis.FT
                [Plantain].Leaf.Photosynthesis.FW
                [Plantain].Leaf.Photosynthesis.FVPD
                [Plantain].Leaf.FRGR
                [Ryegrass].GlfNSupply
                [Ryegrass].GlfWaterSupply
                [Ryegrass].GlfWaterLogging
                [Ryegrass].GlfNContent
                [Ryegrass].GlfCO2
                [Ryegrass].GlfTemperature
                [Ryegrass].GlfColdDamage
                [Ryegrass].GlfHeatDamage
                [RedClover].Leaf.Fw
                [RedClover].Leaf.Fn
                [RedClover].Leaf.FNmetabolic
                [RedClover].Leaf.Photosynthesis.FCO2
                [RedClover].Leaf.Photosynthesis.FN
                [RedClover].Leaf.Photosynthesis.FT
                [RedClover].Leaf.Photosynthesis.FW
                [RedClover].Leaf.Photosynthesis.FVPD
                [RedClover].Leaf.FRGR
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