Simulations: Version=171
  DataStore
    PredictedObserved: PredictedTableName=Report; ObservedTableName=Observed; FieldNameUsedForMatch=SimulationName; FieldName2UsedForMatch=Clock.Today; AllColumns=false
    ExcelInput Analytical: FileNames=[SoilTemperature-AnalyticalSolution.xlsx]; SheetNames=[AnalyticalDataForAPSIM]
  Folder SensibilityTests
    Experiment Analytical
      Factors
        Factor Site: Specification=[Weather].ExcelWorkSheetName=Dalby,Lincoln
      Simulation ComparisonWithAnalytical
        Memo
          The intention for the analytical solution is to test the numerics and also if the soil layering that most people use (many centimetres even at the surface) with SoilWater are causing any issues with the quality of the solution. This would be under highly idealised conditions but is a necessary step - the advantage is that it is only testing the soil temperature solution (not the water, crop, ...).

          * set up the soil water model such that the profile is uniform (all the same water content, bulk density, texture, carbon) with no crop and there are no changes in water content with time. I can't exactly remember how I did this last time but I would try setting it up with the soil at LL15 (are going to need a few different levels of this for testing) and if that didn't work then at SAT with Ksat and swcon = 0

          * need a couple of artificial weather files at latitude = 0 degrees, no rainfall, no radiation, and with air temperature of varying amplitude and average as from the spreadsheet

          Need to start with soil layers of about 1 cm each (where are pretty confident that the solution will work) but be set up to expand these out to more normal layering (can probably use the layering component for these).

          With the above, use the spreadsheet outputs as validation/testing data for the idealised setting for various depths in the soil. Would also like to understand how well the model copes with initial soil temperatures.

          After that, test things that should affect damping depth (bulk density, carbon, water content, texture ...)

          Notes:

          * The simulation reads dummy weather data from AnalyticalWeather.xlsx.

          * The soil physical node has a uniform profile specified.

          * The water balance component has been replaced by a manager script (DummyWaterBalance) that ensures water content (a user specified parameter) does not change during the simulation.

          * A 'LayerStructure' component can be added to the soil to get 1cm layers. There is a 'LayerStructure' component in the Wagga simulation that can be copied/pasted.
        Clock: Start=2000-01-01; End=2000-12-31
        Weather: FileName=AnalyticalWeather.xlsx; ExcelWorkSheetName=Lincoln
        Summary
        Zone Field: Area=1; Slope=0; AspectAngle=0; Altitude=50
          MicroClimate: a_interception=0; b_interception=0; c_interception=0; d_interception=0; SoilHeatFluxFraction=0; MinimumHeightDiffForNewLayer=0; NightInterceptionFraction=0; ReferenceHeight=2
          Manager DummyWaterBalance
            SW = 0.05, 0.05, 0.05, 0.05, 0.05, 0.05, 0.05, 0.05
            Eos = 0
            Es = 0
            Eo = 0
            Salb = 0
```csharp
using Models.PMF;
using Models.Core;
using System;
using Models.Interfaces;
using Models.Soils;
using APSIM.Shared.Utilities;

namespace Models
{
    [Serializable] 
    public class Script : Model, ISoilWater
    {
        [Link]
        private Physical physical;
        [Link]
        private IPhysical soilPhysical;

        ///<summary>Gets or sets soil thickness for each layer (mm)(</summary>
        public double[] Thickness { get { return soilPhysical.Thickness; } }

        ///<summary>Gets or sets soil thickness for each layer (mm)(</summary>
        public double[] LayerThickness { get { return soilPhysical.Thickness; } }

        ///<summary>Gets or sets volumetric soil water content (mm/mm)(</summary>
        [Description("Soil water content (mm/mm), comma separated values")]
        public double[] SW { get; set; }

        ///<summary>Gets soil water content (mm)</summary>
        public double[] SWmm { get { return MathUtilities.Multiply(SW, Thickness); } }

        ///<summary>Gets extractable soil water relative to LL15(mm)</summary>
        public double[] ESW { get { throw new NotImplementedException(); } }

        ///<summary>Gets extractable soil water relative to LL15(mm)</summary>
        public double[] PSI { get { throw new NotImplementedException(); } }

        ///<summary>Gets K</summary>
        public double[] K { get { throw new NotImplementedException(); } }
        
        ///<summary>Gets PoreInteractionIndex</summary>
        public double[] PoreInteractionIndex { get { throw new NotImplementedException(); } set { throw new NotImplementedException(); }}
                
        ///<summary>Gets potential evaporation from soil surface (mm)</summary>
        [Description("Eos (mm)")]
        public double Eos { get; set; }

        /// <summary>Gets the actual (realised) soil water evaporation (mm)</summary>
        [Description("Es (mm)")]
        public double Es { get; set; }

        /// <summary>Gets potential evapotranspiration of the whole soil-plant system (mm)</summary>
        [Description("Eo (mm)")]
        public double Eo { get; set; }

        /// <summary>Gets the amount of water runoff (mm)</summary>
        public double Runoff { get { return 0; } }
        
        /// <summary>Gets the amount of water drainage from bottom of profile(mm)</summary>
        public double Drainage { get { return 0; } }

        /// <summary>Fraction of incoming radiation reflected from bare soil</summary>
        [Description("Salb")]
        public double Salb { get; set; }

        /// <summary>Amount of water moving laterally out of the profile (mm)</summary>
        public double[] LateralOutflow { get { throw new NotImplementedException(); } }

        /// <summary>Amount of N leaching as NO3-N from the deepest soil layer (kg /ha)</summary>
        public double LeachNO3 { get { return 0; } }

        /// <summary>Amount of N leaching as NH4-N from the deepest soil layer (kg /ha)</summary>
        public double LeachNH4 { get { return 0; } }
        
        /// <summary>Amount of N leaching as urea-N  from the deepest soil layer (kg /ha)</summary>
        public double LeachUrea { get { return 0; } }

        /// <summary>Amount of Cl leaching  from the deepest soil layer (kg /ha)</summary>
        public double LeachCl { get { return 0; } }
        
        /// <summary>Amount of N leaching as NO3 from each soil layer (kg /ha)</summary>
        public double[] FlowNO3 { get { throw new NotImplementedException(); } }

        /// <summary>Amount of N leaching as NH4 from each soil layer (kg /ha)</summary>
        public double[] FlowNH4 { get { throw new NotImplementedException(); } }

        /// <summary>Amount of N leaching as urea from each soil layer (kg /ha)</summary>
        public double[] FlowUrea { get { throw new NotImplementedException(); } }

        /// <summary>Amount of N leaching as urea from each soil layer (kg /ha)</summary>
        public double[] FlowCl { get { throw new NotImplementedException(); } }

        /// <summary>Amount of water moving upward from each soil layer during unsaturated flow (negative value means downward movement) (mm)</summary>
        public double[] Flow  { get { throw new NotImplementedException(); } }

        /// <summary>Amount of water moving downward out of each soil layer due to gravity drainage (above DUL) (mm)</summary>
        public double[] Flux { get { throw new NotImplementedException(); } }

        /// <summary> This is set by Microclimate and is rainfall less that intercepted by the canopy and residue components </summary>
        public double PotentialInfiltration { get; set; }
        
        /// <summary> The amount of rainfall intercepted by crop and residue canopies </summary>
        public double PrecipitationInterception { get; set; }

        /// <summary>Water table depth (mm)</summary>
        public double WaterTable { get; set; }
        
        /// <summary>Pond depth (mm)</summary>
        public double Pond { get; set; }

        /// <summary>Pond depth (mm)</summary>
        public double SubsurfaceDrain { get; set; }

        /// <summary>Sets the water table.</summary>
        /// <param name="InitialDepth">The initial depth.</param> 
        public void SetWaterTable(double InitialDepth)
        {
            throw new NotImplementedException();
        }

        /// <summary>The efficiency (0-1) that solutes move down with water.</summary>
        public double[] SoluteFluxEfficiency { get; set; }

        /// <summary>The efficiency (0-1) that solutes move up with water.</summary>
        public double[] SoluteFlowEfficiency { get; set; }

        ///<summary>Perform a reset</summary>
        public void Reset()
        {
            throw new NotImplementedException();
        }

        ///<summary>Perform tillage</summary>
        public void Tillage(TillageType Data)
        {
            throw new NotImplementedException();
        }

        ///<summary>Perform tillage</summary>
        public void Tillage(string tillageType)
        {
            throw new NotImplementedException();
        }

        ///<summary>Remove water from the profile</summary>
        public void RemoveWater(double[] amountToRemove)
        {
            throw new NotImplementedException();
        }
        public void Standardise(double[] targetThickness)
        {
        
        
        }
        
        /// <summary>Plant available water SW-LL15 (mm/mm).</summary>
        [Units("mm/mm")]
        public double[] PAW
        {
            get
            {
                return SoilUtilities.CalcPAWC(soilPhysical.Thickness,
                                              soilPhysical.LL15,
                                              SW,
                                              null);
            }
        }

        /// <summary>Plant available water SW-LL15 (mm).</summary>
        [Units("mm")]
        public double[] PAWmm
        {
            get
            {
                return MathUtilities.Multiply(PAW, soilPhysical.Thickness);
            }
        }

    }
}
```
          Soil: Latitude=0; Longitude=0
            Physical
              Thickness  ParticleSizeClay  BD   AirDry  LL15  DUL   SAT
              100        9                 1.5  0.01    0.05  0.16  0.29
              100        9                 1.5  0.01    0.05  0.16  0.29
              200        9                 1.5  0.01    0.05  0.16  0.29
              300        9                 1.5  0.01    0.05  0.16  0.29
              300        9                 1.5  0.01    0.05  0.16  0.29
              300        9                 1.5  0.01    0.05  0.16  0.29
              200        9                 1.5  0.01    0.05  0.16  0.29
              300        9                 1.5  0.01    0.05  0.16  0.29
            Organic: FOMCNRatio=60; CarbonUnits=Total
              Thickness  Carbon  SoilCNRatio  FBiom  FInert  FOM
              100        2       14.5         0.04   0.4     0.294
              300        2       14.5         0.04   0.4     0.294
              600        2       14.5         0.04   0.4     0.294
              1000       2       14.5         0.04   0.4     0.294
              1000       2       14.5         0.04   0.4     0.294
              1000       2       14.5         0.04   0.4     0.294
              1000       2       14.5         0.04   0.4     0.294
              1000       2       14.5         0.04   0.4     0.294
            Chemical: Thickness=[100, 300, 600, 1000, 1000, 1000, 1000, 1000]; PH=[6.5, 6.5, 6.5, 6.5, 6.5, 6.5, 6.5, 6.5]; PHUnits=Water
            Water: Thickness=[100, 100, 200, 300, 300, 300, 200, 300]; InitialValues=[0.16, 0.16, 0.16, 0.16, 0.16, 0.16, 0.16, 0.16]; InitialPAWmm=198; RelativeTo=LL15; FilledFromTop=true
            SoilTemperature
            Solute NO3: Thickness=[100, 300, 600, 1000, 1000, 1000, 1000, 1000]; InitialValues=[0.1, 0.1, 0.1, 0.01, 0.01, 0.01, 0.01, 0.01]; InitialValuesUnits=kg/ha; WaterTableConcentration=0; D0=0; DepthConstant=0; MaxDepthSoluteAccessible=0; RunoffEffectivenessAtMovingSolute=0; MaxEffectiveRunoff=0
            Solute NH4: Thickness=[100, 300, 600, 1000, 1000, 1000, 1000, 1000]; InitialValues=[0.01, 0.01, 0.01, 0.01, 0.01, 0.01, 0.01, 0.01]; InitialValuesUnits=kg/ha; WaterTableConcentration=0; D0=0; DepthConstant=0; MaxDepthSoluteAccessible=0; RunoffEffectivenessAtMovingSolute=0; MaxEffectiveRunoff=0
            Solute Urea: Thickness=[100, 300, 600, 1000, 1000, 1000, 1000, 1000]; InitialValues=[0, 0, 0, 0, 0, 0, 0, 0]; InitialValuesUnits=kg/ha; WaterTableConcentration=0; D0=0; DepthConstant=0; MaxDepthSoluteAccessible=0; RunoffEffectivenessAtMovingSolute=0; MaxEffectiveRunoff=0
          Report AnalyticalReport: EventNames=[Clock].DoReport
            VariableNames:
              [Clock].Today as Date
              [Soil].SoilTemperature.AverageSoilTemp
              [Soil].SoilTemperature.AverageSoilTemp[1] as SoilTemperature@1
              [Soil].SoilTemperature.AverageSoilTemp[2] as SoilTemperature@20
              [Soil].SoilTemperature.AverageSoilTemp[6] as SoilTemperature@150
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